# [reference: basics.2006.xmcd]
ChannelScript(p1, p2, p3, p4, p5, p6, p7) :=
    viewtop ← viewtop
    box1 ← boxA(p1, p2)
    box2 ← boxA(p3, p4)
    subtract1 ← subtractG(p5, p6, p7)
    return concat(viewtop, box1, box2, subtract1)
Channel(Channel_origin, Channel_dim, t) := ChannelScript([Channel_origin[0]; Channel_origin[1]; Channel_origin[2]], [
    Channel_origin[0] + Channel_dim[0];
    Channel_origin[1] + Channel_dim[1];
    Channel_origin[2] + Channel_dim[2]
], [Channel_origin[0]; Channel_origin[1] - t; Channel_origin[2] - t], [
    Channel_origin[0] + Channel_dim[0];
    Channel_origin[1] + Channel_dim[1] + t;
    Channel_origin[2] + Channel_dim[2]
], [Channel_origin[0]; Channel_origin[1] + Channel_dim[1] + t], [Channel_origin[0] - 1; Channel_origin[1] - t - 1], [Channel_origin[0] + Channel_dim[0] + 1; Channel_origin[1] + Channel_dim[1] + t + 1])
Drawing_Channel := Channel([1; 2; 3], [8; 2; 1], .5)
# [component: inputs Drawing_Channel]
