# [reference: MasterProgram2.xmcd]
# Automated Design: AutoCAD: Plant Drawing Inputs
sedlayout = 3
ND_SedPipeEntrance := □
L_Sed := 3.02137 m
T_PlantWall = 0.15 m
L_SedInletOrifice =  # error: This variable is undefined.
EN_PipeSpec = 4
W_Sed = 1.0668 m
T_Mp = 0.3 m
H_SedInletOrifice =  # error
ND_SedSludge := 3 in
H_Sed = 1.3 m
HW_Sed = 1.2 m
T_SedInletSlope =  # error
AN_SedBottom = 10 deg
H_SedAbove = 0.12 m
N_SedInletSlope =  # error
AN_SedTopInlet = 48.3629 deg
ND_SedLaunder := 3 in
W_InletChannel := .245 m
W_EChannel := □
H_Channel := .3 m
H_EChannel := □
T_EChannelWall := □
T_ChannelWall = 0.15 m
N_SedTanks = 3
H_SedBelow = 0.6 m
D_SedSludgeOrifice := □
D_SedLaunderOrifice =  # error
N_SedSludgeOrifices := □
N_SedLaunderOrifices = 10
B_SedSludgeOrifices = 0.1 m
B_SedLaunderOrifices = 0.1 m
L_SedPlate = 0.554256 m
AN_SedPlate = 60 deg
N_SedPlates := □
Amp_SedPlate = 0.0127 m
B_SedPlate := □
T_SedPlate = 0.003 m
Per_SedPlate = 8.5
N_SedPlateCol = 1
lamina_y = 0.07 m
L_ChannelInlet := □
W_ChannelInlet := □
