# Automated Design: AutoCAD: Entrance Tank
# References
# [reference: MasterProgram.xmcd]
# [reference: basics - Copy.xmcd]
# [reference: tank.xmcd]
# [reference: pipe - Copy.xmcd]
# [reference: PipeDatabase.xmcd]
H_EtFlocConnect := 5 cm  # Dimensions of connection between entrance tank and floc tank
W_EtFlocConnect := S_FlocBaffle[0] = 0.0957755 m
B_EtFlocConnect := T_PlantWall = 0.15 m
# Inputs
Plant_Origin := [0; 0; 0]*m
Et_origin :=
    if mod(N_FlocChannels, 2) == 1
        origin ← [
            Plant_Origin[0];
            Plant_Origin[1] + (N_SedTanks*(W_Sed + T_PlantWall)) + (N_FlocChannels*(W_FlocChannel + T_PlantWall));
            Plant_Origin[2]
        ]
    return origin
    = [0; 4.52825; 0] m
Et_dim := [L_Et; W_Et; H_Et]
# Scripts
EtTankScript :=
    layernewt ← layer_new("entrancetank", ltgrey)
    tank ← Tank(Et_origin, Et_dim, T_EtWall)
    layersett ← layer_set("0")
    layerfreezet ← layer_freeze("entrancetank")
    one ← stack(layernewt, tank, layersett, layerfreezet)
    return one
EntranceTank := stack(EtTankScript)
# [component: inputs EntranceTank]
