# [reference: basics - Copy.xmcd]
Inletslopescript(p1, p2, p3, p4, p5, nrow, ncol, dist, angle) :=
    viewtop ← viewtop1
    box1 ← box(p1, p2)
    box2 ← box(p3, p4)
    subtract1 ← subtractD(p1, p2)
    array ← arrayB(p1, nrow, ncol, dist)
    union ← union_allA
    rotate ← rotate_3d(p1, p1, "", angle)
    mirror ← mirror(p1, p1, p5)
    one ← stack(viewtop, box1, box2, subtract1, array, union, rotate, mirror)
    return one
Inletslopescripta(origin, dim, l_orifice, h_orifice, n, angle) := Inletslopescript(origin, dim, [origin[0] + dim[0]/2 - l_orifice/2; origin[1]; origin[2] - dim[2]/2], [origin[0] + dim[0]/2 + l_orifice/2; origin[1] + h_orifice; origin[2] + (dim[2]/2)], [origin[0] + zc; origin[1]; origin[2]], n, 1, dim[0]/n, angle)
Inletslope(origin, Length, Width, l_orifice, h_orifice, thick, n, bigslope) := Inletslopescripta(origin, [Length; thick; Width], l_orifice, h_orifice, n, bigslope)
l_orifice := 4 in
origin := [0; 0; 0]*m
h_orifice := 3 in
Length := 2 m
thick := 2 in
n := 10
Width := 1 m
bigslope := 45 deg
Drawing_Inletslope := Inletslope(origin, Length, Width, l_orifice, h_orifice, thick, n, bigslope)
# [component: inputs Drawing_Inletslope]
