# Automated Design: AutoCAD:Sludge Drain Cover
# [reference: MasterProgram.xmcd]
# [reference: basics.xmcd]
AN_SedTopInlet = 60 deg
B_SedSludgeOrifices = 0.15 m
T_SedSludge = 0.0933013 m
N_SedSludgeOrifices = 63
H_SedSludge = 0.12 m
L_Sed = 9.52822 m
W_SedSludge = 0.12 m
W_SedDrainCover = 0.233504 m
ID_SedSludge = 0.127648 m
W_Sed = 2.159 m
DrainCover_origin := [Plant_Origin[0]; Plant_Origin[1] + W_Sed/2 - W_SedDrainCover/2; Plant_Origin[2]] = [0; 0.962748; 0] m
# Draw a box that is T.SedSludge by W.SedDrainCover and then extend it by L.Sed
Draincoverscript :=
    viewtops ← viewtop1
    layer1 ← layer_new("draincover", red)
    box1 ← box(DrainCover_origin, [-L_Sed; W_SedDrainCover; T_SedSludge] + [DrainCover_origin[0]; DrainCover_origin[1]; DrainCover_origin[2]])
    layerset ← layer_set("0")
    layerfreeze ← layer_freeze("draincover")
    one ← stack(viewtops, layer1, box1, layerset, layerfreeze)
    return one
# Cut out orifices
Orificescript :=
    viewtops ← viewtop1
    layerset1 ← layer_set("draincover")
    cylinder1 ← cylinderA(DrainCover_origin + [-L_Sed; W_SedDrainCover/2; 0], ID_SedSludge/2, T_SedSludge)
    viewtops2 ← viewtop1
    cylinders ← array_all(1, 63, B_SedSludgeOrifices)
    one ← stack(viewtops, layerset1, cylinder1, viewtops2, cylinders)
    return one
DrainCover := stack(Draincoverscript, Orificescript)
# [component: inputs DrainCover]
