# Automated Design: AutoCAD: Plant Drawing Inputs
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# Colors
grey := [132; 132; 132]
ltgrey := [214; 214; 214]
dkgrey := [91; 91; 91]
blue := [0; 255; 255]
blue2 := [0; 191; 255]
blue3 := [0; 127; 255]
green := [0; 255; 0]
purple := [127; 0; 255]
ltpurple := [125; 0; 160]
zc := .1 m
zc_point := [0; .1; 0]*m
# Sedimentation Tank
tank_origin := [0; 0; 0]*m
tank_dim := [L_SedTank; W_SedTank; H_SedTank]
channel_dim := [tank_dim[1] + 2*T_SedWall; W_Channel; H_Channel]
waterlevel := tank_dim[2] - HW_SedTank
manifold_depth := H_SedAbove/2
num_tanks := N_SedTank
sedpipe_inr := (ND_SedPipeEntrance/2)
sedtankpipe9_length := L_SedInlet
offfloor_length := Z_SedInlet
manifold_inr := (ND_Launder/2)
manifoldorifice_rad := D_LaunderOrifices/2
manifoldorifice_dist := B_LaunderOrifices
waste_inr := (ND_SedSludge/2)
wasteorifice_rad := D_SedSludgeOrifice/2
wasteorifice_dist := B_SedSludgeOrifices
offfloorlamina_dist := H_SedBelow
lamina_amp := .5 in
lamina_thick := 4 mm
lamina_width := tank_dim[1]
lamina_length := L_SedPlate
lamina_periods := 8.5
lamina_slope := AN_SedPlate
lamina_num := N_lamella
lamina_col := 1  # this is a constant!
lamina_x := B_SedPlate
lamina_y := 7 cm
z_rotation := 0
rotate_angle := 90
ϕ := AN_SedBottom  # sedtank slope angle
# Flocculation Tank
numfloc_tanks := N_FlocTankChannels
floc_dim := [W_FlocTank; L_FlocTank; H_FlocTank]
flochole_dim := [W_FlocPort; tank_thick; H_FlocPort]
# *check this*
baffletank1_location := [X_FlocBaffle, Z_FlocBaffle, L_FlocBaffle]
baffletank1_num := rows(baffletank1_location)
baffletank2_location := [X_FlocBaffle, Z_FlocBaffle, L_FlocBaffle]
baffletank2_num := rows(baffletank2_location)
baffle_amp := .5 in
baffle_thick := 4 mm
baffle_slope := 90 deg
baffle_width := floc_dim[1]
baffle_col := 1  # this is a constant!
baffle_periods := 8.5
baffle_y := 7 cm
baffle_num := 1
baffle_x := 4 in
# Platform
column_dim := [W_MpColumn; L_MpColumn; tank_dim[2] + tank_thick - channel_dim[2] - channel_thick]
# Grit Tank
# *check flocinleth*
grit_origin := [
    tank_origin[0] - tank_dim[0] - tank_thick;
    (tank_origin[1] + (num_tanks*tank_dim[1]) + (num_tanks*tank_thick) + numfloc_tanks*floc_dim[1] + (numfloc_tanks - 1)*tank_thick) - 1*floc_dim[1]/2;
    tank_origin[2] + floc_inleth
]
grit_dim := [3; 3; 2]*ft
grit_thick =  # error: This variable is undefined.
D_GritRiser := 3 in
gritriser_h := 30/12*ft
grit_holes := 7
Δx_grit := W_MPWalkway
gritpipe_inr := □  # error: This placeholder is empty.
grit_rad := .25 in
Δy_grit := tank_thick + floc_dim[1]/2 + walkway_width - grit_dim[1] - 2*grit_thick
gritdisp1 := 8 in
gritdisp2 := 6 in
Δz_grit := tank_dim[2] - channel_dim[2] - platform_thick - floc_inleth
# Plant Level Tank
lvltank_dim := [L_PltAssumed; □; H_PltWall]  # error: This placeholder is empty.
lvlpipe_inr := manifold_inr
effluent_inr := □  # error: This placeholder is empty.  # *check this*
sedeff_origin := [
    tank_origin[0] - tank_dim[0] - tank_thick;
    tank_origin[1] + (num_tanks - .5)*tank_dim[1] + (num_tanks - 1)*tank_thick;
    tank_origin[2] + tank_dim[2] - channel_dim[2] - platform_thick - ElbowRadius(2*sedpipe_inr)
]
lvltank_waterlvl := HW_Plt
wall_disp := 3/12*ft + outerradius(2*effluent_inr)
Δz_effluent := ElbowRadius(2*sedpipe_inr) + 2*platform_thick - channel_dim[2]
Δysub_effluent := ElbowRadius(2*effluent_inr)
Δy_effluent :=
    Δysub_effluent if tank_dim[1]/2 + tank_thick + numfloc_tanks*(floc_dim[1] + tank_thick) - grit_dim[1] - lvltank_dim[1] - 2*lvltank_thick - 2*grit_thick < ElbowRadius(2*effluent_inr)
    tank_dim[1]/2 + tank_thick + numfloc_tanks*(floc_dim[1] + tank_thick) - grit_dim[1] - lvltank_dim[1] - 2*lvltank_thick - 2*grit_thick otherwise
# Chlorine Platform
chlorineplat_dim := [2*D_drum + 3*S_Drum; D_Drum + 2*S_Drum; T_Ap]
chlorineplat_origin := [
    tank_origin[0] - tank_dim[0] - tank_thick - walkway_width - grit_dim[0] - 2*grit_thick - ShortTeeLength(2*gritpipe_inr) - walk_space;
    tank_origin[1] + (num_tanks*tank_dim[1]) + ((num_tanks + 2)*tank_thick) + 2*floc_dim[1] + walkway_width;
    tank_origin[2] + tank_dim[2] - channel_dim[2] + stockplatcol_dim[2]
]
# Alum Platform
alumplat_dim := [2*D_drum + 3*S_Drum; D_Drum + 2*S_Drum; T_Cp]  # check stockplat thickness
alumplat_origin := [
    sedeff_origin[0] - walkway_width - lvltank_dim[0] - 2*lvltank_thick;
    sedeff_origin[1] + Δy_effluent + lvltank_dim[1] + 2*lvltank_thick;
    tank_origin[2] + tank_dim[2] - channel_dim[2] + stockplatcol_dim[2]
]
