References
# [reference: UserInputs- 1m deep.xmcd]
# [reference: DesignAssumptions-1m deep.xmcd]
# [reference: MathFunctions.xmcd]
# [reference: PipeDatabase.xmcd]
# [reference: MinorLossCoefficients.xmcd]
# [reference: FluidsFunctions.xmcd]
# Solution steps
# calculate diameter of single Lfom pipe
# Calculate number of riser pipes based on some sort of flow max for a given riser pipe diameter. Currently we are using the notion that an orifice at 20 cm carrying all of the water into the riser pipe must be less than 1/3 the area of the riser pipe.
# Design the orifice pattern for each riser pipe (note that an alternate solution would be to design standard riser pipe designs and then simply pick one of those designs. Thus a 3" pipe might be a 100 L/min Linear Flow Orifice Meter.
# Meet the target flows as closely as possible when the water level is at the bottom of each row of orifices
N_Lfom := 1  # This could go into design assumptions
K_Rm := 1  # Accounts for the exit into the flocculator from the straight Lfom.
# Number of risers
A_LfomOrificeTotal := A_orifice(HL_Lfom, Pi_VenaContractaOrifice, Q_Plant)
ID_Lfom := sqrt(4*Pi_LfomOrificeArea*A_LfomOrificeTotal/π) = 5.48192 in
ND_Lfom := NominalDiameter(ID_Lfom, EN_PipeSpec) = 6 in
HL_Rm := h_l(Q_Plant, ID_Lfom, L_RmPipe, K_Rm, Nu_Water, E_Pvc) = 0.911511 cm
## Design Lfom
# Linear Flow Orifice Meter
H_ramp(B_LfomOrifice, HL_Lfom, Pi_LfomH) := ramp(B_LfomOrifice*Pi_LfomH, B_LfomOrifice, HL_Lfom)
# locations where we will try to get the target flows is in between orifices at elevation Pi.H
Q_ramp(B_LfomOrifice, HL_Lfom, Pi_LfomH) := H_ramp(B_LfomOrifice, HL_Lfom, Pi_LfomH)/HL_Lfom*Q_Plant/N_Lfom  # Target riser flows
# Calculate the flow for a given number of submerged rows of orifices
Q_LfomActual(RowIndexSubmerged, n_Lfomorifices, B_LfomOrifice, D_Lfomorifice, HL_Lfom, Pi_LfomH) :=
    Q ← 0*L/min
    for i ∈ 0 .. RowIndexSubmerged
        Q ← Q + n_Lfomorifices[i]*Q_orifice(D_Lfomorifice, H_ramp(B_LfomOrifice, HL_Lfom, Pi_LfomH)[RowIndexSubmerged - i], Pi_VenaContractaOrifice)
    return Q
# Calculate number of orifices at each level given a diameter
fN_LfomOrifices(B_LfomOrifice, D_LfomOrifice, HL_Lfom, Pi_LfomH) :=
    Q_ramplocal ← Q_ramp(B_LfomOrifice, HL_Lfom, Pi_LfomH)
    H_ramplocal ← H_ramp(B_LfomOrifice, HL_Lfom, Pi_LfomH)
    n[last(H_ramplocal)] ← 0
    for i ∈ 0 .. last(H_ramplocal)
        n[i] ← max(0, round((Q_ramplocal[i] - Q_LfomActual(i, n, B_LfomOrifice, D_LfomOrifice, HL_Lfom, Pi_LfomH))/Q_orifice(D_LfomOrifice, B_LfomOrifice*Pi_LfomH, Pi_VenaContractaOrifice)))
    return n
D_LfomOrifices := RoundNearest(D_circle(A_orifice(B_LfomOrifice*Pi_LfomH, Pi_VenaContractaOrifice, Q_ramp(B_LfomOrifice, HL_Lfom, Pi_LfomH)[0])/N_LfomOrificesFirstrow), D_Drill)
# This selects an orifice size that will put N.LfomOrificesFirstrow holes in the bottom row. I selected this based on the observation that with 5 holes in the bottom row the error was very small. We should reevaluate this algorithm.
Q_ramp(B_LfomOrifice, HL_Lfom, Pi_LfomH)[0] = 25.3333 L/min
# rounds to closest drill size
N_LfomOrifices := fN_LfomOrifices(B_LfomOrifice, D_LfomOrifices, HL_Lfom, Pi_LfomH)
j := 0 .. last(N_LfomOrifices)
Q_LfomError[j] := (N_Lfom*(Q_LfomActual(j, N_LfomOrifices, B_LfomOrifice, D_LfomOrifices, HL_Lfom, Pi_LfomH) - Q_ramp(B_LfomOrifice, HL_Lfom, Pi_LfomH)[j])/Q_Plant)
# array of errors
Q_LfomErrorMax := max(|Q_LfomError|) = 1.3255 %
# Nominal Pipe Size of each riser. This will also be the size of rapid mix pipe.
# I have updated the length based on the new configuration.
# The length of the grit chamber is calculated as the length of the tees and elbows needed for the risers in addition to some extra space (grit extra length) to allow for the riser to be assembled into the grit chamber.
W_Et := W_FlocChannel  # error: This variable is undefined.
# Need to check to see if these are actually returning the correct dimensions from the pipe database
L_Et := W_FlocChannel  # error: This variable is undefined.
# The depth of the grit chamber is calculated starting from the depth of the water in the channel tank plus the headloss through flocculator plus headloss through rapid mix pipe, plus the height of a tee, the height of half an orifice diameter, plus the height of the riser itself
ZW_Et := HW_FlocStart + HL_Lfom + H_LfomFreefall  # error: This variable is undefined.
HW_EtMax := HW_EtMin + HL_Lfom = 0.4 m
H_Et := HW_EtMax + H_PlantFreeboard = 0.5 m
H_LfomSF := 5 cm
# Need to calculate the riser height, but we need to define how pipe lengths are calculated. Do they include the part that is inserted in the socket?
L_Lfom := H_Et - H_LfomSF = 0.45 m
