# AguaClara Water Treatment Plants
# Automated Design
# User Inputs:
HW_Sed := 2.3 m
# Design References
# [reference: PipeDatabase.xmcd]
# [reference: UserInputs- Gracias.xmcd]
# [reference: DesignAssumptions- Gracias.xmcd]
# [reference: MathFunctions.xmcd]
# [reference: MinorLossCoefficients.xmcd]
# [reference: FluidsFunctions.xmcd]
# Sedimentation Tanks:
# [reference: Sedimentation - Gracias.xmcd]
N_SlopePairs = 3
N_SedTanks = 4
H_SedBetween = 0.060325 m
HW_Sed = 2.3 m
H_Sed = 2.4 m
L_Sed = 4.8091 m
# Sedimentation Tank Sludge Drain:
# [reference: SludgeDrain.xmcd]
N_SedSludgeOrifices = 48
ND_SedSludge = 6 in
Q_SludgeDrainInitial = 2388.05 L/min
D_SedSludgeOrifice = 0.375 in
# Height Dimensions within Sedtank
H_SedBelowSlope := .5*W_Sed/N_SlopePairs*tan(AN_SedTopInlet) + T_SedInletSlope/cos(AN_SedTopInlet) + outerdiameter(ND_SedSludge) = 1.20315 m
# This depth of the sloped bottom
H_SedBelow := H_SedBelowSlope + H_SedBetween = 1.26347 m  # the entire area under the lamella will be a part of the sloped bottom
# Inlet Channel:
# [reference: Inlet Channel.xmcd]
W_InletChannel = 0.623847 m
L_Channel = 13.554 m
ND_SedPipeEntrance = 12 in
N_SedInletPipes = 6
H_InletChannel = 1.04685 m
Q_Plant = 800 gal/min
# Sedimentation Tank Inlet Slopes:
# [reference: Sed. Inlet Slopes- rect.xmcd]
B_SedInlet = 2.19537 cm
H_SedInlet = 6.41882 cm
A_Inlet = 0.308688 m^2
A_SedInlet = 0.617375 m^2
L_SedTopInlet = 1.0795 m
H_SedTopSlope = 0.934874 m
AN_SedTopInlet = 60 deg
AN_SedBottom = 40 deg
L_SedBottom = 0.704594 m
A_SedInletTotal = 0.63467 m^2
H_SedBottomSlope = 0.452904 m
A_SedInletActual = 0.634414 m^2
AN_SedTopInlet = 60 deg
AN_SedBottom = 40 deg
Z_SedSlopes = 2.13802 m
L_SedTopInlet = 1.0795 m
W_SlopesOpen =  # error: This variable is undefined.
# Sedimentation Tank Effluent Launder:
# [reference: Launder.xmcd]
N_SedLaunderOrifices = 68
Q_SedLaunderOrifices = 1.85559 L/min
# Exit Channel:
# [reference: Exit Channel.xmcd]
W_ExitChannel = 0.623847 m
ND_SedLaunder = 4 in
H_ExitChannel = 1.04685 m
L_SedLaunder = 3.41141 m
L_ExitChannel = 13.554 m
D_SedLaunderOrifice = 0.5 in
H_PltWeir = 0.811882 m
Z_SedLaunder = 2.20285 m
HW_ExitChannel = 0.906851 m
ZW_ExitChannel = 2.26 m
# Lamella:
# [reference: Lamella.xmcd]
L_SedPlate = 1.01871 m
B_SedPlate = 3.9005 cm
S_SedPlate = 3.6005 cm
N_SedPlates = 63
AN_SedPlate = 60 deg
V_SedC = 10.0259 m/day
V_SedUp = 70 m/day
H_SedPlate = 0.882226 m
H_SedAbove = 0.1543 m
# Flow Controller:
# [reference: FCM.xmcd]
N_Fcm = 6
ID_FcmTube = 4.318 mm
ID_FcmTube = 0.17 in
L_FcmTube = 255.151 cm
Q_FcmTubeMax = 378.541 mL/min
HL_FcmValve = 26.6223 cm
# Flocculator:
# [reference: Flocculation.xmcd]
W_FlocChannel = 1.61925 m
S_FlocBaffle = [0.16944; 0.202693; 0.268718; 0.563668] m
B_FlocBaffle = [0.17344; 0.206693; 0.272718; 0.567668] m
N_FlocBafflesMin = 33
HL_Floc = 9.10213 cm
Z_FlocBaffles = [
    0, 0, 0;
    0.16944, 0.202693, 0.563668;
    0, 0, 0;
    0.16944, 0.268718, 0.563668;
    0, 0, 0;
    0.16944, 0.268718, 0.563668;
    0, 0, 0;
    0.16944, 0.268718, 0;
    0, 0, 0;
    0.202693, 0.563668, 0;
    0, 0, 0;
    0.202693, 0, 0;
    0, 0, 0;
    0.202693, 0, 0
] m
X_FlocBaffles = [
    1.76925, 4.23043, 0.578668;
    1.94269, 4.02374, 1.14634;
    2.11613, 3.75102, 1.714;
    2.28957, 3.4783, 2.28167;
    2.46301, 3.20558, 2.84934;
    2.63645, 2.93287, 3.41701;
    2.80989, 2.66015, 3.98467;
    2.98333, 2.38743, 0;
    3.19002, 2.11471, 0;
    3.39671, 1.54704, 0;
    3.60341, 0.979376, 0;
    3.8101, 0, 0;
    4.01679, 0, 0;
    4.22349, 0, 0
] m
L_FlocBaffles = [
    2.13056, 2.09731, 1.73633;
    2.23056, 2.19731, 1.83633;
    2.13056, 2.03128, 1.73633;
    2.23056, 2.13128, 1.83633;
    2.13056, 2.03128, 1.73633;
    2.23056, 2.13128, 1.83633;
    2.13056, 2.03128, 1.73633;
    2.23056, 2.13128, 0;
    2.09731, 2.03128, 0;
    2.19731, 1.83633, 0;
    2.09731, 1.73633, 0;
    2.19731, 0, 0;
    2.09731, 0, 0;
    2.19731, 0, 0
] m
HW_FlocStart = 2.39102 m
W_FlocPort = 0.563668 m
H_FlocPort = 1.61925 m
N_FlocBaffles = 32
Gt_FlocMinFlow = 6919.34
N_FlocChannels = 3
# Entrance Tank:
# [reference: EntranceTank.xmcd]
ND_Lfom = 20 in
HL_Rm = 0.890191 cm
N_Lfom = 1
D_LfomOrifices = 52.3875 mm
Q_LfomErrorMax = 0.74575 %
N_LfomOrifices = [5; 4; 3; 2; 2; 2; 1; 2; 1; 1]
L_Et = 3 m
W_Et = 1.5 m
HW_EtMin = 0.2 m
HW_EtMax = 0.4 m
H_Et = 2.79102 m
ZW_Et = 2.69102 m
# Any additional needed elevations should be calculated in the files above.
# Elevations:
ZW_ExitChannel = 2.26 m  # Water Level at the end of the plant in the exit channel and exit channel box
HW_Sed = 2.3 m
HW_FlocStart = 2.39102 m  # Water level at the beginning of the floc tank
HL_Floc = 9.10213 cm  # just for ref. the head loss throught the floc tank
ZW_Et = 2.69102 m  # the height of the water in the entrance tank.
Z_Mp := (HW_Sed - HW_InletChannel)
# AutoCAD References
# [reference: basics.xmcd]
# [reference: pipe.xmcd]
# [reference: tank.xmcd]
# [reference: lamina.xmcd]
# [reference: cross.xmcd]
# [reference: Tee.xmcd]
# [reference: elbow.xmcd]
# [reference: Sludge.xmcd]
# [reference: Channel.xmcd]
# [reference: Manifold.xmcd]
# [reference: SedTankslopes.xmcd]
# [reference: Sed Tank Inlet Slope.xmcd]
# [reference: chemicalstock.xmcd]
# [reference: Sedimentation Tank.xmcd]
# [component: inputs SedTank]
# [reference: Flocculation Tank.xmcd]
# [component: inputs FlocTank]
# [reference: Entrance Tank.xmcd]
# [component: inputs EntranceTank]
