# [reference: FluidsFunctions.xmcd]
# [reference: DesignAssumptions.xmcd]
# [reference: PipeDatabase.xmcd]
# [reference: MasterProgramWWW.xmcd]
# Gives an array of the vertical location of each set of holes given hole spacing and the maximum head:
heads(Spacing, Change) :=
    for i ∈ 0 .. Change/Spacing
        h_grit[i] ← i*Spacing
    return h_grit
# ok
# This function provides the flow rate for a given head.  Requires an array with hole numbers at each level up to the current head level.
Q(h, n, Orifice_spacing, A_drillbit, K_orifice) :=
    Q ← 0
    return Q if h == 0
    otherwise
        levels ← floor(h/Orifice_spacing)
        Q ← Q + K_orifice*A_drillbit*n[0]*sqrt(2*g*h) if levels == 0
        otherwise
            for i ∈ 0 .. levels - 1
                Q ← Q + K_orifice*A_drillbit*n[i]*sqrt(2*g*(h - Orifice_spacing*i))
        return Q
# ok
# This returns an array with the number of holes required to create a linear relationship between flow and depth at each vertical orifice spacing:
N_holes(h_grit, Base, MaxHeadChange, Orifice_spacing, FirstFlow, A_drillbit, K_orifice) :=
    n_holes[0] ← Base
    for p ∈ 1 .. MaxHeadChange/Orifice_spacing - 1
        n_holes[p] ← 0
        while Q(h_grit[p + 1], n_holes, Orifice_spacing, A_drillbit, K_orifice) ≤ FirstFlow*(p + 1)
            n_holes[p] ← n_holes[p] + .1
        n_holes[p] ← round(n_holes[p])
    return n_holes
# ok
# This returns an the number of tees, crosses, and elbows in the grit chamber based on the number of risers: this works for any number of risers, but should perhaps be limited somewhere else.
# The number of connections refers to the number of ends that
# will overlap between two components instead of being used
# for elbows to the risers. For instance if you have five
# risers you will need at least five elbows. But a cross can only
# account for three since one is an inlet, which is accounted for in
# ends with the +1.
N_components(n_risers) :=
    n_connections ← 0 if n_risers < 4
    n_connections ← (n_risers - 1) if n_risers ≥ 4 and mod(n_risers, 2) ≠ 0
    n_connections ← (n_risers - 2) otherwise
    ends ← n_risers + 1 + n_connections
    n_crosses ← trunc(ends/4)
    left ← ends - 4*n_crosses
    n_tees ← trunc(left/3)
    left ← left - 3*n_tees
    n_straight ← left
    n_elbows ← n_risers + 1
    n_components ← [n_elbows; n_tees; n_crosses]
    return n_components
# The number of ends includes the inlet, the connections and the
# risers.
# The largest number of crosses needed is first calculated, and the
# ends left to be accounted for is calculated. Similarly the largest
# number of tees and straight pipes are calculated based on the ends
# left after each calculation.
# An extra elbow was added to the grit chamber
# are all these connections inside the grit chamber? yes.
# No longer needed for headloss calculations only headloss through pipe between grit and flocculation needed. Does AutoCad need these numbers?
# Given the number of holes at each vertical orifice spacing above, what are the actual flow rates when the water reaches just below each set of holes?
OurFlows(h, n, Orifice_spacing, A_drillbit, K_orifice) :=
    for i ∈ 0 .. length(h) - 1
        Flows[i] ← Q(h[i], n, Orifice_spacing, A_drillbit, K_orifice)
    return Flows  # ok
# Inner Diameter of each riser
# ok - assuming pipe database is correct
ID_riser := D_pipe(Q_plant, AvailPipeSizes1(PipeSpecification), h_lrapidmix, L_rmpipe, ν, ε_pvc, K_sum(0, n_elbowsrapid, 0, n_trapid, 0, 0, 0, 0, 0))
# where is K.sum?
# K.sum is in the Pipe Design and Minor Loss Coefficients file
# Number of risers
n_risers := ceil(4*A_orifice(h_lflowmeter, K_orifice, Q_plant)/(π*D_pipe(Q_plant, AvailPipeSizes1(PipeSpecification), h_lrapidmix, L_rmpipe, ν, ε_pvc, K_sum(0, n_elbowsrapid, 0, n_trapid, 0, 0, 0, 0, 0))^2*A_ratio))
# so this is the area of a pipe available for orifices divided by the max number of holes at one vertical spacing, right?
# An array of desired flowrates through plant at each orifice spacing
# i don't have a clue where this equation came from. I'm going to assume it's right, but you might want to comment an explanation here or on the wiki...
Q_ideal := heads(Orifice_spacing, h_lrapidmix)*Q_plant/h_lflowmeter
# This equation is based on y=mx + b assuming that a x=0 we want a flow = 0 and at the highest vertical spacing x=20 cm we want flow = Q.plant. I will put this on the wiki.
# Actual flowrate through plant given headloss through risers??
Q_actual := Q_plant/(h_lrapidmix/Orifice_spacing)
# should this equation us h.lorificemax rather than h.lmax? this equation could use a bit more clarification somewhere also...
# Array of drill bit diameters based on english and metric drill sets. The min and max diameter was determined based on a nonlinear flow measurement design function.
i := 0 .. 10
j := 0 .. 17
D_engdrill[i] := 2/16*in + 1/16*i*in
D_metdrill[j] := 3 mm + 1*j*mm
D_engdrill = [0.125; 0.1875; 0.25; 0.3125; 0.375; 0.4375; 0.5; 0.5625; 0.625; 0.6875; 0.75] in
D_metdrill = [3; 4; 5; 6; 7; 8; 9; 10; 11; 12; 13; 14; 15; 16; 17; 18; 19; 20] mm
# Determine which array of drillbit sizes to use based on type of drill set (english or metric)
D_drill :=
    D_engdrill if DrillSeries == 1
    D_metdrill otherwise
Q_error := 1
# Initial error between ideal and actual
# flow rates in grit chamber
Riser_orifices :=
    i ← last(D_drill)
    while Q_error > Max_error
        A_drillbit ← π*D_drill[i]^2/4
        h_orifice ← Orifice_spacing - D_drill[i]/2
        BaseHoles ← round(Q_actual/Q_orifice(D_drill[i], h_orifice, K_orifice))
        n_orifices ← N_holes(heads(Orifice_spacing, h_lrapidmix), BaseHoles, h_lrapidmix, Orifice_spacing, Q_actual, A_drillbit, K_orifice)
        Q_error ← max(|OurFlows(heads(Orifice_spacing, h_lrapidmix), n_orifices, Orifice_spacing, A_drillbit, K_orifice) - Q_ideal|)/Q_plant
        i ← i - 1
        break if i == 0
    return [D_drill[i + 1]/mm, n_orifices]
# Max.error is the max allowable error between the desired flow rate and the actual flowrate
# A.drillbit is the area of the orifice
# BaseHoles is the number of orfices in the first vertical spacing of the riser
Riser_orifices = [16, [8; 1; 4; 2; 2; 2; 1; 2; 1; 2]]
# n orifices is the number of orifices at each vertical spacing
# Q.actual is the actual flowrate
# Q.error is calculating the error between actual and desired flowrates
# why is the error term divided by Q.plant rather than Q.ideal?
# how would i ever by equal to its initial value after going though this loop. what does this line do since it never actually assigns anything a value?
# You are right it won't. I have made this change.
# this function could use some simple sketches uploaded to the wiki to make sure everyone is on the same page about which dimensions we are discussing...
# I have updated the wiki with a sketch for determing the water level and therefore the depth of the grit chamber.
# so are all those connections really inside the grit chamber? I don't really understand how everything is connected?
# I made the mistake in including the connections in the grit chamber in the head loss calculations. You only need to consider the headloss in the rapid mix pipe which results from 3 elbows. I have made this updated to the K.sum inputs.
# Nominal Pipe Size of each riser
# Are we sure that they won't want to put the chem strorage drums side by side?
D_riser := NominalPipeSize(ID_riser)
# so is length really just going to be a design assumption? At some point doesn't the grit chamber design need to account for the capacity we need based on flowrate and what not?
# The length of the grit chamber is calculated as the length of the tees and elbows needed for the risers in addition to some extra space (grit extra length) to allow for the riser to be assembled into the grit chamber.
# have the master program send the grit chamber the water level in the sed tank
# I have updated the length based on the new configuration.
n_elbowsgritdim := 2  # The number of elbows needed to calculate the width and length of the grit chamber.
n_risersgritdim := 2  # The number of pipe diameters needed to calculate the width and length of the grit chamber.
n_tgritdim := 1
# These are like design assumptions but did not include in the diseign assumptions file to prevent cluttering. This may need to be changed.
# The number of tees needed to calculate the width and length of the grit chamber.
grit_length := (n_tgritdim + grit_extralength)*TeeLength(D_nominal(ID_riser, PipeSpecification)) + n_elbowsgritdim*ElbowRadius(D_nominal(ID_riser, PipeSpecification)) + n_risersgritdim*D_riser
# Caluculates the width of the grit chamber as the larger of the width of the chemical feed platform or the width of the riser pipes.
grit_width :=
    n_elbowsgritlength ← 2
    n_riserslength ← 2
    n_tlength ← 1
    return 2*r_drum + chemplatform_addwidth if (n_tgritdim + grit_extralength)*TeeLength(D_nominal(ID_riser, PipeSpecification)) + n_elbowsgritdim*ElbowRadius(D_nominal(ID_riser, PipeSpecification)) < 2*r_drum + chemplatform_addwidth
    (n_tgritdim + grit_extralength)*TeeLength(D_nominal(ID_riser, PipeSpecification)) + n_elbowsgritdim*ElbowRadius(D_nominal(ID_riser, PipeSpecification)) otherwise
# changed h.grit to h.lmax to output max. headloss through orifices
# instead of an array of orifice heights.
# The depth of the grit chamber is calculated starting from the depth of the sed tank plus the headloss through flocculator plus headloss through rapid mix pipe, plus the height of a tee, the height of half an orifice diameter, plus the height of the riser itself, and freeboard
grit_depth(floc_headloss, sedwater_level, Z_platform) := sedwater_level + floc_headloss + h_e(Q_plant, ID_riser, K_sum(0, n_elbowsrapid, 0, n_trapid, 0, 0, 0, 0, 0)) + TeeLength(D_nominal(ID_riser, PipeSpecification)) + .5*Riser_orifices[:, 0]*m + h_lrapidmix + freeboard_grit - Z_platform
# The height of the riser is the same as the depth of the grit chamber
h_riser := grit_depth(floc_headloss, sedwater_level, Z_platform)  # error: This variable is undefined.
# didn't you already make this assignment above?
# didn't you already assign D.riser() to this. it would be simpler to now just assign D.riser to D.riser() as you did with n.risers
# I have made this change.
