# [reference: FluidsFunctions.xmcd]
nu := 10^-6*m^2/s
A_circle(D_circle) := π*D_circle^2/4
PI_JetDissipation := 5
# Length of sed tank:
L_man := 3 m
# Width of sed tank:
w := 1 m
# Plant Flow Rate:
Q := 380*L/min
# Angle of ferrocement:
An_ferro := 45 deg
# Flow rate through each manifold:
Q_man := Q/6 = 1055.56 cm^3/s
# Angle of bottom:
An_bottom := 10 deg
# Height of ferrocement:
H_ferro := .5*w*tan(An_ferro) = 0.5 m
n := 50
# Number of port holes:
D_port := 2.5 in
# Length of ferrocement:
L_ferro := .5*w/cos(An_ferro) = 0.707107 m
# Size of each port hole:
D_eff := .61*D_port
# Height of bottom:
H_bottom := .5*w*tan(An_bottom) = 0.0881635 m
# Effective size of port holes:
# Length of bottom:
L_bottom := .5*w/cos(An_bottom) = 0.507713 m
# Target G
G_avg := 10*1/sec
# Area of manifold
A_man := w/4*(H_ferro - H_bottom) = 0.102959 m^2
Q_port := Q_man/n
Q_port = 21.1111 cm^3/s  # Flow through port given n and Deff
# Wetted perimeter
P_wetted := (H_ferro - H_bottom) + L_ferro + L_bottom = 1.62666 m
# Hydraulic Diameter:
D_ManHydraulic := 4*A_man/P_wetted = 0.25318 m
V_port := Q_port/A_circle(D_eff)
V_port = 1.79149 cm/s  # Velocity through port given n and Deff
V_G := (10*G_avg^2*D_eff*nu)^(1/3)
V_G = 3.38351 cm/s  # Velocity needed to get target G
# Initial velocity in manifold:
V_man := Q_man/A_man
V_man^2/(2*g) = 0.000535898 cm
H_man := h_orifice(D_eff, 0.62, Q_port)
H_man = 0.00425691 cm
D_Gf(Q, G_avg, n, PI_JD, nu) := (64/2*1/(G_avg^2*nu*PI_JD)*(Q/(π*n))^3)^(1/7)
D_Gf(Q, G_avg, n, PI_JetDissipation, nu) = 2.50272 in  # Port diameter needed to get target G given n & Q
A_man/(n*A_circle(D_eff)) = 1.74742
D_G := D_Gf(Q, G_avg, n, PI_JetDissipation, nu) = 2.50272 in
ε := 0.12 mm
3 m/50 = 0.06 m
Q_MultiplePort(Q_man, A_man, D_ManHydraulic, L_man, D_G, n) :=
    Q_port[0] ← Q_man/n
    loops ← 0
    error ← 1
    H_man[0] ← h_orifice(D_G, .62, Q_port[0])
    V[0] ← Q_man/A_man
    while |error| > 0.01 and loops < 200
        for i ∈ 1 .. n
            V[i] ← V[i - 1] - Q_port[i - 1]/A_man
            H_expansion ← V[i]*Q_port[i - 1]/(g*A_man)
            H_friction[i] ← h_f(V[i]*A_man, D_ManHydraulic, L_man/n, nu, ε)
            H_man[i] ← H_man[i - 1] - H_friction[i]
            Q_port[i] ← Q_orifice(D_G, H_man[i], 0.62)
        error ← (sum(Q_port) - Q_man)/Q_man
        H_man[0] ← (error + 1)^-2*H_man[0] if error > 0
        H_man[0] ← 2*H_man[0] otherwise
        loops ← loops + 1
    return V
Q_man/n = 1.26667 L/min
Q_MultiplePort(Q_man, A_man, D_ManHydraulic, L_man, D_G, n) = [
    615.131; 602.828; 584.329; 565.959; 547.711; 529.579; 511.559; 493.644; 475.828; 458.107
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] L/(m^2*min)
i := 1 .. n
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flowratio := max(Q_MultiplePort(Q_man, A_man, D_ManHydraulic, L_man, D_G, n))/min(Q_MultiplePort(Q_man, A_man, D_ManHydraulic, L_man, D_G, n)) = -2.58627
A_man = 0.102959 m^2
Q_man = 63.3333 L/min
L_man = 3 m
D_ManHydraulic = 0.25318 m
D_G = 0.063569 m
h_f(Q_man/A_man*A_man, D_ManHydraulic, L_man, nu, .01) =  # error: This value has units: Unitless, but must have units: Length.
h_orifice(D_G, .62, Q_man/n) = 5.8685e-6 m
