# AguaClara Water Treatment Plants
# Automated Design
# User Inputs:
# Design References
# [reference: UserInputs- 1m deep.xmcd]
# [reference: DesignAssumptions-1m deep.xmcd]
# [reference: MathFunctions.xmcd]
# [reference: PipeDatabase.xmcd]
# [reference: MinorLossCoefficients.xmcd]
# [reference: FluidsFunctions.xmcd]
# Inlet Channel:
# [reference: Inlet Channel.xmcd]
W_InletChannel = 0.36385 m
L_Channel = 2.4336 m
ND_SedPipeEntrance = 12 in
# Sedimentation Tanks:
# [reference: Sedimentation.xmcd]
N_SedTanks = 2
H_SedBelowSlope = 0.6 m
H_SedBelowStraight = 0 m
H_SedPlate = 0.48 m
HW_Sed = 1.2 m
H_Sed = 1.3 m
H_SedAbove = 0.12 m
L_Sed = 3.66383 m
# Sedimentation Tank Sludge Drain:
# [reference: SludgeDrain.xmcd]
N_SedSludgeOrifices = 36
ND_SedSludge = 3 in
Q_SludgeDrainInitial = 312.686 L/min
D_SedSludgeOrifice = 0.25 in
# Sedimentation Tank Inlet Slopes:
# [reference: Sed. Inlet Slopes.xmcd]
B_SedInlet = 3.76889 cm
H_SedInlet = 6.77905 cm
AN_SedTopInlet = 43.7769 deg
AN_SedBottom = 10 deg
A_SedInlet = 1112.26 cm^2
H_SedTopInlet = 51.11 cm
H_SedBottom = 0.0940528 m
# Sedimentation Tank Effluent Launder:
# [reference: Launder.xmcd]
N_SedLaunderOrifices = 54
Q_SedLaunderOrifices = 3.51852 L/min
Z_SedLaunder = 1.14 m
# Exit Channel:
# [reference: Exit Channel.xmcd]
W_ExitChannel = 0.36385 m
ND_SedLaunder = 4 in
H_ExitChannel = 0.55 m
L_SedLaunder = 2.78613 m
L_ExitChannel = 2.4336 m
D_SedLaunderOrifice = 0.375 in
H_PltWeir = 0.312215 m
HW_ExitChannel = 0.35 m
# Lamella:
# [reference: Lamella.xmcd]
L_SedPlate = 0.554256 m
B_SedPlate = 2.40076 cm
S_SedPlate = 2.10076 cm
N_SedPlates = 87
AN_SedPlate = 60 deg
V_SedC = 10.032 m/day
V_SedUp = 70 m/day
# Flow Controller:
# [reference: FCM.xmcd]
N_Fcm = 1
ID_FcmTube = 3.175 mm
ID_FcmTube = 0.125 in
L_FcmTube = 99.0625 cm
Q_FcmTubeMax = 285 mL/min
HL_FcmValve = 15.0907 cm
# Flocculator:
# [reference: Flocculation.xmcd]
W_FlocChannel = 0.5334 m
S_FlocBaffle = [0.0821572; 0.0982813; 0.130295; 0.334734] m
B_FlocBaffle = [0.0841572; 0.100281; 0.132295; 0.336734] m
N_FlocBafflesMin = 53
HL_Floc = 8.97611 cm
X_FlocBaffles = [
    0.5334, 3.31409, 0.349734;
    0.617557, 3.1818, 0.686468;
    0.701714, 3.0495, 1.0232;
    0.785872, 2.91721, 1.35994;
    0.870029, 2.78491, 1.69667;
    0.954186, 2.65262, 2.0334;
    1.03834, 2.52032, 2.37014;
    1.1225, 2.38803, 2.70687;
    1.20666, 2.25573, 3.04361;
    1.29082, 1.919, 0;
    1.37497, 1.58227, 0;
    1.45913, 1.24553, 0;
    1.54329, 0.908798, 0;
    1.64357, 0.572064, 0;
    1.74385, 0, 0;
    1.84413, 0, 0;
    1.94441, 0, 0;
    2.04469, 0, 0;
    2.14497, 0, 0;
    2.24526, 0, 0;
    2.34554, 0, 0;
    2.44582, 0, 0;
    2.5461, 0, 0;
    2.64638, 0, 0;
    2.74666, 0, 0;
    2.87896, 0, 0;
    3.01125, 0, 0;
    3.14355, 0, 0;
    3.27584, 0, 0
] m
HW_FlocStart = 1.28976 m
W_FlocPort = 0.334734 m
L_FlocBaffles = [
    1.11784, 1.0697, 0.865266;
    1.3076, 1.25947, 1.05503;
    1.11784, 1.0697, 0.865266;
    1.3076, 1.25947, 1.05503;
    1.11784, 1.0697, 0.865266;
    1.3076, 1.25947, 1.05503;
    1.11784, 1.0697, 0.865266;
    1.3076, 1.25947, 1.05503;
    1.11784, 1.0697, 0.865266;
    1.3076, 1.05503, 0;
    1.11784, 0.865266, 0;
    1.3076, 1.05503, 0;
    1.11784, 0.865266, 0;
    1.29148, 1.05503, 0;
    1.10172, 0, 0;
    1.29148, 0, 0;
    1.10172, 0, 0;
    1.29148, 0, 0;
    1.10172, 0, 0;
    1.29148, 0, 0;
    1.10172, 0, 0;
    1.29148, 0, 0;
    1.10172, 0, 0;
    1.29148, 0, 0;
    1.10172, 0, 0;
    1.25947, 0, 0;
    1.0697, 0, 0;
    1.25947, 0, 0;
    1.0697, 0, 0
] m
H_FlocPort = 0.5334 m
N_FlocBaffles = 52
Z_FlocBaffles = [
    0, 0, 0;
    0.0821572, 0.130295, 0.334734;
    0, 0, 0;
    0.0821572, 0.130295, 0.334734;
    0, 0, 0;
    0.0821572, 0.130295, 0.334734;
    0, 0, 0;
    0.0821572, 0.130295, 0.334734;
    0, 0, 0;
    0.0821572, 0.334734, 0;
    0, 0, 0;
    0.0821572, 0.334734, 0;
    0, 0, 0;
    0.0982813, 0.334734, 0;
    0, 0, 0;
    0.0982813, 0, 0;
    0, 0, 0;
    0.0982813, 0, 0;
    0, 0, 0;
    0.0982813, 0, 0;
    0, 0, 0;
    0.0982813, 0, 0;
    0, 0, 0;
    0.0982813, 0, 0;
    0, 0, 0;
    0.130295, 0, 0;
    0, 0, 0;
    0.130295, 0, 0;
    0, 0, 0
] m
Gt_FlocMinFlow = 6939.67
N_FlocChannels = 3
# Entrance Tank:
# [reference: EntranceTank.xmcd]
ND_Lfom = 2 in
HL_Rm = 7.03971 cm
N_Lfom = 9
D_LfomOrifices = 6.35 mm
Q_LfomErrorMax = 1.3255 %
N_LfomOrifices = [5; 4; 2; 2; 2; 2; 1; 2; 1; 1]
L_Et = 0.5334 m
W_Et = 0.5334 m
HW_EtMin = 0.2 m
HW_EtMax = 0.4 m
H_Et = 0.5 m
ZW_Et = 1.53976 m
# Any additional needed elevations should be calculated in the files above.
# AutoCAD References
# [reference: basics.xmcd]
# [reference: pipe.xmcd]
# [reference: tank.xmcd]
# [reference: lamina.xmcd]
# [reference: cross.xmcd]
# [reference: Tee.xmcd]
# [reference: elbow.xmcd]
# [reference: Sludge.xmcd]
# [reference: Channel.xmcd]
# [reference: Manifold.xmcd]
# [reference: SedTankslopes.xmcd]
# [reference: Sed Tank Inlet Slope.xmcd]
# [reference: chemicalstock.xmcd]
# [reference: Sedimentation Tank.xmcd]
# [component: inputs SedTank]
# [reference: Flocculation Tank.xmcd]
# [component: inputs FlocTank]
# [reference: Entrance Tank.xmcd]
# [component: inputs EntranceTank]
