# AguaClara Water Treatment Plants
# Automated Design
# [reference: userinputs.xmcd]
# User Inputs:
# Engineer Entered Values: | Values used to Draw Plant:
tank_thick = 0.15 m
Q_plant = 300 L/min
lvltank_thick = 0.15 m
# sed tank parameters
stockplat_thick := lvltank_thick
beta = 0.959931
grit_thick := lvltank_thick
SedTank_width = 1 m  # Width of the lamella
platform_thick = 0.3 m
L_lamella = 0.9 m  # length of the lamella
channel_thick = 0.15 m
lamella_spacing = 0.05 m  # lamella spacing
walkway_width = 1 m
acad_version := 2006
PipeSpecification = 4
DrillSeries = 0
# Design References
# [reference: DesignAssumptions.xmcd]
# [reference: PipeDatabase.xmcd]
# [reference: FluidsFunctions.xmcd]
# [reference: Pipe Design and minor loss coefficients.xmcd]
# [reference: Channel design.xmcd]
# [reference: Chemical Feed.xmcd]
# [reference: Flocculation Function.xmcd]
# [reference: GritChamber.xmcd]
# [reference: Plant Elevation Design.xmcd]
# [reference: plantleveltank.xmcd]
# [reference: Sedimentation Function.xmcd]
# [reference: Sludge Drain Design Program.xmcd]
# [reference: Launder.xmcd]
r_drum = 0.3 m
# Calls Functions Here:
# Chemical Feed Design
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Q_alum := ChemicalFeed(Q_plant) = 150 mL/min
# Channel Design
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Channel_dim := Channel(Q_plant, SedTank_width, tank_thick) = [3.3; 0.225626; 0.7] m
# Sedimentation Tank Design
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pipediameter := 6 in
SedTank := SedTankDesign(Q_plant, SedTank_width, lamella_spacing, L_lamella, beta, Channel_dim) = [[1.89; 1; 2.12942], 21, 2.02942, 1.42942, 0.00013161, 0.25, 0.285926]
[sedtank_dim, N_lamella, water_depth, z_plat, v_c, spaceabove] := SedTank
SedTank = [[1.89; 1; 2.12942], 21, 2.02942, 1.42942, 0.00013161, 0.25, 0.285926]
sedtank_dim := SedTank[:, 0][0]*m = [1.89; 1; 2.12942] m
N_lamella := SedTank[0, 1] = 21
sedwater_level := SedTank[0, 2]*m = 2.02942 m
z_plat := SedTank[0, 3]*m = 1.42942 m
v_c := SedTank[0, 4]*m/s = 11.3711 m/day
spaceabove := SedTank[0, 5]*m = 0.25 m
# Flocculator Design
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# The baffle positions are reported in the following way:
# There is one matrix for each channel. The first column is the x position
# of the baffle. The 2nd column is the starting y position of a baffle (ie top of the tank (0),
# or bottom of tank), the 3rd column is the final position of the baffle.
# Therefore a baffle at position x extends between the two y coordinates.
Flocculator := flocculator(Q_plant, sedtank_dim) = [[3.78; 0.5; 2.18356], [0.07; 0.1; 0.21], 28, 0.0541421, [0.085; 1.23529], [[
    0.07, 2.18356, 0.259142;
    0.14, 0, 2.07856;
    0.21, 2.18356, 0.259142;
    0.28, 0, 2.07856;
    0.35, 2.18356, 0.259142;
    0.42, 0, 2.07856;
    0.49, 2.18356, 0.259142;
    0.56, 0, 2.07856;
    0.63, 2.18356, 0.259142;
    0.7, 0, 2.07856;
    0.8, 2.18356, 0.304142;
    0.9, 0, 2.03356;
    1, 2.18356, 0.304142;
    1.1, 0, 2.03356;
    1.2, 2.18356, 0.304142;
    1.3, 0, 2.03356;
    1.4, 2.18356, 0.304142;
    1.5, 0, 2.03356;
    1.6, 2.18356, 0.304142;
    1.7, 0, 2.03356
], [
    1.68, 2.18356, 0.469142;
    1.47, 0, 1.86856;
    1.26, 2.18356, 0.469142;
    1.05, 0, 1.86856;
    0.84, 2.18356, 0.469142;
    0.63, 0, 1.86856;
    0.42, 2.18356, 0.469142;
    0.21, 0, 1.86856
]], "Failure: Your Gθ for the flocculator is too low. It should not fall below 4500. Consider increasing the flowrate or flocculator length.", [10; 10; 8], 6.32]
floc_dim := Flocculator[0, 0]*m = [3.78; 0.5; 2.18356] m
baffle_spacing := Flocculator[0, 1]*m = [7; 10; 21] cm
tot_baffle := Flocculator[0, 2] = 28
floctotal_hl := Flocculator[0, 3]*m = 5.41421 cm
uturnhole_dim := Flocculator[0, 4]*m = [0.085; 1.23529] m
baffle_positions := Flocculator[0, 5]*m
[floc_dim/m, baffle_spacing/m, tot_baffle, total_hl/m, uturnhole_dim/m, baffle_positions, Gθ_newmin, n_bafflesnew, length_duetobaffles/m]  # disabled
# Grit Chamber Design
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Grit := gritchamber(Q_plant, PipeSpecification, DrillSeries, lamella_spacing, L_lamella, beta, Channel_dim, sedtank_dim, sedwater_level, floctotal_hl, z_plat) = [[1.08585; 0.9048; 1.25123], 3, [6; 0; 2; 1; 2; 1; 1; 1; 1; 1], 0.1016, [0.02], 1.25123]
Grit = [[1.08585; 0.9048; 1.25123], 3, [6; 0; 2; 1; 2; 1; 1; 1; 1; 1], 0.1016, [0.02], 1.25123]
grit_dim := Grit[0, 0]*m = [1.08585; 0.9048; 1.25123] m
n_GritRisers := Grit[0, 1] = 3
n_GritOrf := Grit[0, 2] = [6; 0; 2; 1; 2; 1; 1; 1; 1; 1]
D_GritRiser := Grit[0, 3]*m = 0.1016 m
D_GritOrf := Grit[0, 4]*m = [0.02] m
height_riser := Grit[0, 5]*m = 1.25123 m
# Launderer Design
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Laund := Launder(Q_plant, PipeSpecification, SedTank[:, 0][0][0]*m, SedTank[:, 2][0]*m, SedTank[:, 5][0]*m, Channel_dim[1], SedTank[:, 0][0][1]*m, platform_thick, walkway_width, n_sedtanks, Orifice_dist, hl_launder, Q_ratioLaunderOrf, ν, ε_pvc, Q_ratioLaunders, spacebelow_total) = [1.89, 0.0191503, 0.1, 1.90442, 0.00676501, 36, 0.00331881, 0.209588, 0.325343, 0.1524]
SedPipe_length := Laund[0, 0]*m = 1.89 m
D_laundOrf := Laund[0, 1]*m = 0.0191503 m
laundOrf_dist := Laund[0, 2]*m = 0.1 m
manifold_elevation := Laund[0, 3]*m = 1.90442 m
HL_laundertotal := Laund[0, 4]*m = 0.00676501 m
n_laundOrf := Laund[0, 5] = 36
h_laundOrf := Laund[0, 6]*m = 0.00331881 m
offfloor_length := Laund[0, 7]*m = 0.209588 m
Pipe9_length := Laund[0, 8]*m = 0.325343 m
D_launder := Laund[0, 9]*m = 0.1524 m
# Sludge Pipe Design
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SludgePipe := Sludge(Q_plant, PipeSpecification, SedTank[:, 0][0][0]*m, SedTank_width, SedTank[:, 2][0]*m) = [0.0508, 0.00552532, 0.1, 1.89, 18]
[D_sludgedrain/m, D_orifice/m, L_sludgeports/m]
D_sludgedrain := SludgePipe[0, 0]*m = 0.0508 m
D_sludgeOrf := SludgePipe[0, 1]*m = 0.00552532 m
sludgeOrf_dist := SludgePipe[0, 2]*m = 0.1 m
L_sludgePipe := SludgePipe[0, 3]*m = 1.89 m
n_sludgeports := SludgePipe[0, 4] = 18
# Plant Leveling Tank
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PLT := PlantLevelingTank(Q_plant, PipeSpecification, Laund[:, 4][0]*m, Laund[:, 6][0]*m) = [[0.571095; 0.606765; 0.7], 0.0762, 0.496681, 0.596681]
lvltank_dim := PLT[0, 0]*m = [0.571095; 0.606765; 0.7] m
D_weir := PLT[0, 1]*m = 0.0762 m
H_weir := PLT[0, 2]*m = 0.496681 m
HW_plantleveling := PLT[0, 3]*m = 0.596681 m
# Plant Elevation Design
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L_sedExitPipes := L_sedexits(channel_thick, tank_thick, Channel_dim[1], walkway_width, PLT[:, 0][0][0]*m, platform_thick, SedTank_width) = [2.96599; 4.15636; 5.34672] m
Z_elevation := PlantElevations(Q_plant, Grit, Laund, SedTank, Q_alum, PLT[:, 2][0], PLT[:, 1][0]*m, Flocculator[:, 3][0]*m, L_lamella, Laund[:, 4]*cm, L_sedExitPipes) = [3.41956; 2.81956; 2.71956; 1.51956; 2.61956; 2.56956; 2.36956; 2.66956; 2.56956; 2.36956; 2.20716; 2.20716; 2.18356; 2.08356; 2.12942; 2.02942; -1.83971; -5.70885; -6.48827; 1.42942; -4093.23; -4093.18; 2.12942] m
# Constructing Tables of Parameters:
# Defining components of Output Arrays:
[sedtank_dim, N_lamella, water_depth, z_plat, v_c, spaceabove] := SedTank
[floc_dim, baffle_spacing, tot_baffle, total_hl, uturnhole_dim, baffle_positions, Gθ_newmin, n_bafflesnew, length_duetobaffles] := Flocculator
[SedPipe_length, D_laundOrf, laundOrf_dist, manifold_elevation, HL_laundertotal, n_laundOrf, h_laundOrf, offfloor_length, Pipe9_length, D_launder] := Laund
[D_sludgedrain, D_sludgeOrf, sludgeOrf_dist, L_sludgePipe, n_sludgeports] := SludgePipe
[lvltank_dim, D_weir, H_weir, HW_plantleveling] := PLT
[grit_dim, n_GritRisers, n_GritOrf, D_GritRiser, D_GritOrf, height_riser] := Grit
D_GritOrf := D_GritOrf[0]
# Defining components of Table Arrays:
headerrow := ["Parameter"; "Value"; "Units"]
Parameters := [
    "Number of lamella in sedimentation tanks", N_lamella, " ";
    "critical velocity in sed tank", v_c, " meter per day";
    "number of baffles in flocculator", tot_baffle, " ";
    "total headloss through flocculator", floctotal_hl*1/cm, "centimeters";
    "length of the sedimentation inlet launder", SedPipe_length, "meters";
    "diameter of orifices in the launder", D_laundOrf, "centimeters";
    "distance between orifices in the launder", laundOrf_dist, "centimeters";
    "manifold elevation", manifold_elevation, "meters";
    "diameter of the sedimentation inlet launder", D_launder, "inches";
    "number of orifices in the launder", n_laundOrf, " ";
    "diameter of sedimentation outlet sludge pipe", D_sludgedrain, "inches";
    "diameter of orifices in sludge pipe", D_sludgeOrf*m/cm, "centimeters";
    "distance between orifices in sludge pipe", sludgeOrf_dist, "meters";
    "Diameter of weir in Plant Leveling Tank", D_weir, "inches";
    "Height of weir in PLT", H_weir, "centimeters";
    "Height of the Water in the PLT", HW_plantleveling, "centimeters";
    "number of risers in grit chamber", n_GritRisers, " ";
    "diameter of risers in grit chamber", D_GritRiser*m/in, "inches";
    "diameter of orifices in grit chamber", D_GritOrf*m/cm, "centimeters"
]
headercolumn
Units := Parameters[:, 2]
headercolumn := Parameters[:, 0]
Z := Parameters[:, 1]
table(headerrow, headercolumn, Z) :=
    for i ∈ 0 .. length(headercolumn)
        for j ∈ 0 .. last(headerrow)
            table[i, j] ← headerrow[j] if i == 0
            otherwise
                table[i, j] ← headercolumn[i - 1] if j == 0
                table[i, j] ← Z[i - 1] if j == 1
                table[i, j] ← Units[i - 1] if j == 2
    return table
headercolumn_Dim := [" Sedimentation Tank"; "Dimensions of Flocculator"; "Dimensions of Grit Chamber"; "Dimensions of Leveling Tank"; "Dimensions of Channel"]
headerrow_Dim := ["Component"; "Length"; "Width"; "Height"; "Units"]
Dim_y := [sedtank_dim[1]; floc_dim[1]; grit_dim[1]; lvltank_dim[1]; Channel_dim[1]/m]
Dim_z := [sedtank_dim[2]; floc_dim[1]; grit_dim[2]; lvltank_dim[2]; Channel_dim[2]/m]
Dim_x := [sedtank_dim[0]; floc_dim[0]; grit_dim[0]; lvltank_dim[0]; Channel_dim[0]/m]
Units2 := ["meter"; "meter"; "meter"; "meter"; "meter"]
tableDim(headerrow_Dim, headercolumn_Dim, Dim_x, Dim_y, Dim_z, Units2) :=
    for i ∈ 0 .. length(headercolumn_Dim)
        for j ∈ 0 .. last(headerrow_Dim)
            tableDim[i, j] ← headerrow_Dim[j] if i == 0
            otherwise
                tableDim[i, j] ← headercolumn_Dim[i - 1] if j == 0
                tableDim[i, j] ← Dim_x[i - 1] if j == 1
                tableDim[i, j] ← Dim_y[i - 1] if j == 2
                tableDim[i, j] ← Dim_z[i - 1] if j == 3
                tableDim[i, j] ← Units2[i - 1] if j == 4
    return tableDim
# Constructing Plant Elevation Tables:
headerrow_elevation := ["Element"; "Elevation from bottom of the sed tank (m)"; "Elevation from platform (m)"]
# top of alum stock tank
# port on alum stock tank
# bottom of alum stock tank
# alum platform height
# valve level in the FCM
# water level in the FCM
# end of the FCM tube at maximum alum dose
# grit chamber wall
# grit chamber maximum water level
# orifice elevation in the grit chamber
# horizontal pipe centerline where it leaves the grit chamber
# water level in rapid mix
# wall height for beginning of flocculator
# water level at beginning of flocculator
# wall height for the sedimentation tank
# water level in the sedimentation tank and channel
# top of the effluent launder
# top of the plate settlers
# bottom of the plate settlers
# platform height
# weir height
# level control water height
headercolumn_elevation := [
    "top of alum stock tank";
    "port on alum stock tank";
    "bottom of alum stock tank";
    "alum platform height";
    "valve level in the FCM";
    "water level in the FCM";
    "end of the FCM tube at maximum alum dose";
    "grit chamber wall";
    "grit chamber maximum water level";
    "orifice elevation in the grit chamber";
    "horizontal pipe centerline where it leaves the grit chamber";
    "water level in rapid mix";
    "wall height for beginning of flocculator";
    "water level at beginning of flocculator";
    "wall height for the sedimentation tank";
    "water level in the sedimentation tank and channel";
    "centerline of the effluent launder";
    "top of the plate settlers";
    "bottom of the plate settlers";
    "platform height";
    "weir height";
    "level control water height";
    "level control wall height"
]
tableElevation(headerrow_elevation, headercolumn_elevation, Z_elevation) :=
    for i ∈ 0 .. length(headercolumn_elevation)
        for j ∈ 0 .. last(headerrow_elevation)
            table[i, j] ← headerrow_elevation[j] if i == 0
            otherwise
                table[i, j] ← headercolumn_elevation[i - 1] if j == 0
                table[i, j] ← Z_elevation[i - 1] if j == 1
                table[i, j] ← Z_elevation[i - 1] - Z_elevation[22] if j == 2
    return table
# Tables:
# top
# [component: inputs table(headerrow, headercolumn, Z)]
# [component: inputs tableDim(headerrow_Dim, headercolumn_Dim, Dim_x, Dim_y, Dim_z, Units2)]
# [component: inputs tableElevation(headerrow_elevation, headercolumn_elevation, Z_elevation)]
# the negative sign here for alum platform height shows that the height chosen
# for the height of the chemical platform column is larger than
# that calculated based on the headloss through the FCM and
# Grit Chamber, so that from the platform the height of the platform
# is actually below the platform to make up for the shorter height needed
# AutoCAD References
# [reference: basics.xmcd]
# [reference: inputs.xmcd]
# [reference: tank.xmcd]
# [reference: lamina.xmcd]
# [reference: cross.xmcd]
# [reference: Tee.xmcd]
# [reference: elbow.xmcd]
# [reference: pipe.xmcd]
# [reference: pipe.no_zoom.xmcd]
# [reference: Sludge.xmcd]
# [reference: Channel.xmcd]
# [reference: Manifold.xmcd]
# [reference: SedTankslopes.xmcd]
# [reference: floctank.xmcd]
# [reference: grit-2.xmcd]
# [reference: platform.xmcd]
# [reference: Sed.eff1.xmcd]
# [reference: SedTankwithlamina.xmcd]
# [reference: stocka.xmcd]
# [reference: stockb.xmcd]
# AutoCAD Drawing Scripts
