# Sedimentation Tank Inlet Slopes Design:
# [reference: UserInputs- 1m deep.xmcd]
# [reference: DesignAssumptions-1m deep.xmcd]
# [reference: MathFunctions.xmcd]
# [reference: PipeDatabase.xmcd]
# [reference: MinorLossCoefficients.xmcd]
# [reference: FluidsFunctions.xmcd]
# [reference: Inlet Channel.xmcd]
# [reference: Sedimentation.xmcd]
L_Sed = 2.64414 m  # Length of sed tank
W_Sed = 1.0668 m  # Width Sed Tank
Q_Sed = 126.667 L/min  # Sed Tank Flow Rate
PI_JetDissipation := 5  # New Var.
Q_SedInlet := Q_Sed/N_SedInletSlopes  # New Var.  # Flow rate through each inlet slope
AN_SedTopInlet = 48.3629 deg  # Angle of Top Panel of Inlet Slope:
AN_SedBottom := 10 deg  # New Var.
# Angle of the Bottom of the Sed tank
# (bottom portion of the inlet channel)
H_SedTopInlet := .5*W_Sed*tan(AN_SedTopInlet) = 0.6 m  # New Var.  # Height to the Top of the Inlet Slope
H_SedBottom := .5*W_Sed*tan(AN_SedBottom) = 0.0940528 m  # New Var.  # Height to the Bottom of the Inlet Slope
L_SedTopInlet := .5*W_Sed/cos(AN_SedTopInlet) = 0.802817 m  # New Var.  # Length of the Top of the Inlet Slope:
# Length of the Bottom of the Inlet
# Slope (from the wall to tank center
# ignoring the sludge pipe)
L_SedBottom := .5*W_Sed/cos(AN_SedBottom) = 0.541629 m  # New Var.
# Cross Sectional Area of the Sed Tank
# Inlet
A_SedInlet := W_Sed/4*(H_SedTopInlet - H_SedBottom) = 0.134936 m^2  # New Var.
WP_SedInlet := (H_SedTopInlet - H_SedBottom) + L_SedTopInlet + L_SedBottom = 1.85039 m  # New Var.
# Wetted Perimeter of the Sed Tank Inlet
# (cross-section)
R_hGen(A_SedInlet, WP_SedInlet) = 0.0729229 m  # Hydraulic Radius of the Sed Tank Inlet
V_SedInlet := Q_SedInlet/A_SedInlet = 0.00782263 m/s  # New Var.  # Initial Velocity in the Inlet
K_SedInletPort := 2.5  # New Var.  # Vena Contracta Coefficient associated with water traveling out of the sed tank inlet and into the sed tank.
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V_SedInletPort := G_FlocMin^(1/2)*(2*Nu_Water*Pi_FlocDissipation*Q_SedInlet/(K_SedInletPort*L_Sed))^(1/4) = 1.12412 cm/s  # New Var.
# Maximum Velocity that the water can flow out of the port into the Sed tank.
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B_SedInlet := Q_SedInlet/(V_SedInletPort*L_Sed) = 3.55126 cm  # New Var.  # Necessary Width of the port out of the Sed Tank Inlet
n := 1000  # The number of sections that the inlet will be split into for numerical analysis
L_SedInletSec := L_Sed/n = 0.00264414 m
ε := 0.12 mm
HL_SedInlet := h_fGen(A_SedInlet, WP_SedInlet, V_SedInlet, L_SedInletSec, Nu_Water, ε) = 1.39076e-9 m  # New Var.  # Major Headloss through the Sed tank Inlet.
HL_SedInletPort := h_eGen(V_SedInletPort, K_SedInletPort) = 1.61071e-5 m  # New Var.  # Minor Headlosses of water flowing through a port
PI_HLSedInletPort := n*HL_SedInlet/HL_SedInletPort = 0.0863444  # New Var.  # Ratio if Headloss through the inlet to Headloss out of the port
Q_SedInletPort := V_SedInletPort*B_SedInlet*L_SedInletSec = 0.0633333 L/min  # New Var.  # Flow Rate Through one section of port
Q_SedInletInitial := Q_Sed/N_SedInletSlopes  # New Var.  # Initial Flow Rate Through the Manifold
W_SedInletPanel := H_SedTopInlet/sin(AN_SedTopInlet) - B_SedInlet = 0.767305 m  # New Var.
# Dimensions of the Panel to be used to the top of the sedimentation tank inlets
L_SedInletPanel := L_Sed = 2.64414 m
# New Var.
# The following code is for tapering the cross sectional area of the inlet.
SedInletAreas :=
    Q_Initial ← Q_SedInletInitial
    A_Next[0] ← A_SedInlet
    for i ∈ 1 .. n
        Q_Next ← Q_Initial - Q_SedInletPort
        A_Next[i] ← Q_Next/V_SedInlet
        Q_Initial ← Q_Next
    A_Array ← A_Next
    return A_Array
AreaEnd := SedInletAreas[978] = 0.00296859 m^2
1000 - 978 = 22
22*L_SedInletSec = 0.0581711 m
SedInletAreas[0] - SedInletAreas[1] =  # error: This variable is undefined.
A_Port := L_SedInletSec*B_SedInlet = 9.39003e-5 m^2
# Theoretically the cross sectional area of the channel should be zero at the end of the tank. But this is not plausible because the exit port must have a set width b across the entire channel. Thus there is a minimum area that the inlet must have. But this area is small enough that constant velocity through the inlet should be relatively possible.
SedInletLengths :=
    L_Next[0] ← 0 m
    for i ∈ 1 .. n
        L_Next[i] ← L_Next[i - 1] + L_SedInletSec
    L_Array ← L_Next
    return L_Array
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A_SedInletMin := W_Sed/4*(B_SedInlet*sin(AN_SedTopInlet) - B_SedInlet*sin(AN_SedBottom)) = 0.00543382 m^2  # New Var.  # The minumum possible Area for the Inlet
DeltaA_SedInlet := (A_SedInlet - A_SedInletMin)/n = 0.000129502 m^2  # New Var.  # Change in Area for one section of Inlet
SedInletVelocities :=
    A_Initial ← A_SedInlet
    Q_Initial ← Q_SedInletInitial
    V_Next[0] ← Q_Initial/A_Initial
    for i ∈ 1 .. n
        A_Next ← A_Initial - DeltaA_SedInlet
        Q_Next ← Q_Initial - Q_SedInletPort
        V_Next[i] ← Q_Next/A_Next
        A_Initial ← A_Next
        Q_Initial ← Q_Next
    V_Array ← V_Next
    return V_Array  # New Var.
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Error_VMax := (SedInletVelocities[0] - SedInletVelocities)/SedInletVelocities[0]  # New Var.  # Error in Velocities through the inlet
L_SedInletHyp2 := H_SedBottom/sin(AN_SedBottom) - B_SedInlet = 0.506116 m
AN_SedInletBackTop := atan((H_SedTopInlet - H_SedBottom)/L_Sed) = 10.8324 deg
L_SedInletBack := L_Sed/cos(AN_SedInletBackTop) = 2.69211 m
