# Engineer Entered Values: | Values used to Draw Plant:
T_Tank := 15 cm
Q_plant := 645*L/min
T_PltWall := 15 cm
# sed tank parameters
T_StockPlatform := T_PltWall
beta := 55 deg
T_Grit := T_PltWall
W_SedTank := 1 m  # Width of the lamella
T_Platform := 30 cm
L_SedPlate := 90 cm  # length of the lamella
T_Channel := 15 cm
B_SedPlate := 5 cm  # lamella spacing
W_Walkway := 1 m
PipeSpec := 2
DrillSeries := 0
