# Entrance Tank Modular Design
# User Inputs
method := "EntranceTank"
Q_Plant := □  # error: This placeholder is empty.  # To be left undefined and inputed online by the user
L_EtMax := □  # error: This placeholder is empty.  # the maximum length the user wants the entrance tank to be
HW_EtExit := □  # error: This placeholder is empty.  # elevation of water exiting entrance tank
Z_EtExit := □  # error: This placeholder is empty.  # evelation of pipe which allows water to exit entrance tank
# From Expert Inputs
Country := 0
Language := 0
L_Sed := L_EtMax  # Redined for this modular code
ND_RMPipe :=
    (.102 m) if Q_Plant ≤ 4*L/s
    (.152 m) if Q_Plant ≤ 10*L/s and Q_Plant > 4*L/s
    (.203 m) if Q_Plant ≤ 17*L/s and Q_Plant > 10*L/s
    (.254 m) if Q_Plant ≤ 27*L/s and Q_Plant > 17*L/s
    (.305 m) if Q_Plant ≤ 38*L/s and Q_Plant > 27*L/s
    (.381 m) if Q_Plant ≤ 54*L/s and Q_Plant > 38*L/s
    (.508 m) if Q_Plant ≤ 96*L/s and Q_Plant > 54*L/s
    .61 m otherwise
D_LfomOrifices :=
    (.312 in) if Q_Plant ≤ 1*L/s
    (.438 in) if Q_Plant ≤ 2*L/s and Q_Plant > 1*L/s
    (.5 in) if Q_Plant ≤ 3*L/s and Q_Plant > 2*L/s
    (.625 in) if Q_Plant ≤ 4*L/s and Q_Plant > 3*L/s
    (.688 in) if Q_Plant ≤ 5*L/s and Q_Plant > 4*L/s
    (.75 in) if Q_Plant ≤ 12*L/s and Q_Plant > 5*L/s
    (.812 in) if Q_Plant ≤ 13*L/s and Q_Plant > 12*L/s
    (.937 in) if Q_Plant ≤ 15*L/s and Q_Plant > 13*L/s
    (1 in) if Q_Plant ≤ 17*L/s and Q_Plant > 15*L/s
    (1.25 in) if Q_Plant ≤ 20*L/s and Q_Plant > 17*L/s
    (1.5 in) if Q_Plant ≤ 24*L/s and Q_Plant > 20*L/s
    (1.75 in) if Q_Plant > 24*L/s
ND_DistPipe :=
    (2 in) if Q_Plant ≤ 1*L/s
    (3 in) if Q_Plant ≤ 4*L/s and Q_Plant > 1*L/s
    (4 in) if Q_Plant ≤ 9*L/s and Q_Plant > 4*L/s
    (6 in) if Q_Plant ≤ 24*L/s and Q_Plant > 9*L/s
    (8 in) if Q_Plant ≤ 46*L/s and Q_Plant > 24*L/s
    (10 in) if Q_Plant ≤ 79*L/s and Q_Plant > 46*L/s
    (12 in) if Q_Plant ≤ 119*L/s and Q_Plant > 79*L/s
    (15 in) if Q_Plant ≤ 178*L/s and Q_Plant > 119*L/s
    (20 in) if Q_Plant > 178*L/s
# Tabulated Constants
E_Pvc := 0.12 mm
Nu_Water := 1*10^-6*m^2/s
Pi_Jet := 0.4
Pi_VenaContractaOrifice := 0.63
E_Concrete := 2 mm
# General Assumptions and Constants
D_Rebar := 1/2*in
S_Fitting := 5 cm
T_PlantWall := 15 cm
W_HumanMin := 0.54 m
H_PlantFreeboard := 0.1*m
H_Freefall := 0.1 m
T_ConcreteMin := 5 cm
# Flow Orifice Meter
HL_Nlfom := 40 cm
HL_Lfom := 20 cm
# Entrance Tank
EN_LinearFlow := 1
HL_Flowmeasure :=
    HL_Lfom if EN_LinearFlow
    HL_Nlfom otherwise
HW_EtMax := 1.5 m
ND_EtFloat := 8 in
S_EtFloat := 10 cm
AN_EtSlopeMax := 45 deg
T_EtHopperLedge := 15 cm
E_MaxRM := 1*W/kg
V_EtUpMin := 8*mm/s
Ti_EtDrain := 1 min
ND_EtDrainMin := 3 in
ND_EtDrain := 3 in
# Chemical Dose Controller
H_DoserAssembly := 6.77 cm
# Drain Channels
W_EtDCMin := 20 cm
# Wall Thicknesses
T_ChannelWall := T_PlantWall
# Minor Loss Coefficients
K_PipeEnt := 0.5
K_PipeExit := 1
K_GateValve := 0.39
K_El90 := 0.9
# Operator Access
W_EtWalkwayMin := 1 m
# Design References
# [reference: MathFunctions.xmcd]
# [reference: PipeDatabase.xmcd]
# [reference: FluidsFunctions.xmcd]
# From Entrance Tank Design Code
# [reference: EntranceTankMod.xmcd]
# From Entrance Tank Drawing Code
# [reference: MtoATranslators.xmcd]
# [reference: MtoATranslatorsWrapped.xmcd]
# [reference: PlumbingF.xmcd]
# [reference: TankF.xmcd]
# [reference: DrainChannelF.xmcd]
Et_Origin := [0 m; 0 m; 0 m]
Plant_Origin[0] := Et_Origin[0] + L_Sed - L_Et
Z_Walkway := Et_Origin[2] + .5*H_EtHopper  # Redined for this modular code
H_EtDC := 7*outerradius(ND_EtDrain)
# [reference: EntranceTankACMod.xmcd]
AC_EntranceTank := stack(EtTankScript, EtTrashRackScript, EtOverflowPluScript, EtDrainsRight, FlowControlScript, EtInletScript)
# Previews
# [reference: LayoutsAC.xmcd]
# Display Variables
Q_Plant =  # error: This variable is undefined.
Z_EtExit =  # error
HW_EtExit =  # error
L_EtMax =  # error
AC_EntranceTank =  # error
AI_Et = [
    "laythw"; "_-view o t"; "-plot y "; "PublishToWeb PNG.pc3"; "VGA (640.00 x 480.00 Pixels)"; "l n e F"; ""; " ."; "y  [FILEPATH]EntTank_t"; "n y"
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]
