# AguaClara Design Tool
Q_Plant := □  # error: This placeholder is empty.
Mod := 0
method := "EtFlocSedFi"
## References
# MathCAD dimension calculations:
# [reference: ExpertInputs.xmcd]
# [reference: MathFunctions.xmcd]
# [reference: PipeDatabase.xmcd]
# [reference: MaterialsDatabase.xmcd]
# [reference: FluidsFunctions.xmcd]
# [reference: SedTankFunctions.xmcd]
# [reference: CdcFunctions.xmcd]
# [reference: LfomFunctions.xmcd]
# [reference: SedimentationTankmrf222.xmcd]
# Reference changed for testing 7/2/14 by mrf222
# [reference: Flocculator.xmcd]
# [reference: LFOM.xmcd]
# [reference: EntranceTank.xmcd]
# [reference: SRSFmrf222TEST.xmcd]
# [reference: LinearCdc.xmcd]
# [reference: ChemStorageTanks.xmcd]
# AutoCAD drawing programs:
# Translators:
# These are the codes that take MathCAD outputs and create AutoCAD scripts that are used to draw the plant (formerly Basics)
# [reference: MtoATranslators.xmcd]
# The wrapped MtoA translator contains the functions that the user will want to access. These functions will draw pieces with full functionality - specifying the location, dimension, and orientation of the object. Also, it contains layer control and subtraction capabilities for grouped objects.
# [reference: MtoATranslatorsWrapped.xmcd]
# Drawing functions:
# [reference: ChannelF.xmcd]
# [reference: PlumbingF.xmcd]
# [reference: TankF.xmcd]
# [reference: StairsF.xmcd]
# [reference: DrainChannelF.xmcd]
# AutoCAD Script Files:
# [reference: FlocculatorAC.xmcd]
# [reference: SedTankRemoveBotSlab.xmcd]
# [reference: EntranceTankAC.xmcd]
# [reference: ChemStockTanksAC.xmcd]
# [reference: SRSFACmrf222TEST.xmcd]
# [reference: CdcAC.xmcd]
# Reference changed for testing 7/2/14 by mrf222
# The CDC drawing file also does not draw the manifold.
# [reference: OperatorAccessAC.xmcd]
# [reference: MaterialsAC.xmcd]
# Materials List:
# [reference: MaterialsList.xmcd]
# Layouts:
# This file will execute at the very end to create multiple views of the entire plant in paperspace
# [reference: LayoutsAC.xmcd]
# Section Cuts:
# This file will create section cuts in paper space
## All variables displayed must have the standard SI units. They may not have units attached by the user.
# General
Q_Plant = 0.05 m^3/s
Pi_VenaContractaOrifice = 0.63
T_PlantWall = 0.15 m
W_SedPlate = 1.0668 m
T_ConcreteMin = 0.05 m
L_SedPlateSheet = 3 m
C_CoagStock = 200 kg/m^3
T_SedPlate = 0.002 m
Ti_CoagStock = 108000 s
T_SedWeir = 0.04 m
C_ChlorineStock = 15 kg/m^3
W_SedBay = 1.0668 m
Ti_ChlorineStock = 108000 s
HL_ChannelMax = 0.05 m  # Eliminate FCM variable from design specs
H_PlantFreeboard = 0.1 m
EN_DrillSeries = 0
W_HumanMin = 0.45 m
W_ChannelMin = 0.15 m
# Entrance Tank
# Tank
HW_Et = 1.43618 m
HW_EtMax = 1.5 m
H_Et = 1.53618 m
Z_EtTop = 3.06159 m
L_Et = 7.77346 m
Z_Et = 1.52541 m
ZW_Et = 2.96159 m
W_Et = 1.23814 m
H_EtTop = 0.45 m  # height of the top part of the entrance tank above the hoppers
# Hoppers
H_EtHopperBack = 1.03654 m
N_EtFullHopper = 2
H_EtHopper = 1.08618 m
Z_EtHopper = 2.61159 m  # elevation of top of slab.
T_EtHopperLedge = 0.15 m
L_EtHopper = 2.37395 m
AN_EtSlope = 0.785398
# Rapid Mix
# Drain Channel
ED_Tee =  # error: This variable is undefined.
ND_RMPipe = 0.3048 m
W_EtDC = 0.488138 m  # drain channel under entrance tank dimensions
# Drains
L_EtDC = 7.32103 m
ND_EtDrain = 0.0762 m
H_EtDC = 0.352425 m  # Give heights of the channel at the beginning and end and change the design specs to explain that it's sloped.
L_EtDrainStopper = 1.53218 m
# Flow measurement
ND_LfomPipe = 0.3048 m
HL_Flowmeasure = 0.35 m
Z_LfomOrifices = 2.63064 m  # elevation of the center of
HL_Lfom = 0.35 m
D_LfomOrifices = 0.0381 m
B_LfomRows = 0.0388889 m
N_LfomOrifices = [13; 3; 3; 4; 2; 3; 2; 2; 2]
H_LfomOrifices = [0.01905; 0.0579389; 0.0968278; 0.135717; 0.174606; 0.213494; 0.252383; 0.291272; 0.330161] m
# Trash Rack
B_EtRebar = 0.0386739 m
# Flow Control Valve | Other Parameters
# Overflow Weir
ND_EtFlowControl = 0.2032 m
V_EtUp = 0.00622652 m/s
W_EtOverflowSlot = 0.120716 m
Ti_Et = 288.31 s
ND_EtOverflowDrain = 0.2032 m
H_EtOverflowCutaway = 0.0201193 m
L_EtOverflowWeir = 2.57555 m
W_PlantDC = 1 m
# Maybe give the vertical distances below the bottom of the sed tank of the beginning and end of the channel? Calculate them, display, and add to the design specs.
H_PlantDC = 0.608977 m
L_PlantDC = 11.3389 m
H_HumanAccess = 1.5 m
# Plant Drain Channel
# Coag Dose Controller
# Coagulant | Chlorine
Z_CoagTank = 3.32929 m
C_CoagStockMax = 200 kg/m^3
C_ChlorineStockMax = 15 kg/m^3
Z_CoagTankOutlet = 3.42929 m
C_CoagDoseMax = 0.08 kg/m^3
C_ChlorineDoseMax = 0.002 kg/m^3
L_CdcFloatArm = 0.525318 m
N_CdcCoagTubes = 1
N_CdcChlorineTubes = 1
L_CdcScaleArm = 0.389082 m
L_CdcCoagTube = 5.68464 m
L_CdcChlorineTube = 5.60486 m
B_StockOutlet = 0.1 m
HL_CdcCoag = 0.2 m
HL_CdcChlorine = 0.1 m
Ti_CoagStock = 108000 s
Vol_CoagTank = 2500 L
Vol_ChlorineTank = 750 L
H_CoagTankAboveHeadTank = 0.3 m
D_CdcCoag = 0.0079375 m
K_CdcTube = 2
D_CdcChlorine = 0.00635 m
ND_EtFloat = 0.2032 m
Q_CoagStock = 2e-5 m^3/s
Q_ChlorineStock = 6.66667e-6 m^3/s
ND_CoagPiping = 0.0127 m
# Flocculator
# Tank
EN_FlocType :=
    "horizontal" if EN_FlocHoriz == 1
    "vertical" otherwise
EN_FlocType = "vertical"
H_Floc = 2.41652 m
HW_FlocEnd = 2.09485 m
HW_FlocStart = 2.31652 m
Z_FlocTank = 0 m
L_Floc = 9.15822 m
H_FlocPort = [0.945642; 0.945642] m
W_FlocChannel = 0.6 m
N_FlocChannels = 2
# Drains
ND_FlocValve = 0.1016 m
N_FlocValves = 1
H_FlocSlope = 0.05715 m
Ti_FlocDrain = 1800 s
# Parameters
ED_Floc = 0.01 m^2/s^3
CP_Floc = 75 m^(2/3)
Ti_Floc =  # error
G_Floc =  # error  # Look at Flocculator Positioning arrays
V_Floc = 0.201107 m/s
# Fill last channel with bafffles from last channel
ED_FlocMax =  # error  # Fix port width to be based on energy dissipation in that channel
# Adjust spacing after the number of baffles per channel is known.
ED_FlocAve =  # error
# Check the residence time of the flocculator should be at least 20minutes
HL_Floc = 0.221672 m
K_FlocBaffle = 2.5
CP_Floc = 75 m^(2/3)
# Baffles
S_FlocBaffle = [0.414374; 0.414374] m
B_FlocBaffle = [0.416374; 0.416374] m
N_FlocChannelBaffles = [21; 20]
W_FlocPort = [0.394374; 0.336537] m
L_FlocBaffleLower = 1.47329 m
L_FlocBaffleUpper = 1.74496 m
T_FlocBaffle = 0.002 m
S_FlocBaffleFirst = 0.414374 m
EN_FlocBaffle = 1
Z_FlocBaffles = [
    0, 0.62156;
    0.62156, 0;
    0, 0.62156;
    0.62156, 0;
    0, 0.62156;
    0.62156, 0;
    0, 0.62156;
    0.62156, 0;
    0, 0.62156;
    0.62156, 0;
    0, 0.62156;
    0.62156, 0;
    0, 0.62156;
    0.62156, 0;
    0, 0.62156;
    0.62156, 0;
    0, 0.62156;
    0.62156, 0;
    0, 0.62156;
    0.62156, 0;
    0, 0
] m
# Modules
ND_FlocModulesMain = 0.0127 m
ND_FlocModulesLarge = 0.0381 m
L_FlocModuleLong = [1.24844; 1.24844] m
L_FlocModuleShort = [0.411151; 0] m
ND_SpacerPipe = 0.01905 m
L_FlocModuleLongOuter = [0.832064; 0.832064] m
# Sed Tanks
# Tanks
N_SedTanks = 6
Q_SedBay = 0.00833333 m^3/s
W_Sed = 1.0668 m  # Total tank wall height
HW_Sed = 2.09485 m
L_Sed = 9.15822 m
L_Sed = 9.15822 m  # Total tank length
N_SedBays = 1
H_Sed = 2.19485 m
W_SedSideSlopes = 0.511175 m
L_SedActive = 7.85427 m
AN_SedSlope = 0.872665
# Floc Hopper
AN_SedHopperSlope = 0.785398
# Parameters
V_SedUpBod = 0.001 m/s  # design constraints
V_SedCBod = 0.00012 m/s
V_SedUp = 0.000999072 m/s  # Actual values from this design
Ti_Sed = 1976.91 s
# sludge drain
N_SedSludgeOrifices = 72  # per cell
Ti_SludgeDrain = 1800 s  # Tank Drain time
W_SedSludge = 0.0916037 m  # Width of the sludge channel
H_SedSludge = 0.0916037 m  # Depth of the sludge channel
# Distance center to center between drain orifices
B_SedSludgeOrifices = 0.108344 m
W_SedDrainCover = 0.131604 m
D_SedSludgeOrifice = 0.00970203 m  # Diameter of drain orifices
N_SedSludgeOrifices = 72
ND_SedSludgePipe = 0.1524 m
Z_SedSludge = 0.0336787 m  # Height from 0 of the top of the sludge drain
Z_SedSideSlopes = 0.795248 m
# inlet channel | exit channel
W_SedExitChannel = 0.493897 m
HW_SedInletChannel = 0.350714 m
H_SedExitChannel = 0.450714 m
W_SedInletChannel = 0.555539 m
EN_InletChannelGeom = 1
HW_SedExitChannel = 0.310714 m
# water height in exit channel from base of channel
L_SedChannel = 7.1508 m
H_SedWeirExit = 0.286538 m
H_SedInletChannel = 0.450714 m
Z_SedChannelBottom = 1.74413 m
W_SedInletChannelPreWeir = 0.336537 m
HL_SedWeirInlet = 0.0241765 m
H_SedWeirInlet = 0.370714 m
W_SedWeirInlet = 7.1508 m
# launder
N_SedLaunderOrifices = 76  # Number of orifices per launder
ND_SedLaunder = 0.2032 m
D_SedLaunderOrifice = 0.015875 m
Z_SedLaunder = 1.9124 m
L_SedLaunder = 7.8505 m
Q_SedLaunderOrifices = 0.000109649 m^3/s
HL_SedLaunderOrifice = 0.0394225 m
B_SedLaunderOrifices = 0.1 m  # Center to center launder spacing
# inlet manifold
ND_SedManifold = 0.2032 m
L_SedManifoldDiffuser = 0.0967643 m
Z_SedManifoldPipe = 0.383415 m
ND_SedDiffuser = 0.0254 m
D_SedManifoldPort = 0.0238125 m
B_SedManifoldPort = 0.05 m
N_SedManifoldPorts = 154
L_SedManifoldPipe = 8.67642 m
ED_SedInlet = 0.03 m^2/s^3
Q_SedManifoldPort = 5.41126e-5 m^3/s
# plate settlers
S_SedPlateMin = 0.025 m
L_SedPlate = 0.6 m
B_SedPlate = 0.027 m  # center to center distance between lamella
S_SedPlate = 0.025 m  # spacing between lamella
N_SedPlates = 252  # Number of Sed Plates per Sedimentation Tank Bay.
N_SedModules = 28  # Number of modules per bay
N_SedModulePlates = 9  # Number of plates per module
AN_SedPlate = 1.0472
# SRSF
# tank
Porosity_Sand := ε_FiSand
T_FiWall = 0.25 m
N_FiLayer = 6
Q_Fi = 0.025 m^3/s
Z_FiBottom = -2.7429 m
HL_FiTerminal = 0.455621 m
H_FiLayer = 0.2 m
H_Fi = 4.73496 m
D_FiSand60 = 0.000825 m
HL_FiBwInitiation = 1.48782 m
Z_FiTop = 1.99206 m
V_FiLayer = 0.00183333 m/s
L_Fi = 1.58239 m
N_Fi = 2
HL_FiBwSS = 1.28782 m
Porosity_Sand = 0.4
W_Fi = 1.70931 m
H_FiBottomLayer = 0.26 m
V_FiBw = 0.011 m/s
H_FiSand = 1.30083 m
# sand drain
# trunk lines
Ti_FiSand = 1276.22 s  # This is the time required to empty the filter of the sand.
ND_FiTrunk = 0.1524 m
ND_FiBwTrunk = 0.254 m
ND_FiSandOutlet = 0.0508 m
# siphon
ND_FiSiphonAirValve = 0.0254 m
Z_FiSiphonCoupling = 0.930798 m
ND_FiSiphon = 0.254 m
Z_FiSiphonInlet = -0.851821 m
B_FiSiphonManOrifices = 0.106863 m
N_FiSiphonManOrifices = 12
D_FiSiphonManOrifices = 0.0508 m
# Waste and drain pipes
ND_FiExitWaste = 0.1016 m
# branches
N_FiSlotRows = 2
B_FiManifoldBranch = 0.1 m
ND_FiManBranch = 0.0254 m
ND_FiBwManBranch = 0.0381 m
B_FiManSlot = 0.0047625 m
B_FiBwManSlot = 0.0047625 m
# Inlet Channel
HL_FiInletChannel = 0.00100507 m
L_FiInletChannel = 3.16146 m
Z_FiEntranceWeir = 1.84206 m
# Entrance Box
Z_FiEntranceBottom = 0.835479 m  # bottom of the entrance box
# Exit Box
Z_FiExitBottom = 0.835479 m  # bottom of the filtered water box
L_FiExit = 0.5183 m
L_SedLaunder = 7.8505 m
N_ValveCouplings = 6
N_SedPlatesTotal = 1512
N_SedPlatesPerSheet = 5
N_SedPlateSheets = 303
N_Valves = 6
A_EtFloor = 12.4181 m^2
W_FlocWithWalls = 1.5 m
L_FlocWithWalls = 9.45822 m
Vol_FlocFloor = 2340.91 L
A_FlocFloor = 15.6061 m^2
A_SedFloor = 70.4713 m^2
# Materials List
# Plant Summary Calculations:
HL_PlantTotal := Z_EtTop - H_PlantFreeboard - Z_FiExitWeir
## Display AC variables
AC_EntranceTank =  # no stored result
AC_FlocTank =  # no stored result
AC_OperatorAccess = [
    "-layer m OpWalkwayCon"; "c t 132,132,132"; "OpWalkwayCon"; "  "; "_box 0.15,-0.15,1.54413 -16.61474,11.33894,1.74413"; "-group c OpWalkwayCon y "; "all "; "-layer s 0"; "  "; "-layer f OpWalkwayCon"
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]
AC_SedTank =  # no stored result
AC_ChemTanks =  # no stored result
AC_Filter =  # no stored result
AC_Cdc = [
    "-layer m CdcLayer";
    "c t 0,0,0";
    "CdcLayer";
    "  ";
    "_box -8.93677,9.36907,3.07429 -8.93995,10.26907,3.09969";
    "_box -9.10504,9.36907,3.07429 -9.10822,10.26907,3.09969";
    "_cylinder -8.96895,9.42847,3.14259 0.01067 a -9.57895,9.42847,3.14259";
    "_cylinder -8.95895,9.42847,3.14259 0.00966 a -9.58895,9.42847,3.14259";
    "_zoom w -9.58895,9.4078,3.14259 -9.56895,9.44914,3.14259";
    "_subtract -9.57895,9.43914,3.14259  -9.58895,9.43813,3.14259 "
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]  # AC_MatApply
AI_EtFlocSedFiSed = [
    "-group c * y "; "all "; "-layer s 0"; "  "; "-layer f *"; "  "; "-layer t *Sed*"; "  "; "-layer s *Sed*"; "  "
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]
AI_EtFlocSedFi = [
    "laythw"; "_-view o t"; "-plot y "; "PublishToWeb PNG.pc3"; "User 1 (824.00 x 583.00 Pixels)"; "l n e F"; ""; " ."; "y  [FILEPATH]EtFlocSedFi_t"; "n y"
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]
AI_EtFlocSedFiFloc = [
    "-group c * y "; "all "; "-layer s 0"; "  "; "-layer f *"; "  "; "-layer t *Floc*"; "  "; "-layer s *Floc*"; "  "
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]
AI_EtFlocSedFiFilter = [
    "-group c * y "; "all "; "-layer s 0"; "  "; "-layer f *"; "  "; "-layer t Fi*"; "  "; "-layer s Fi*"; "  "
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]
