# Flocculator Modular Design
# User Inputs
Q_Plant := 20*L/s  # To be left undefined and inputed online by the user
method := "Flocculator"
# From Expert Inputs
Country := 0
Language := 0
# Tabulated Constants
E_Pvc := 0.12 mm
Nu_Water := 1*10^-6*m^2/s  # The kinematic viscosity of water.
Pi_Jet := 0.4
Pi_VenaContractaOrifice := 0.63
E_Concrete := 2 mm
# General Assumptions and Constants
T_PlantWall := 15 cm
W_HumanMin := 0.54 m
S_Fitting := 5 cm  # minimum space between fittings in a tank or fittings and the wall of the tank.
W_ChannelMin := 15 cm  # Minimum channel width for constructability
HL_ChannelMax := 5 cm
# Flocculator
Pi_JSOptimal := 3
Pi_JSMin := 2
ED_Floc := 10.5*mW/kg
# Increased from 6 to 10 on 7/14/2011 to compensate for increase in Pi.Jet from 0.38 (in flocculator) and 0.34 (in ports, pipes, channels) to a new value of 0.4.
Pi_FlocBaffleMin := 1
Pi_FlocBaffleMax := 1.5
# increased to 100 at the request of Dan and Sarah
CP_Floc := 75 m^(2/3)  # value decreased 1/26/12
T_FlocBaffleRigidH := 15 cm
T_FlocBaffleRigidV := 5 cm
H_FlocOption := 0
# The minor loss coefficient is 2. According to measurements at Agalteca and according to
# https://confluence.cornell.edu/display/AGUACLARA/PAHO+Water+Treatment+Publications (page 100 in chapter on flocculation)
K_FlocBaffle := 2.5
# Increased both to provide a safety margin on flocculator head loss and to simultaneously scale back on the actual collision potential we are trying to achieve.
S_FlocBaffleSetBackPlastic := 2 cm
# Sedimentation Tank
B_SedLaunderOrificesEst := 10 cm
ED_SedInlet := ED_Floc
T_SedWeir := 4 cm
HL_SedLaunderBod := 4 cm
V_SedUpBod := 1*mm/s
W_SedPlate := 42 in
W_SedBay := W_SedPlate
Pi_QLaunderOrifices := 0.80
HL_SedWeirMax := 5 cm
Perpendicular_Weir := 0
Parallel_Weir := 1
L_SedLaunderCapExcess := 3 cm
# Stacked Rapid Sand Filter
HL_FiEntrancePipeMax := 10 cm
# Minor Loss Coefficients
# Individual K Values
K_PipeExit := 1
K_PipeEnt := 0.5
K_El90 := 0.9
# Wall Thicknesses
T_ChannelWall := T_PlantWall
# Operator Access
W_DCWalkway := 1 m
# Preliminary Design References
# [reference: MathFunctions.xmcd]
# [reference: PipeDatabase.xmcd]
# [reference: FluidsFunctions.xmcd]
# From Sed Tank Code
ND_SedManifoldMin := 6 in
N_SedTanksMin := 3
ND_SedManifoldMax := 10 in
Q_SedManifoldMax := Q_PipeED(ED_SedInlet, innerdiameter(ND_SedManifoldMax, PS_Default), Pi_VenaContractaOrifice, Pi_Jet) = 9.76441 L/s
fN_SedTanks(Q_Plant) := max(min(ceil(Q_Plant/Q_PipeED(ED_SedInlet, innerdiameter(ND_SedManifoldMin, PS_Default), Pi_VenaContractaOrifice, Pi_Jet)), N_SedTanksMin), ceil(Q_Plant/(2*Q_SedManifoldMax)))
N_SedTanks := fN_SedTanks(Q_Plant) = 3
Q_Sed := Q_Plant/N_SedTanks = 0.00666667 m^3/s
L_SedUpflowMax := Q_PipeED(ED_SedInlet, innerD(ND_SedManifoldMax, PS_Default), Pi_VenaContractaOrifice, Pi_Jet)/(V_SedUpBod*W_SedBay) = 9.15299 m
N_SedBaysTotal := ceil(Q_Plant/(V_SedUpBod*W_SedBay*L_SedUpflowMax)) = 3
N_SedBaysMin := ceil(N_SedBaysTotal/N_SedTanks) = 1
fN_SedBays(Q_Plant) := min(ceil(Q_Plant/(N_SedTanksMin*Q_SedManifoldMax)), 2)
N_SedBaysEst := fN_SedBays(Q_Plant) = 1
N_SedBays := max(N_SedBaysMin, N_SedBaysEst) = 1
W_Sed := N_SedBays*W_SedBay
Q_SedBay := Q_Sed/N_SedBays
Q_SedManifold := Q_SedBay
ND_SedManifold := NominalDiameter(D_PipeED(ED_SedInlet, Q_SedBay, Pi_VenaContractaOrifice, Pi_Jet), PS_Default)
W_SedInletChannelPlumbing := 2*ConRadius(ND_SedManifold) + 2*S_Fitting = 0.400038 m
L_SedUpflowEst := Q_SedBay/(W_SedBay*V_SedUpBod)
ND_SedLaunder := ND_Manifold(Q_SedBay, HL_SedLaunderBod, L_SedUpflowEst, Pi_QLaunderOrifices, PS_Default, Nu_Water, E_Pvc, K_PipeExit, 2*floor(L_SedUpflowEst/B_SedLaunderOrificesEst))
L_SedChannel := N_SedTanks*W_Sed + (N_SedTanks - 1)*T_PlantWall
HL_SedWeirExit := Headloss_weir(Q_Plant, L_SedChannel) = 2.13579 cm
HW_SedInletChannelPlumbing := HL_SedLaunderBod + 2*ConRadius(ND_SedLaunder) + S_Fitting + HL_SedWeirExit = 0.295508 m
A_SedInletChannelED := A_Channel(Q_Plant, ED_SedInlet, Pi_VenaContractaOrifice, Pi_Jet)
[W_SedInletChannelPreWeir; HW_SedInletChannel] :=
    W ← W_SedInletChannelPlumbing
    HW ← HW_SedInletChannelPlumbing
    while W*HW < A_SedInletChannelED
        HW ← HW + 1 mm if HW < W
        W ← W + 1 mm otherwise
    return [W; HW]
EN_InletChannelGeom :=
    hl_weir ← Headloss_weir(Q_Plant, W_SedInletChannelPreWeir)
    Geom_Channel ← Perpendicular_Weir if (hl_weir ≤ HL_SedWeirMax)
    Geom_Channel ← Parallel_Weir otherwise
    return Geom_Channel
W_SedWeirInlet :=
    W_SedInletChannelPreWeir if EN_InletChannelGeom == Perpendicular_Weir
    L_SedChannel otherwise
HL_SedWeirInlet := Headloss_weir(Q_Plant, W_SedWeirInlet) = 0.0213579 m
H_SedWeirInlet := HW_SedInletChannel - HL_SedWeirInlet = 0.27415 m
HW_SedExitChannel := HW_SedInletChannel - HL_SedLaunderBod = 0.255508 m
W_SedInletChannelPostWeir := max(W_ChannelMin, W_HorizChannel(Q_Plant, H_SedWeirInlet, HL_ChannelMax, L_SedChannel, Nu_Water, E_Concrete, 1))
W_SedInletChannel :=
    W_SedInletChannelPreWeir if EN_InletChannelGeom == Perpendicular_Weir
    W_SedInletChannelPreWeir + T_SedWeir + W_SedInletChannelPostWeir if EN_InletChannelGeom == Parallel_Weir
W_SedExitChannelPreWeir := max(W_HorizChannel(Q_Plant, HW_SedExitChannel, HL_ChannelMax, L_SedChannel, Nu_Water, E_Concrete, 1), W_ChannelMin, CapHeight(ND_SedLaunder) + 1.05*L_SedLaunderCapExcess)
K_FiEntrancePipe := K_El90 + K_PipeEnt + K_PipeExit = 2.4
ND_FiEntrancePipeMax := FloorNearest(Pipesizes[index(FloorNearest(W_SedBay/2 - ConRadius(ND_SedManifold) - 2*S_Fitting, Pipesizes[:, 1]), Pipesizes[:, 1]), 0], AvailND) = 8 in
L_FiEntrancePipeEst := W_DCWalkway + W_SedInletChannel + 1 m = 2.59004 m
ND_FiEntrancePipe := min(D_pipeschedule(min(Q_Plant, Q_pipetotal(innerdiameter(AvailND[last(AvailND)], PS_Default), HL_FiEntrancePipeMax, L_FiEntrancePipeEst, Nu_Water, E_Pvc, K_FiEntrancePipe)), PS_Default, HL_FiEntrancePipeMax, L_FiEntrancePipeEst, Nu_Water, E_Pvc, K_FiEntrancePipe), ND_FiEntrancePipeMax) = 8 in
N_FiEntrancePipes := ceil(Q_Plant/Q_pipetotal(innerdiameter(ND_FiEntrancePipe, PS_Default), HL_FiEntrancePipeMax, L_FiEntrancePipeEst, Nu_Water, E_Pvc, K_FiEntrancePipe)) = 1
W_SedExitChannelPostWeir := max(2*ConRadius(ND_FiEntrancePipe)*(N_FiEntrancePipes > 1), W_ChannelMin, W_HorizChannel(Q_Plant, H_SedWeirInlet, HL_ChannelMax, L_SedChannel - W_SedBay/2, Nu_Water, E_Concrete, 1)) = 0.15 m
W_SedExitChannel := W_SedExitChannelPreWeir + T_SedWeir + W_SedExitChannelPostWeir
H_SedHopperHeightNoCoupling := W_SedInletChannel + W_SedExitChannel + T_ChannelWall + 3*T_SedWeir - W_SedInletChannelPreWeir + S_Fitting + 2*ConRadius(ND_SedManifold)
Z_SedFlocWeir := max(Z_SedManifoldPipe + outerradius(ND_SedManifold) + T_ConcreteMin, Z_SedSideSlopes + H_SedSlopesToFlocWeirMin)
Z_SedLamellaBottomMin := Z_SedFlocWeir + H_FlocWeirToLamellaMin
Z_SedLaunderMin := Z_SedLamellaBottomMin + (L_SedPlate + T_SedPlate)*sin(AN_SedPlate) + T_ConcreteMin + ConRadius(ND_SedLaunder)
Z_SedChannelBottomMin := Z_SedLaunderMin + ConRadius(ND_SedLaunder) - H_SedWeirExit
H_SedHopperAngleFit := Z_SedChannelBottomMin - Z_SedManifoldPipe + ConRadius(ND_SedManifold)
H_SedChanBottomTo45Est := H_SedHopperAngleFit - H_SedHopperHeightNoCoupling
EN_SedChannelCoupling :=
    1 if H_SedChanBottomTo45Est > 0
    0 otherwise
Z_SedChannelBottom :=
    Z_SedChannelBottomMin if EN_SedChannelCoupling == 0 or H_SedChanBottomTo45Est ≥ CouplingLength(ND_SedManifold)
    (Z_SedChannelBottomMin + CouplingLength(ND_SedManifold) - H_SedChanBottomTo45Est) otherwise
HW_Sed := Z_SedChannelBottom + HW_SedExitChannel + HL_SedLaunderBod
# Design References
# [reference: Flocculator.xmcd]
# [reference: MtoATranslators.xmcd]
# [reference: MtoATranslatorsWrapped.xmcd]
# [reference: PlumbingF.xmcd]
# Flocculator Code
# CFD results and functions
# Generic
# Ρ
# S
# J
# Vertical
# Width
# Space
# Height
# Horizontal
# Height
# Space
# Width
S_FlocBaffleMin := W_HumanMin = 0.54 m
J(P, S) := P*S
J_Min := J(Pi_JSOptimal, S_FlocBaffleMin) = 1.62 m
H_MaxHorizontal(Q, S, Pi_JS, ED, J) := Q/(S*(J*2*ED/(K_FlocBaffle*α_ε(Pi_JS)))^(1/3))
HW_FlocEndEst :=
    HW_Sed if H_FlocOption == 0
    H_MaxHorizontal(Q_Plant, S_FlocBaffleMin, Pi_JSOptimal, ED_Floc, J_Min) if H_FlocOption == -1
    H_FlocOption*m if H_FlocOption > 0
# Previews
# [reference: LayoutsAC.xmcd]
# Display Variables
Q_Plant = 0.02 m^3/s
AC_Floc =  # error: This variable is undefined.
AI_Preview = [
    "laythw";
    "LoadPlot";
    "_-view o f";
    "-plot n ";
    "AguaClaraPlot";
    "PublishToWeb PNG.pc3";
    "[FILEPATH]Flocculator_Front";
    "n y";
    "_-view o t";
    "-plot n ";
    "AguaClaraPlot";
    "PublishToWeb PNG.pc3";
    "[FILEPATH]Flocculator_Top";
    "n y";
    "_-view o r";
    "-plot n ";
    "AguaClaraPlot";
    "PublishToWeb PNG.pc3";
    "[FILEPATH]Flocculator_Right";
    "n y";
    "shademode x -view swiso";
    "-plot n ";
    "AguaClaraPlot";
    "PublishToWeb PNG.pc3";
    "[FILEPATH]Flocculator_SWIso";
    "n y";
    "shademode 2"
]
