# Code created by Heidi Rausch (her28@cornell.edu)
# SRSF Modular Code
# User Inputs
# To be left undefined and inputed online by the user
Q_Plant := □  # error: This placeholder is empty.
H_WaterEntering := □  # error: This placeholder is empty.
Z_InletChannelBottom := □  # error: This placeholder is empty.
# From Expert Inputs
# [reference: ExpertInputs.xmcd]
# [reference: MathFunctions.xmcd]
# [reference: PipeDatabase.xmcd]
# [reference: MaterialsDatabase.xmcd]
# [reference: FluidsFunctions.xmcd]
# Design References
# From SRSF Design Code
Z_SedWeirExit := H_WaterEntering  # error: This variable is undefined.
W_SedInletChannel := 0 m  # for this code I have defined this as 0m
ND_SedManifold := 8 in  # for this code this is pre-set as the largest pipe diameter that the sed manifold pipe can be
Z_SedChannelBottom := Z_InletChannelBottom  # error: This variable is undefined.
# [reference: StackedRapidSandFilter.xmcd]
# From SRSF Drawing Code
L_Sed := 1 m
N_SedTanks := 1
W_Sed := 1 m
N_SedBays := 1
L_SedOutletVertPipe := 0 m  # for this modular code it doesn't matter what this is so I made it 0m
# [reference: MtoATranslators.xmcd]
# [reference: MtoATranslatorsWrapped.xmcd]
# [reference: ChannelF.xmcd]
# [reference: PlumbingF.xmcd]
# [reference: TankF.xmcd]
# [reference: StairsF.xmcd]
# [reference: DrainChannelF.xmcd]
# [reference: StackedRapidSandFilterAC.xmcd]
# Filter Modular Script Outputs
AC_FilterMod =  # error: This variable is undefined.
# Previews
# [reference: LayoutsAC.xmcd]
AI_Filter = [
    "laythw"; "_-view o t"; "-plot y "; "PublishToWeb PNG.pc3"; "VGA (640.00 x 480.00 Pixels)"; "l n e F"; ""; " ."; "y  [FILEPATH]SRSF_t"; "n y"
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]
# Display Variables
Q_Plant =  # error
