# Sedimentation Tank Modular Design
# User Inputs
Q_Plant := □  # error: This placeholder is empty.  # To be left undefined and inputed online by the user
method := "SedimentationTank"
# From Expert Inputs
Country := 0
Language := 0
# Tabulated Constants
Rho_H2O := 1000*kg/m^3  # Density of water
Nu_Water := 1*10^-6*m^2/s  # The kinematic viscosity of water.
Rho_FB := 1001*kg/m^3  # Density of Flocs
Re_PipeTransition := 2100
E_Pvc := 0.12 mm
E_Concrete := 2 mm
E_ConcreteLedge := 0.014 mm
Pi_Jet := 0.4
# This is an empirically determined factor to make the equation
# correct.
Pi_VenaContractaOrifice := 0.63
P_Atm := 1 atm
Nu_Air := 12*mm^2/s
Rho_Air := 1.204*kg/m^3
# General Assumptions and Constants
# No need to redefine this for the sedimentation tank since Plant.Origin is equal to the origin of the sedimentation tank!
Plant_Origin := [0; 0; 0]*m
T_PlantWall := 15 cm
T_ConcreteMin := 5 cm
EN_DrillSeries := 0  # 0 is English, 1 is metric
EN_TubeSeries := 0
W_HumanMin := 0.54 m
H_HumanAccess := 1.5 m  # The height of the walkway above the drain channel bottom so that someone can walk through the drain channel.
acad_version := 2008
H_Freefall := 0.1 m
H_PlantFreeboard := 0.1*m
EN_PlantDrains := 1  # Set to zero if drains on left, 1 if drains on right
ND_SpacerPipe := 3/4*in
S_Fitting := 5 cm  # minimum space between fittings in a tank or fittings and the wall of the tank.
W_ChannelMin := 15 cm  # Minimum channel width for constructability
W_DeepChannelMin := 30 cm  # Minimum channel width for a deep channel. Assumes you may need to stick your head in the channel.
H_DeepChannelMax := 60 cm  # The maximum depth of a channel, based on having your arm reach to the bottom of the channel.
S_ChannelPipeWall := 2 cm  # Extra space allowed on both sides of pipe to avoid interference with the channel walls
Π_Rectangular := 1/2  # Π.Rectangular is defined as the optimum "height over width ratio" (1/2) for a rectangular open channel
HL_ChannelMax := 5 cm
EN_MatApply := 1  # EN.MatApply equals 0 if materials are not to be applied, otherwise materials are applied
EN_Water := 0  # Equals 1 to draw boxes showing max water levels, 0 normally
EN_FilterWater := 2
# If EN_Water is set to 1, this controls the filter operation mode for which water/sand elevations are drawn. 0 for terminal, 1 for clean bed, and 2 for backwash.
# Flocculator
ED_Floc := 10.5*mW/kg
# Increased from 6 to 10 on 7/14/2011 to compensate for increase in Pi.Jet from 0.38 (in flocculator) and 0.34 (in ports, pipes, channels) to a new value of 0.4.
# Increased from 10 to 10.5 on 5/4/2011 for La Libertad
# Sedimentation Tank
W_SedPlate := 42 in
L_SedPlateSheet := 300 cm
T_SedPlate := 0.2 cm
T_SedWeir := 4 cm
W_SedBay := W_SedPlate
W_Plastic := W_SedPlate
V_SedUpBod := 1*mm/s  # changed from 0.8 mm/s to 1 mm/s  on 8/13/2011 to obtain a better upflow velocity in the bottom of sed tanks for floc blankets.
V_SedCBod := 0.12*mm/s
V_UpFlocHopper := 0.35*mm/s
AN_SedSlope := 50 deg  # Angle of the sloped bottom of the sed tank. Changed from 60 to 50 on 8/13/2011 to reduce construction costs.
AN_SedPlate := 60 deg
AN_SedHopperSlope := 45 deg
HW_SedEst := 2 m
Pi_SedCell := 2
# This is equivalent to saying that all of the kinetic energy contained in the flow will be dissipated over a length scale of 2 times the smallest dimension of flow.
# Inlet Channel
Perpendicular_Weir := 0
Parallel_Weir := 1
ED_SedInlet := ED_Floc
HL_SedWeirMax := 5 cm
# Inlet Manifold
ND_SedManifoldMax := 12 in
B_SedManifoldPortEst := 10 cm
Pi_FlowManifold := 0.8
# Minimum spacing between the side of the manifold pipe and the sloped walls of the tank. Relevant only when the manifold is designed to be set low in the tank, between the sloped walls.
S_SedManToSlopeMin := 10 cm
# Exit Launder
HL_SedLaunderBod := 4 cm  # target headloss in sed launders
Pi_Launder := 0.95
Pi_QLaunderOrifices := 0.80
B_SedLaunderOrificesEst := 10 cm
H_LamellaToLaunder := 5 cm  # Vertical distance from the top of the plate settlers to the bottom of the exit launder.
L_SedLaunderCapExcess := 3 cm  # The additional length needed in the launder cap pipe that is to be inserted into the launder coupling
# Sludge Drain
Pi_QSludgeOrifices := 0.85
B_SedSludgeOrificesEst := 10 cm
Ti_SludgeDrain := 30 min
# Plate Settler Modules
N_SedPlateCol := 1  # number of columns of Plate Settlers - this is a constant!
S_SedPlateMin := 2.5 cm  # This is to prevent floc roll up. We should specify this in a more fundamental way. (based on velocity gradients)
ND_SedModulePipe := 0.5 in  # Diameter of the pipe used to hold the lamina together
ND_SedModulePipeSpacer := 3/4*in  # Diameter of the ledge that serves as a ledge for the plate setter to lie on.
S_SedPlateModuleMin := 2 cm
L_SedPlateCantilevered := 20 cm
# Maximum length of sed plate sticking out past module pipes without any additional support. The goal is to prevent floppy modules that don't maintain constant distances between the plates
# Plate Settler Pipe Frame
ND_SedPlateFrame := 1.5 in
B_SedFrameSupport := 1/3*m
T_Flange := 1 cm
ND_SedFrameStub := 1/2*in
B_SedPlateFrameVertical := 10 cm  # Distance from the wall to the vertical pipe of the main plate settler support frame
D_Flange := 6 in
# Floc Weir
H_SedSlopesToFlocWeirMin := 15 cm
H_FlocWeirToLamellaMin := 10 cm  # Vertical distance from the top of the floc weir to the bottom of the plates.
L_FlocHopperEst := 1 m
H_SedSlotDepth := 2 cm
T_SedWeirBaffle := 3 cm
ND_SedHopperDrain := 1 in
ND_SedHopperViewer := 2 in
ND_SedSkimmer := 2 in
# Wall Thicknesses
T_PltWall := T_PlantWall
T_ChannelWall := T_PlantWall
# Operator Access
W_MpWalkwayMin := 1*m  # combine walkway assumptions!
W_DCWalkway := 1 m  # Width of the walkway above the main plant drain channel.
W_EtWalkwayMin := 1 m  # Width of the floor space between the flocculator and the rapid mix pipe floor cutout next to the entrance tank.
S_Operator := 0.5 m  # Extra space surrounding the chem tanks for the operators to move.
# Minor Loss Coefficients
# Individual K Values
K_PipeExit := 1
K_PipeEnt := 0.5
K_GateValve := 0.39
K_El90 := 0.9
# Stacked Rapid Sand Filter
HL_FiEntrancePipeMax := 10 cm
# Flow Orifice Meter
D_DrillEng :=
    i ← 0
    D_DrillEng[0] ← 1/32*in
    while D_DrillEng[i] ≤ 3/16*in - 1/128*in
        i ← i + 1
        D_DrillEng[i] ← D_DrillEng[i - 1] + 1/128*in
    while D_DrillEng[i] < 1 in - 1/16*in
        i ← i + 1
        D_DrillEng[i] ← D_DrillEng[i - 1] + 1/16*in
    while D_DrillEng[i] < 2 in
        i ← i + 1
        D_DrillEng[i] ← D_DrillEng[i - 1] + 1/4*in
    return D_DrillEng
D_DrillMet :=
    i ← 0
    D_DrillMet[0] ← 0.5 mm
    while D_DrillMet[i] ≤ 5 mm - 0.1 mm
        i ← i + 1
        D_DrillMet[i] ← D_DrillMet[i - 1] + 0.1 mm
    while D_DrillMet[i] < 20 mm
        i ← i + 1
        D_DrillMet[i] ← D_DrillMet[i - 1] + 1 mm
    while D_DrillMet[i] < 50 mm
        i ← i + 1
        D_DrillMet[i] ← D_DrillMet[i - 1] + 2 mm
    return D_DrillMet
D_Drill :=
    D_Drill ← D_DrillEng if EN_DrillSeries == 0
    D_Drill ← D_DrillMet otherwise
# Design References
# [reference: MathFunctions.xmcd]
# [reference: PipeDatabase.xmcd]
# [reference: FluidsFunctions.xmcd]
# [reference: SedimentationTank.xmcd]
# [reference: MtoATranslators.xmcd]
# [reference: MtoATranslatorsWrapped.xmcd]
# [reference: ChannelF.xmcd]
# [reference: PlumbingF.xmcd]
# Sed Tank Code
# [reference: SedimentationTankAC.xmcd]
# Previews
# [reference: LayoutsAC.xmcd]
# Display Variables
Q_Plant =  # error: This variable is undefined.
AC_SedTank =  # error
AI_Preview = [
    "laythw";
    "LoadPlot";
    "_-view o f";
    "-plot n ";
    "AguaClaraPlot";
    "PublishToWeb PNG.pc3";
    "[FILEPATH]SedimentationTank_Front";
    "n y";
    "_-view o t";
    "-plot n ";
    "AguaClaraPlot";
    "PublishToWeb PNG.pc3";
    "[FILEPATH]SedimentationTank_Top";
    "n y";
    "_-view o r";
    "-plot n ";
    "AguaClaraPlot";
    "PublishToWeb PNG.pc3";
    "[FILEPATH]SedimentationTank_Right";
    "n y";
    "shademode x -view swiso";
    "-plot n ";
    "AguaClaraPlot";
    "PublishToWeb PNG.pc3";
    "[FILEPATH]SedimentationTank_SWIso";
    "n y";
    "shademode 2"
]
