# AguaClara Design Tool
Country =  # error: This variable is undefined.
C_ChlorineDoseMax := 2*mg/L
C_ChlorineStock := 50*gm/L
Ti_ChlorineStock := 30 hr
Language =  # error
Country := 0
## References
# Design References
# MathCAD dimension calculations:
# [reference: BasicClientInputs.xmcd]
# [reference: ExpertInputs.xmcd]
# [reference: MathFunctions.xmcd]
# [reference: PipeDatabase.xmcd]
# [reference: MinorLossCoefficients.xmcd]
# [reference: FluidsFunctions.xmcd]
# [reference: SedTank abh35 - mw24.xmcd]
# [reference: Flocculator.xmcd]
# [reference: LFOM.xmcd]
# [reference: LinearCdc.xmcd]
# [reference: ChemStorageCylinders.xmcd]
# [reference: EntranceTankDim.xmcd]
# [reference: Stacked Rapid Sand Filter.xmcd]
# [reference: Materials List.xmcd]
# AutoCAD drawing programs:
# Translators:
# These are the codes that take MathCAD outputs and create AutoCAD scripts that are used to draw the plant (formerly Basics)
# [reference: MtoATranslators.xmcd]
# The wrapped MtoA translator contains the functions that the user will want to access. These functions will draw pieces with full functionality - specifying the location, dimension, and orientation of the object. Also, it contains layer control and subtraction capabilities for grouped objects.
# [reference: MtoATranslators Wrapped.xmcd]
# Plant Elements:
# These are all of the files that draw the fundamental parts of the plants (tees, elbows, tanks, pipes, etc)
# [reference: Channel.xmcd]
# [reference: cross.xmcd]
# [reference: Sludge.xmcd]
# [reference: Manifold.xmcd]
# [reference: pipe.xmcd]
# [reference: elbow.xmcd]
# [reference: tank.xmcd]
# [reference: adapter.xmcd]
# [reference: Tee.xmcd]
# [reference: pvccap.xmcd]
# [reference: LaunderCap.xmcd]
# [reference: ChimneyStops.xmcd]
# [reference: Lamina.xmcd]
# [reference: Stairs.xmcd]
# [reference: DrainChannel.xmcd]
# [reference: Manifold.xmcd]
# Specific Pieces:
# These are the codes that draw the bigger pieces of the plant (the sed tank, floc tank, etc)
# [reference: floctank.xmcd]
# [reference: SedTank.xmcd]
# [reference: Entrance Tank.xmcd]
# [reference: Plant Drain Channel.xmcd]
# [reference: ChemStockCylinders.xmcd]
# [reference: SRSF.xmcd]
# [reference: Operator Access.xmcd]
# Layouts:
# This file will execute at the very end to create multiple views of the entire plant in paperspace
# [reference: Layouts.xmcd]
## All variables displayed must have the standard SI units. They may not have units attached by the user.
# General:
Q_Plant = 0.012 m^3/s
Pi_VenaContractaOrifice = 0.63
T_PlantWall = 0.15 m
W_SedPlate = 1.08 m
T_ConcreteMin = 0.05 m
L_SedPlateSheet = 3.658 m
C_CoagStock = 120 kg/m^3
T_SedPlate = 0.002 m
Ti_CoagStock = 108000 s
T_SedWeir = 0.05 m
C_ChlorineStock = 50 kg/m^3
W_SedBay = 1.08 m
Ti_ChlorineStock = 108000 s
EN_FcmTube = 0
H_PlantFreeboard = 0.1 m
EN_DrillSeries = 1
# Entrance Tank
V_EtUp = 0.008 m/s
H_Et = 1.66173 m
H_EtTop = 0.2 m  # height of the top part of the entrance tank above the hoppers
W_Et = 1.222 m
L_Et = 3.64879 m
ND_EtDrain = 0.0762 m
ZW_Et = 2.39414 m
Z_EtTop = 2.49414 m
ND_EtOverflow = 0.2032 m
Z_Et = 0.832412 m  # elevation of top of slab.
ND_RMPipe = 0.2032 m
Z_EtHopper = 2.19414 m
H_EtHopper = 1.36173 m
N_EtHoppers = 2
AN_EtSlope = 0.785398
L_EtHopper = 1.77399 m
W_EtDC = 0.218269 m  # drain channel under entrance tank dimensions
L_EtDC = 3.64879 m
H_EtDC = 0.0438319 m
# Flow measurement
D_LfomOrifices = 0.019 m
S_LfomRows = 0.02 m
H_LfomOrifice = [0.0095; 0.0295; 0.0495; 0.0695; 0.0895; 0.1095; 0.1295; 0.1495; 0.1695; 0.1895] m
Q_LfomScale = [0; 0.0012; 0.0024; 0.0036; 0.0048; 0.006; 0.0072; 0.0084; 0.0096; 0.0108; 0.012] m^3/s
N_LfomOrifices = [15; 4; 5; 3; 4; 2; 3; 3; 2; 2]
ND_Lfom = 0.2032 m
HL_Lfom = 0.2 m
# Rapid Mix
ED_Tee = 0.0861918 m^2/s^3
Z_LfomOrifices = 2.20364 m  # elevation of the center of
Z_EtExit = 1.77534 m  # elevation of center of pipe exiting the entrance tank and heading toward the flocculator
# Plant Drain Channel:
W_DC = 0.5 m
H_DC =  # error
L_DC = 11.6121 m
# Coag Dose Controller:
Z_CoagTank = 2.79414 m
Z_CoagTankOutlet = 2.89414 m
L_CdcFloatArm = 0.41275 m
Q_CdcMax = 6e-6 m^3/s
L_CdcScaleArm = 0.50165 m
H_StockTankPort =  # error  # Distance between base of stock tanks and outlet
# Flocculator:
H_Floc = 2.15723 m
Z_FlocTank = 0 m  # Look at Flocculator Positioning arrays
N_FlocValves = 2
W_FlocChannel = 0.6 m
Ti_Floc = 1267.91 s  # Fill last channel with bafffles from last channel
H_FlocSlope = 0.0301625 m  # Fix port width to be based on energy dissipation in that channel
ED_Floc = 0.01 m^2/s^3
# Adjust spacing after the number of baffles per channel is known.
V_Floc = 0.144203 m/s  # Check the residence time of the flocculator should be at least 20minutes
HW_FlocEnd = 1.85658 m
ND_FlocValve = 0.0508 m
CP_Floc = 100 m^(2/3)
Ti_FlocDrain = 1800 s
CP_FlocTotal = 117.376 m^(2/3)
N_FlocChannels = 4
G_Floc = 39.3936 1/s
L_FlocTank = 13.6585 m
HL_Floc = 0.200642 m
ED_FlocChannelFirst = 0.0087839 m^2/s^3
HW_FlocStart = 2.05723 m
S_FlocBaffle = [0.138693; 0.138693; 0.138693; 0.139847] m
B_FlocBaffle = [0.140693; 0.140693; 0.140693; 0.141847] m
N_FlocChannelBaffles = [23; 23; 23; 22]
W_FlocPort = [0.138693; 0.138693; 0.138693; 0.146549] m
S_FlocBaffleFirst = 0.138693 m
HL_FlocChannels = [0.0508909; 0.0508909; 0.0508909; 0.0479688] m
L_FlocBaffleLower = 1.64855 m
L_FlocBaffleUpper = 1.89919 m
H_FlocPort = [0.6; 0.6; 0.6; 0.57256] m
Ti_Floc = 1267.91 s  # residence time of the flocculator
N_FlocBaffles = 91
ND_FlocValve = 2 in
EN_FlocBaffle = 1
# Sed Tanks:
N_SedTanks = 4
H_SedBetween =  # error  # Distance from the top of the inlet manifold to the bottom of the ledge supporting the lamella frame
L_Sed = 3.41464 m
N_SedBays = 1  # Number of bays of inlet manifolds in each sed tank
Q_SedBay = 0.003 m^3/s
V_SedUpBod = 0.001 m/s  # design constraints
V_SedCBod = 0.00012 m/s
V_SedUp =  # error  # Actual values from this design
V_SedC =  # error
W_SedSlope =  # error
AN_SedSlope = 0.872665
H_SedBayDivider =  # error
Ti_Sed =  # error
# Sedimentation Tank Sludge Drain:
N_SedSludgeOrifices = 20  # per cell
Ti_SludgeDrain = 1800 s  # Tank Drain time
W_SedSludge = 0.0667248 m  # Width of the sludge channel
B_SedSludgeOrifices = 0.117505 m  # Distance center to center between drain orifices
H_SedSludge = 0.0667248 m  # Depth of the sludge channel
T_SedSludge =  # error
# Thickness of the plate topping the sludge channel
# through which drain holes are formed
W_SedDrainCover = 0.166725 m
D_SedSludgeOrifice = 0.0107341 m  # Diameter of drain orifices
W_SedInletBottom =  # error
N_SedSludgeOrifices = 20
ND_SedSludgeValve =  # error
# Sedimentation Tank Dimensions:
Z_SedSludge = 0.0667248 m  # Height from 0 of the top of the sludge drain
Z_SedSlopes =  # error  # Height from 0 of the top of the inlet manifold
W_Sed = 1.08 m  # Total tank wall height
L_Sed = 3.41464 m  # Total tank length
H_Sed = 1.96577 m
# Sedimentation Tank Inlet Channel:
HW_InletChannel =  # error
EN_InletChannelGeom = 1
W_InletChannel =  # error
L_Channel =  # error
N_SedInletPipes =  # error  # per sed bay
H_InletChannel =  # error
HL_SedWeirInlet = 0.0117426 m
W_SedInletchannelPreweir =  # error
H_SedWeirInlet = 0.275588 m
W_SedWeirInlet = 5.07 m
# Sedimentation Tank Effluent Launder:
N_SedLaunderOrifices = 46  # Number of orifices per launder
N_SedLaunderOrificesRow =  # error  # Number of orifices per row
Z_SedLaunder = 1.75672 m
Q_SedLaunderOrifices = 6.52174e-5 m^3/s
B_SedLaunderOrifices = 0.1 m  # Center to center launder spacing
# More Launder Dimensions
ND_SedLaunder = 0.1016 m
D_SedLaunderOrifice = 0.012 m
L_SedLaunder = 2.43248 m
HL_SedLaunderOrifice = 0.042716 m
# Sedimentation Tank Inlet Manifold:
ND_SedManifold = 0.1524 m
L_Diffuser =  # error
Z_SedManifoldLift =  # error
D_Diffuser =  # error
D_SedManifoldPort = 0.044 m
B_SedManifoldPort = 0.128137 m
N_SedManifoldPorts = 18
L_SedManifoldPipe = 2.39917 m
S_SedManifoldBetween =  # error
ND_SedManifoldDiffuser =  # error
L_SedManifoldDiffuser = 0.631725 m
ED_SedInlet = 0.01 m^2/s^3
Q_SedManifoldPort = 0.000166667 m^3/s
# Exit Channel:
W_ExitChannel =  # error
H_ExitChannel =  # error
L_ExitChannel =  # error
HW_ExitChannel =  # error  # water height in exit channel from base of channel
H_SedWeirExit = 0.203685 m
# Lamella:
L_SedPlate = 0.7316 m
B_SedPlate = 0.027 m  # center to center distance between lamella
S_SedPlate =  # error  # spacing between lamella
N_SedPlates = 78  # Number of Sed Plates per Sedimentation Tank Bay.
N_SedModules = 6  # Number of modules per bay
N_SedModulePlates = 13  # Number of plates per module
AN_SedPlate = 1.0472
V_SedC =  # error
L_SedActive = 2.42949 m
V_SedUp =  # error
Z_SedLaunder = 1.75672 m
H_SedPlate =  # error
H_SedAbove =  # error  # Height of water needed above the lamella
HW_Sed = 1.85658 m
H_Sed = 1.96577 m
Z_Mp =  # error
H_SedBayDivider =  # error
# SRSF:
H_Fi = 3.7959 m
L_Fi = 1.4 m
W_Fi = 0.978446 m
B_FiManifoldBranch = 0.1 m
ND_FiTrunk = 0.1016 m
ND_FiManBranch = 0.0254 m
ND_FiBwTrunk = 0.1524 m
ND_FiBwManBranch = 0.0381 m
ND_FiExitWaste = 0.0762 m
ND_FiBwWeirDrain = 0.1524 m
ND_FiBwDrain = 0.0762 m  # For the box that holds keeps the end of the siphon submerged
ND_FiSandOutlet = 0.0508 m
Ti_FiSand = 609.668 s  # This is the time required to empty the filter of the sand.
ND_FiSiphonAirValve = 0.0508 m
ND_FiSiphon = 0.1524 m
Q_FiSiphonMax = 0.0579688 m^3/s
B_FiSiphonManOrifices = 0.1 m
N_FiSiphonManOrifices = 13
D_FiSiphonManOrifices = 0.0428529 m
Ti_FiBwInitiation = 80.4126 s
H_FiSand = 1.2 m
N_FiLayer = 6
H_FiLayer = 0.2 m
V_FiLayer = 0.00183333 m/s
HL_FiTerminal = 0.451428 m
V_FiBw = 0.011 m/s
HL_FiBwInitiation = 1.588 m
HL_FiBwSS = 1.188 m
D_FiSand = 0.0005 m
N_Fi = 1
Q_Fi = 0.012 m^3/s
W_Slots = 0.0002032 m
B_FiBwManSlot = 0.0047625 m
L_FiBwManSlot = 0.0197669 m
B_FiManSlot = 0.003175 m
L_FiManSlot = 0.0263827 m
N_FiSlotRows = 2
Z_FiBottom = -2.02413 m
Z_FiTop = 1.77177 m
# Weirs
HL_FiWeir = 0.0420986 m
L_FiWeir = 0.746887 m
Z_FiEntranceWeir = 1.67177 m
Z_FiBwWeir = -0.135551 m
Z_FiSiphonInlet = -0.235551 m  # This is the centerline elevation of the siphon orifices
Z_FiExitWeir = 1.1355 m
Z_FiExitBottom = 1.0355 m  # bottom of the filtered water box
Z_FiEntranceBottom = 1.0355 m  # bottom of the entrance box
Z_FiSiphonCoupling = 1.05136 m
Z_FiBwTop = 0.0847518 m
W_FiBwDrain = 0.348518 m
H_FiBwDrain = 0.332357 m
# Materials List:
N_Launders =  # error
L_LaunderPipeTotal =  # error
N_LaunderCouplings =  # error
N_ValveCouplings = 4
N_SedPlatesTotal = 312
N_SedPlatesPerSheet = 5
N_SedPlateSheets = 63
N_Valves = 4
A_EtFloor = 6.01005 m^2
W_FlocWithWalls = 3 m
L_FlocWithWalls = 3.71464 m
Vol_FlocFloor = 1755.17 L
A_FlocFloor = 11.7011 m^2
Vol_SedSlopes =  # error
A_SedWalls =  # error
A_SedFloor = 18.8332 m^2
# Plant Summary Calculations:
HL_PlantTotal := Z_EtTop - H_PlantFreeboard - Z_FiExitWeir
HL_PlantTotal = 1.25865 m
AC_SedTankA :=
    AC_SedTank if last(AC_SedTank) < 598
    submatrix(AC_SedTank, 0, 598, 0, 0) otherwise
AC_FilterA :=
    AC_Filter if last(AC_Filter) < 598
    submatrix(AC_Filter, 0, 598, 0, 0) otherwise
AC_SedTankB :=
    submatrix(AC_SedTank, 599, last(AC_SedTank), 0, 0) if last(AC_SedTank) < 1197
    submatrix(AC_SedTank, 599, 1197, 0, 0) otherwise
AC_FilterB :=
    submatrix(AC_Filter, 599, last(AC_Filter), 0, 0) if last(AC_Filter) < 1197
    submatrix(AC_Filter, 599, 1197, 0, 0) otherwise
AC_SedTankC :=
    submatrix(AC_SedTank, 1198, last(AC_SedTank), 0, 0) if last(AC_SedTank) < 1796
    submatrix(AC_SedTank, 1198, 1796, 0, 0) otherwise
AC_FilterC :=
    submatrix(AC_Filter, 1198, last(AC_Filter), 0, 0) if last(AC_Filter) < 1796
    submatrix(AC_Filter, 1198, 1796, 0, 0) otherwise
AC_ChemTanksA :=
    AC_ChemTanks if last(AC_ChemTanks) < 598
    submatrix(AC_ChemTanks, 0, 598, 0, 0) otherwise
AC_FilterD :=
    submatrix(AC_Filter, 1797, last(AC_Filter), 0, 0) if last(AC_Filter) < 2395
    submatrix(AC_Filter, 1797, 2395, 0, 0) otherwise
AC_FlocTankA :=
    AC_FlocTank if last(AC_FlocTank) < 598
    submatrix(AC_FlocTank, 0, 598, 0, 0) otherwise
AC_ChemTanksB :=
    submatrix(AC_ChemTanks, 1198, last(AC_ChemTanks), 0, 0) if last(AC_ChemTanks) < 1197
    submatrix(AC_ChemTanks, 1198, 1796, 0, 0) otherwise
AC_FlocTankB :=
    submatrix(AC_FlocTank, 599, last(AC_Filter), 0, 0) if last(AC_Filter) < 1197
    submatrix(AC_FlocTank, 599, 1197, 0, 0) otherwise
AC_ChemTanksC :=
    submatrix(AC_ChemTanks, 1198, last(AC_ChemTanks), 0, 0) if last(AC_ChemTanks) < 1796
    submatrix(AC_ChemTanks, 1198, 1796, 0, 0) otherwise
AC_FlocTankC :=
    submatrix(AC_FlocTank, 1198, last(AC_FlocTank), 0, 0) if last(AC_FlocTank) < 1796
    submatrix(AC_FlocTank, 1198, 1796, 0, 0) otherwise
AC_DrainChannelA :=
    AC_DrainChannel if last(AC_DrainChannel) < 598
    submatrix(AC_DrainChannel, 0, 598, 0, 0) otherwise
AC_EntranceTankA :=
    AC_EntranceTank if last(AC_EntranceTank) < 598
    submatrix(AC_EntranceTank, 0, 598, 0, 0) otherwise
AC_DrainChannelB :=
    submatrix(AC_DrainChannel, 1198, last(AC_DrainChannel), 0, 0) if last(AC_DrainChannel) < 1197
    submatrix(AC_DrainChannel, 1198, 1796, 0, 0) otherwise
AC_EntranceTankB :=
    submatrix(AC_EntranceTank, 599, last(AC_EntranceTank), 0, 0) if last(AC_EntranceTank) < 1197
    submatrix(AC_EntranceTank, 599, 1197, 0, 0) otherwise
AC_DrainChannelC :=
    submatrix(AC_DrainChannel, 1198, last(AC_DrainChannel), 0, 0) if last(AC_DrainChannel) < 1796
    submatrix(AC_DrainChannel, 1198, 1796, 0, 0) otherwise
AC_EntranceTankC :=
    submatrix(AC_EntranceTank, 1198, last(AC_EntranceTank), 0, 0) if last(AC_EntranceTank) < 1796
    submatrix(AC_EntranceTank, 1198, 1796, 0, 0) otherwise
AC_OperatorAccessA :=
    AC_OperatorAccess if last(AC_OperatorAccess) < 598
    submatrix(AC_OperatorAccess, 0, 598, 0, 0) otherwise
AC_OperatorAccessB :=
    submatrix(AC_OperatorAccess, 599, last(AC_OperatorAccess), 0, 0) if last(AC_OperatorAccess) < 1197
    submatrix(AC_OperatorAccess, 599, 1197, 0, 0) otherwise
AC_OperatorAccessC :=
    submatrix(AC_OperatorAccess, 1198, last(AC_OperatorAccess), 0, 0) if last(AC_OperatorAccess) < 1796
    submatrix(AC_OperatorAccess, 1198, 1796, 0, 0) otherwise
AC_ZLayoutA :=
    AC_Layout if last(AC_Layout) < 598
    submatrix(AC_Layout, 0, 598, 0, 0) otherwise
AC_ZLayoutB :=
    submatrix(AC_Layout, 1198, last(AC_Layout), 0, 0) if last(AC_Layout) < 1197
    submatrix(AC_Layout, 1198, 1796, 0, 0) otherwise
AC_ZLayoutC :=
    submatrix(AC_Layout, 1198, last(AC_Layout), 0, 0) if last(AC_Layout) < 1796
    submatrix(AC_Layout, 1198, 1796, 0, 0) otherwise
## Make AC variables that are shorter than 598 lines
## Display AC variables
AC_EntranceTankA = [
    "-layer m Cdc"; "c t 129,0,129"; "Cdc"; "  "; "-insert CdcLeverArm.dwg"; "-3.52099,10.3828,2.51904 x 1 1  0"; "-insert CdcLeverArmBracket.dwg"; "-3.48899,9.97005,2.49414 x 1 1  0"; "-insert CdcCht.dwg"; "-4.25119,9.88595,2.61184 x 1 1  0"
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]
AC_EntranceTankB =  # error
AC_EntranceTankC =  # error
AC_FlocTankA = [
    "-layer m FlocTank"; "c t 132,132,132"; "FlocTank"; "  "; "_-view o t _zoom w 0.16,4.76,0 -3.57464,7.93,2.15723 _box 0,4.92,0 -3.41464,7.77,2.15723 _box 0.15,4.77,-0.15 -3.56464,7.92,2.15723 _subtract 0.15,4.77,-0.15  0,4.92,0 "; "_box -3.56464,5.52,0 0.15,5.67,2.15723"; "-array l  R 3 1 0.75"; "-group c FlocTank y "; "all "; "-layer s 0"
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]
AC_FlocTankB =  # error
AC_FlocTankC =  # error
AC_OperatorAccessA = [
    "-layer m OpCoagplatformCon"; "c t 132,132,132"; "OpCoagplatformCon"; "  "; "_-view o f"; "_pline"; "-6.48579,2.80684"; "-6.18579,2.80684"; "-6.18579,2.61526"; "-5.88579,2.61526"
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]
AC_OperatorAccessB =  # error
AC_OperatorAccessC =  # error
AC_SedTankA = [
    "-layer m SedTankCon"; "c t 132,132,132"; "SedTankCon"; "  "; "_-view o r"; "_pline"; "1.08,0"; "0.57336,0"; "0.57336,0.06672"; "0.62336,0.06672"
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]
AC_SedTankB = [
    "-array all  R 1 7 -0.4053"; "-array all  R 2 1 0.88"; "-group c SedPipeFrameStub y "; "all "; "-layer s 0"; "  "; "-layer f SedPipeFrameStub"; "  "; "-layer m SedLamina"; "c t 127,0,255"
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]
AC_SedTankC =  # error
AC_FilterA = [
    "-layer m FiInletchannelCon"; "c t 214,214,214"; "FiInletchannelCon"; "  "; "_zoom w -0.01,-1.24637,1.45828 0.01,-0.93637,1.45828"; "_box -0.01,-1.08637,1.45828 1.09637,-0.98637,1.81387"; "_box 0,-1.23637,1.30828 1.08637,-0.83637,1.81387"; "_subtract 0,-1.23637,1.30828  -0.01,-1.08637,1.45828 "; "rotate3d l  z 0,-1.08637,1.45828 90"; "_box -0.25,-1.08637,1.30828 0.15,-1.23637,1.81387"
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]
AC_FilterB = [
    "_cylinder -3.23171,-0.36708,-1.79555 0.06429 c -3.17471,-0.36708,-1.79555";
    "_cylinder -3.24171,-0.36708,-1.79555 0.05715 c -3.16471,-0.36708,-1.79555";
    "_subtract -3.23171,-0.43137,-1.79555  -3.16471,-0.42423,-1.79555 ";
    "_cylinder -3.29378,-0.36708,-1.79555 0.06429 c -3.23678,-0.36708,-1.79555";
    "_cylinder -3.30378,-0.36708,-1.79555 0.05715 c -3.22678,-0.36708,-1.79555";
    "_subtract -3.29378,-0.43137,-1.79555  -3.30378,-0.42423,-1.79555 ";
    "_cylinder -3.23678,-0.36708,-1.79555 0.05715 c -3.23171,-0.36708,-1.79555";
    "_cylinder -3.24678,-0.36708,-1.79555 0.0525 c -3.22171,-0.36708,-1.79555";
    "_subtract -3.23678,-0.42423,-1.79555  -3.24678,-0.41958,-1.79555 ";
    "_union -3.17471,-0.43137,-1.79555 -3.29378,-0.43137,-1.79555 -3.23171,-0.42423,-1.79555 "
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]
AC_FilterC = [
    "_cylinder -1.78454,-0.36708,0.97344 0.05715 c -1.77948,-0.36708,0.97344";
    "_cylinder -1.79454,-0.36708,0.97344 0.0525 c -1.76948,-0.36708,0.97344";
    "_subtract -1.78454,-0.42423,0.97344  -1.79454,-0.41958,0.97344 ";
    "_union -1.72248,-0.43137,0.97344 -1.84154,-0.43137,0.97344 -1.77948,-0.42423,0.97344 ";
    "rotate3d l  y -1.77948,-0.36708,0.97344 90";
    "_zoom w -1.39024,-1.04637,1.03773 -1.13212,-0.89778,0.90914";
    "_cylinder -1.26118,-0.97208,0.97344 0.06429 c -1.20418,-0.97208,0.97344";
    "_cylinder -1.32324,-0.97208,0.97344 0.06429 c -1.26624,-0.97208,0.97344";
    "_cylinder -1.26624,-0.97208,0.97344 0.05715 c -1.26118,-0.97208,0.97344";
    "_union -1.20418,-1.03637,0.97344 -1.32324,-1.03637,0.97344 -1.26118,-1.02923,0.97344 "
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]
AC_FilterD = [
    "_cylinder -4.76601,-1.17487,-1.94555 0.02858 c -4.73401,-1.17487,-1.94555"; "_cylinder -4.73401,-1.17487,-1.94555 0.02413 c -4.72578,-1.17487,-1.94555"; "_union -4.69378,-1.20345,-1.94555 -4.76601,-1.20345,-1.94555 -4.72578,-1.199,-1.94555 "; "-group c DeleteMe y "; "l "; "-layer t FiTankCon"; "  "; "_subtract"; "g FiTankCon"; " g DeleteMe "
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]
AC_ChemTanksA = [
    "-layer m CoagTanks"; "c t 132,132,132"; "CoagTanks"; "  "; "_-view o t"; "_zoom w -4.96179,10.10215,1.57264 -4.16979,10.89415,2.81684"; "_cylinder -4.56579,10.49815,2.80684 0.386 c -5.78999,10.49815,2.80684"; "rotate3d l  y -4.56579,10.49815,2.80684 90"; "-group c CoagTanks y "; "all "
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]
AC_ChemTanksB =  # error
AC_ChemTanksC =  # error
AC_DrainChannelA =  # error
AC_DrainChannelB =  # error
AC_DrainChannelC =  # error
AC_ZLayoutA = [
    "laythw"; "-layout t AguaClara 0"; "View"; "layout d Layout1"; " d Layout2"; "layout r View"; "TopView"; "layout s TopView"; ".ms"; "z o all "
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]
AC_ZLayoutB =  # error
AC_ZLayoutC =  # error
AC_ZALayoutStart =  # error  # these two lines of code will ensure that the drawing is thawed and given a 3D view even if the layouts don't execute
AC_ZZEnd =  # error
HW_Sed = 1.85658 m
# this variable is displayed to ensure that LabView can read AC.ZZEnd (error in LabView "read mathcad file" code that it misses the last variable)
