# AguaClara Design Tool
Country =  # error: This variable is undefined.
Language =  # error
C_ChlorineDoseMax := 2*mg/L
C_ChlorineStock := 50*gm/L
Ti_ChlorineStock := 30 hr
Country := 0  # Needs to be redefined as zero until we create a database for all countries.
## References
# MathCAD dimension calculations:
# [reference: BasicClientInputs.xmcd]
# [reference: ExpertInputs.xmcd]
# [reference: MathFunctions.xmcd]
# [reference: PipeDatabase.xmcd]
# [reference: FluidsFunctions.xmcd]
# [reference: SedimentationTank.xmcd]
# [reference: Flocculator.xmcd]
# [reference: LFOM.xmcd]
# [reference: LinearCdc.xmcd]
# [reference: ChemStorageTanks.xmcd]
# [reference: EntranceTank.xmcd]
# [reference: StackedRapidSandFilter may.xmcd]
# [reference: DrainChannel.xmcd]
# [reference: MaterialsList.xmcd]
# AutoCAD drawing programs:
# Translators:
# These are the codes that take MathCAD outputs and create AutoCAD scripts that are used to draw the plant (formerly Basics)
# [reference: MtoATranslators.xmcd]
# The wrapped MtoA translator contains the functions that the user will want to access. These functions will draw pieces with full functionality - specifying the location, dimension, and orientation of the object. Also, it contains layer control and subtraction capabilities for grouped objects.
# [reference: MtoATranslatorsWrapped.xmcd]
# Drawing functions:
# [reference: ChannelF.xmcd]
# [reference: PlumbingF.xmcd]
# [reference: TankF.xmcd]
# [reference: StairsF.xmcd]
# [reference: DrainChannelF.xmcd]
# AutoCAD Script Files:
# [reference: FlocculatorAC.xmcd]
# [reference: SedimentationTankAC.xmcd]
# [reference: EntranceTankAC.xmcd]
# [reference: ChemStockTanksACvlk24.xmcd]
# [reference: StackedRapidSandFilterAC may.xmcd]
# [reference: OperatorAccessACvlk24.xmcd]
# [reference: DrainChannelAC.xmcd]
# [reference: CdcACvlk24.xmcd]
# [reference: MaterialsAC.xmcd]
# Layouts:
# This rearranges the plant to optimize the layout
# [reference: PlantLayoutsAC.xmcd]
# This file will execute at the very end to create multiple views of the entire plant in paperspace
# [reference: LayoutsAC.xmcd]
## All variables displayed must have the standard SI units. They may not have units attached by the user.
# General
Q_Plant = 0.032 m^3/s
Pi_VenaContractaOrifice = 0.63
T_PlantWall = 0.15 m
W_SedPlate = 1 m
T_ConcreteMin = 0.05 m
L_SedPlateSheet = 3 m
C_CoagStock = 240 kg/m^3
T_SedPlate = 0.002 m
Ti_CoagStock = 108000 s
T_SedWeir = 0.04 m
C_ChlorineStock = 50 kg/m^3
W_SedBay = 1 m
Ti_ChlorineStock = 108000 s
HL_ChannelMax = 0.05 m  # Eliminate FCM variable from design specs
H_PlantFreeboard = 0.1 m
EN_DrillSeries = 1
# Entrance Tank
V_EtUp = 0.008 m/s
W_EtCapture = 0.724067 m
H_EtOverflowChannel =  # error
H_Et = 1.09532 m
H_EtTop = 0.3 m  # height of the top part of the entrance tank above the hoppers
W_Et = 0.786575 m
L_Et = 6.47087 m
ND_EtDrain = 0.0762 m
HL_Lfom = 0.2 m
ZW_Et = 2.59184 m
Z_EtTop = 2.69184 m
Z_Et = 1.59651 m  # elevation of top of slab.
ND_RMPipe = 0.3048 m
Z_EtHopper = 2.39184 m
H_EtHopper = 0.795325 m
N_EtHoppers =  # error
ND_EtFlowControl = 0.1524 m
L_EtHopper = 1.69145 m
AN_EtSlope = 0.785398
W_EtDC = 0.459648 m  # drain channel under entrance tank dimensions
L_EtDC = 6.77087 m
H_EtDC =  # error  # Give heights of the channel at the beginning and end and change the design specs to explain that it's sloped.
# Flow measurement
D_LfomOrifices = 0.019 m
S_LfomRows = 0.02 m
H_LfomOrifice = [0.0095; 0.0295; 0.0495; 0.0695; 0.0895; 0.1095; 0.1295; 0.1495; 0.1695; 0.1895] m
Q_LfomScale = [0; 0.0032; 0.0064; 0.0096; 0.0128; 0.016; 0.0192; 0.0224; 0.0256; 0.0288; 0.032] m^3/s
N_LfomOrifices =  # error
ND_Lfom = 0.3048 m
HL_Lfom = 0.2 m
# Rapid Mix
ED_Tee = 0.105909 m^2/s^3
Z_LfomOrifices = 2.40134 m  # elevation of the center of
Z_EtExit = 1.80864 m  # elevation of center of pipe exiting the entrance tank and heading toward the flocculator
W_DC = 1 m
# Maybe give the vertical distances below the bottom of the sed tank of the beginning and end of the channel? Calculate them, display, and add to the design specs.
H_DC =  # error
L_DC = 12.1866 m
# Plant Drain Channel
Z_CoagTank = 2.99184 m
Z_CoagTankOutlet = 3.09184 m
L_CdcFloatArm = 0.41275 m
Q_CdcMax = 6.4e-6 m^3/s
L_CdcScaleArm = 0.50165 m
C_CoagDoseMax = 0.06 kg/m^3
B_StockOutlet = 0.1 m
L_CoagCdcTube = 1.29663 m
D_CdcTube = 0.003175 m
N_CoagCdcTubes = 4
HL_Cdc = 0.2 m
L_CdcFloatArm = 0.41275 m
L_CdcScaleArm = 0.50165 m
# Coag Dose Controller
# Flocculator
H_Floc = 2.33895 m
Z_FlocTank = 0 m  # Look at Flocculator Positioning arrays
N_FlocValves = 2
W_FlocChannel = 0.6 m
Ti_Floc = 951.397 s  # Fill last channel with bafffles from last channel
H_FlocSlope = 0.04445 m  # Fix port width to be based on energy dissipation in that channel
ED_Floc = 0.01 m^2/s^3
# Adjust spacing after the number of baffles per channel is known.
V_Floc = 0.183653 m/s  # Check the residence time of the flocculator should be at least 20minutes
HW_FlocEnd = 1.96037 m
ND_FlocValve = 0.0762 m
CP_Floc = 75 m^(2/3)
Ti_FlocDrain = 1800 s
CP_FlocTotal = 116.278 m^(2/3)
N_FlocChannels = 4
G_Floc = 53.5869 1/s
L_FlocTank = 25.8835 m
HL_Floc = 0.278585 m
ED_FlocChannelFirst = 0.00866577 m^2/s^3
HW_FlocStart = 2.23895 m
S_FlocBaffle = [0.290403; 0.290403; 0.290403; 0.290403] m
B_FlocBaffle = [0.292403; 0.292403; 0.292403; 0.292403] m
N_FlocChannelBaffles = [19; 19; 19; 20]
W_FlocPort = [0.290403; 0.290403; 0.290403; 0.290403] m
S_FlocBaffleFirst = 0.290403 m
HL_FlocChannels = [0.0687865; 0.0687865; 0.0687865; 0.0722259] m
L_FlocBaffleLower = 1.52476 m
L_FlocBaffleUpper = 1.85335 m
H_FlocPort = [0.6; 0.6; 0.6; 0.6] m
Ti_Floc = 951.397 s  # residence time of the flocculator
N_FlocBaffles = 77
ND_FlocValve = 3 in
EN_FlocBaffle = 1
# Sed Tanks
N_SedTanks = 3
L_Sed = 6.47087 m
N_SedBays = 2  # Number of bays of inlet manifolds in each sed tank
Q_SedBay = 0.00533333 m^3/s
V_SedUpBod = 0.001 m/s  # design constraints
V_SedCBod = 0.00012 m/s
V_SedUp = 0.00099617 m/s  # Actual values from this design
V_SedC =  # error
W_SedSideSlopes = 0.49165 m
AN_SedSlope = 0.872665
Ti_Sed = 1769.5 s
# Sedimentation Tank Sludge Drain:
N_SedSludgeOrifices = 48  # per cell
Ti_SludgeDrain = 1800 s  # Tank Drain time
W_SedSludge = 0.0921634 m  # Width of the sludge channel
H_SedSludge = 0.0921634 m  # Depth of the sludge channel
# Distance center to center between drain orifices
B_SedSludgeOrifices = 0.110455 m
W_SedDrainCover = 0.132163 m
D_SedSludgeOrifice = 0.00926059 m  # Diameter of drain orifices
N_SedSludgeOrifices = 48
ND_SedSludgePipe = 0.1016 m
# Sedimentation Tank Dimensions:
Z_SedSludge = 0.0921634 m  # Height from 0 of the top of the sludge drain
Z_SedSideSlopes = 0.744789 m
W_Sed = 2 m  # Total tank wall height
L_Sed = 6.47087 m  # Total tank length
H_Sed = 2.0813 m
# Sedimentation Tank Inlet Channel:
EN_InletChannelGeom = 1
HW_SedInletChannel = 0.38815 m
W_SedInletChannel = 0.578538 m
L_SedChannel = 6.3 m
H_SedInletChannel = 0.48815 m
HL_SedWeirInlet = 0.0195369 m
W_SedInletChannelPreWeir = 0.388538 m
H_SedWeirInlet = 0.40815 m
W_SedWeirInlet = 6.3 m
# Sedimentation Tank Effluent Launder:
N_SedLaunderOrifices = 102  # Number of orifices per launder
N_SedLaunderOrificesRow = 51  # Number of orifices per row
Z_SedLaunder = 1.83734 m
Q_SedLaunderOrifices = 5.22876e-5 m^3/s
B_SedLaunderOrifices = 0.1 m  # Center to center launder spacing
# More Launder Dimensions
ND_SedLaunder = 0.1524 m
D_SedLaunderOrifice = 0.011 m
L_SedLaunder = 5.33715 m
HL_SedLaunderOrifice = 0.0388879 m
# Sedimentation Tank Inlet Manifold:
ND_SedManifold = 0.2032 m
L_SedManifoldDiffuser = 0.212836 m
Z_SedManifoldPipe = 0.472297 m
ND_SedDiffuser = 0.0254 m
D_SedManifoldPort = 0.028 m
B_SedManifoldPort = 0.0498125 m
N_SedManifoldPorts = 104
L_SedManifoldPipe = 5.34511 m
ED_SedInlet = 0.01 m^2/s^3
Q_SedManifoldPort = 5.12821e-5 m^3/s
# Exit Channel:
W_SedExitChannel = 0.3485 m
H_SedExitChannel = 0.48815 m
HW_SedExitChannel = 0.34815 m  # water height in exit channel from base of channel
H_SedWeirExit = 0.328331 m
# Lamella:
L_SedPlate = 0.6 m
B_SedPlate = 0.027 m  # center to center distance between lamella
S_SedPlate = 0.025 m  # spacing between lamella
N_SedPlates = 168  # Number of Sed Plates per Sedimentation Tank Bay.
N_SedModules = 21  # Number of modules per bay
N_SedModulePlates = 8  # Number of plates per module
AN_SedPlate = 1.0472
L_SedActive = 5.23541 m
Z_SedLaunder = 1.83734 m
HW_Sed = 1.96037 m
H_Sed = 2.0813 m
# SRSF
H_Fi = 3.90707 m
L_Fi = 0.965881 m
W_Fi = 1.98922 m
B_FiManifoldBranch = 0.1 m
ND_FiTrunk = 0.1524 m
ND_FiManBranch = 0.0254 m
ND_FiBwTrunk = 0.2032 m
ND_FiBwManBranch = 0.0381 m
ND_FiExitWaste = 0.1016 m
ND_FiBwWeirDrain =  # error
ND_FiBwDrain =  # error  # For the box that holds keeps the end of the siphon submerged
ND_FiSandOutlet = 0.0508 m
Ti_FiSand = 855.138 s  # This is the time required to empty the filter of the sand.
ND_FiSiphonAirValve = 0.01905 m
ND_FiSiphon = 0.2032 m
Q_FiSiphonMax = 0.072768 m^3/s
B_FiSiphonManOrifices = 0.121557 m
N_FiSiphonManOrifices = 6
D_FiSiphonManOrifices = 0.0821369 m
Ti_FiBwInitiation = 86.5569 s
H_FiSand = 1.2 m
N_FiLayer = 6
H_FiLayer = 0.2 m
V_FiLayer = 0.00183333 m/s
HL_FiTerminal = 0.4 m
V_FiBw = 0.011 m/s
HL_FiBwInitiation = 1.588 m
HL_FiBwSS = 1.188 m
D_FiSand =  # error
N_Fi = 2
Q_Fi = 0.016 m^3/s
W_Slots = 0.0002032 m
B_FiBwManSlot = 0.0047625 m
L_FiBwManSlot = 0.00953357 m
B_FiManSlot = 0.003175 m
L_FiManSlot = 0.0126989 m
N_FiSlotRows = 2
Z_FiBottom = -2.1029 m
Z_FiTop = 1.80417 m
# Weirs
HL_FiWeir =  # error
L_FiWeir =  # error
Z_FiEntranceWeir = 1.70417 m
Z_FiBwWeir = -0.214325 m
Z_FiSiphonInlet = -0.314325 m  # This is the centerline elevation of the siphon orifices
Z_FiExitWeir = 1.07476 m
Z_FiExitBottom = 0.659791 m  # bottom of the filtered water box
Z_FiEntranceBottom = 0.659791 m  # bottom of the entrance box
Z_FiSiphonCoupling = 0.965218 m
Z_FiBwTop = -0.0145165 m
W_FiBwDrain =  # error
H_FiBwDrain =  # error
N_Launders =  # error
L_LaunderPipeTotal =  # error
N_LaunderCouplings =  # error
N_ValveCouplings = 6
N_SedPlatesTotal = 1008
N_SedPlatesPerSheet = 5
N_SedPlateSheets = 202
N_Valves = 6
A_EtFloor = 7.35706 m^2
W_FlocWithWalls = 3 m
L_FlocWithWalls = 6.77087 m
Vol_FlocFloor = 3199.24 L
A_FlocFloor = 21.3283 m^2
Vol_SedSlopes =  # error
A_SedWalls =  # error
A_SedFloor = 44.6878 m^2
# Materials List
# Plant Summary Calculations:
HL_PlantTotal := Z_EtTop - H_PlantFreeboard - Z_FiExitWeir
HL_PlantTotal = 1.51708 m
## Make AC variables that are shorter than 598 lines
AC_CdcA :=
    AC_Cdc if last(AC_Cdc) < 598
    submatrix(AC_Cdc, 0, 598, 0, 0) otherwise
AC_CdcB :=
    submatrix(AC_Cdc, 599, last(AC_Cdc), 0, 0) if last(AC_Cdc) < 1197
    submatrix(AC_Cdc, 599, 1197, 0, 0) otherwise
AC_CdcC :=
    submatrix(AC_Cdc, 1198, last(AC_Cdc), 0, 0) if last(AC_Cdc) < 1796
    submatrix(AC_Cdc, 1198, 1796, 0, 0) otherwise
AC_SedTankA :=
    AC_SedTank if last(AC_SedTank) < 598
    submatrix(AC_SedTank, 0, 598, 0, 0) otherwise
AC_FilterA :=
    AC_Filter if last(AC_Filter) < 598
    submatrix(AC_Filter, 0, 598, 0, 0) otherwise
AC_SedTankB :=
    submatrix(AC_SedTank, 599, last(AC_SedTank), 0, 0) if last(AC_SedTank) < 1197
    submatrix(AC_SedTank, 599, 1197, 0, 0) otherwise
AC_FilterB :=
    submatrix(AC_Filter, 599, last(AC_Filter), 0, 0) if last(AC_Filter) < 1197
    submatrix(AC_Filter, 599, 1197, 0, 0) otherwise
AC_SedTankC :=
    submatrix(AC_SedTank, 1198, last(AC_SedTank), 0, 0) if last(AC_SedTank) < 1796
    submatrix(AC_SedTank, 1198, 1796, 0, 0) otherwise
AC_FilterC :=
    submatrix(AC_Filter, 1198, last(AC_Filter), 0, 0) if last(AC_Filter) < 1796
    submatrix(AC_Filter, 1198, 1796, 0, 0) otherwise
AC_ChemTanksA :=
    AC_ChemTanks if last(AC_ChemTanks) < 598
    submatrix(AC_ChemTanks, 0, 598, 0, 0) otherwise
AC_FilterD :=
    submatrix(AC_Filter, 1797, last(AC_Filter), 0, 0) if last(AC_Filter) < 2395
    submatrix(AC_Filter, 1797, 2395, 0, 0) otherwise
AC_FlocTankA :=
    AC_FlocTank if last(AC_FlocTank) < 598
    submatrix(AC_FlocTank, 0, 598, 0, 0) otherwise
AC_ChemTanksB :=
    submatrix(AC_ChemTanks, 599, last(AC_ChemTanks), 0, 0) if last(AC_ChemTanks) < 1197
    submatrix(AC_ChemTanks, 599, 1197, 0, 0) otherwise
AC_FlocTankB :=
    submatrix(AC_FlocTank, 599, last(AC_FlocTank), 0, 0) if last(AC_FlocTank) < 1197
    submatrix(AC_FlocTank, 599, 1197, 0, 0) otherwise
AC_ChemTanksC :=
    submatrix(AC_ChemTanks, 1198, last(AC_ChemTanks), 0, 0) if last(AC_ChemTanks) < 1796
    submatrix(AC_ChemTanks, 1198, 1796, 0, 0) otherwise
AC_FlocTankC :=
    submatrix(AC_FlocTank, 1198, last(AC_FlocTank), 0, 0) if last(AC_FlocTank) < 1796
    submatrix(AC_FlocTank, 1198, 1796, 0, 0) otherwise
AC_FlocTankD :=
    submatrix(AC_FlocTank, 1797, last(AC_Filter), 0, 0) if last(AC_FlocTank) < 2395
    submatrix(AC_FlocTank, 1797, 2395, 0, 0) otherwise
AC_DrainChannelA :=
    AC_DrainChannel if last(AC_DrainChannel) < 598
    submatrix(AC_DrainChannel, 0, 598, 0, 0) otherwise
AC_EntranceTankA :=
    AC_EntranceTank if last(AC_EntranceTank) < 598
    submatrix(AC_EntranceTank, 0, 598, 0, 0) otherwise
AC_DrainChannelB :=
    submatrix(AC_DrainChannel, 1198, last(AC_DrainChannel), 0, 0) if last(AC_DrainChannel) < 1197
    submatrix(AC_DrainChannel, 1198, 1796, 0, 0) otherwise
AC_EntranceTankB :=
    submatrix(AC_EntranceTank, 599, last(AC_EntranceTank), 0, 0) if last(AC_EntranceTank) < 1197
    submatrix(AC_EntranceTank, 599, 1197, 0, 0) otherwise
AC_DrainChannelC :=
    submatrix(AC_DrainChannel, 1198, last(AC_DrainChannel), 0, 0) if last(AC_DrainChannel) < 1796
    submatrix(AC_DrainChannel, 1198, 1796, 0, 0) otherwise
AC_EntranceTankC :=
    submatrix(AC_EntranceTank, 1198, last(AC_EntranceTank), 0, 0) if last(AC_EntranceTank) < 1796
    submatrix(AC_EntranceTank, 1198, 1796, 0, 0) otherwise
AC_OperatorAccessA :=
    AC_OperatorAccess if last(AC_OperatorAccess) < 598
    submatrix(AC_OperatorAccess, 0, 598, 0, 0) otherwise
AC_OperatorAccessB :=
    submatrix(AC_OperatorAccess, 599, last(AC_OperatorAccess), 0, 0) if last(AC_OperatorAccess) < 1197
    submatrix(AC_OperatorAccess, 599, 1197, 0, 0) otherwise
AC_OperatorAccessC :=
    submatrix(AC_OperatorAccess, 1198, last(AC_OperatorAccess), 0, 0) if last(AC_OperatorAccess) < 1796
    submatrix(AC_OperatorAccess, 1198, 1796, 0, 0) otherwise
AC_ZZMatApplyA :=
    AC_MatApply if last(AC_MatApply) < 598
    submatrix(AC_MatApply, 0, 598, 0, 0) otherwise
AC_ZZLayoutA :=
    AC_Layout if last(AC_Layout) < 598
    submatrix(AC_Layout, 0, 598, 0, 0) otherwise
AC_ZZMatApplyB :=
    submatrix(AC_MatApply, 1198, last(AC_MatApply), 0, 0) if last(AC_MatApply) < 1197
    submatrix(AC_MatApply, 1198, 1796, 0, 0) otherwise
AC_ZZLayoutB :=
    submatrix(AC_Layout, 1198, last(AC_Layout), 0, 0) if last(AC_Layout) < 1197
    submatrix(AC_Layout, 1198, 1796, 0, 0) otherwise
AC_ZZLayoutC :=
    submatrix(AC_Layout, 1198, last(AC_Layout), 0, 0) if last(AC_Layout) < 1796
    submatrix(AC_Layout, 1198, 1796, 0, 0) otherwise
AC_ZZMatApplyC :=
    submatrix(AC_MatApply, 1198, last(AC_MatApply), 0, 0) if last(AC_MatApply) < 1796
    submatrix(AC_MatApply, 1198, 1796, 0, 0) otherwise
## Display AC variables
AC_EntranceTankA =  # error
AC_EntranceTankB =  # error
AC_EntranceTankC =  # error
AC_FlocTankA = [
    "-layer m FlocTankCon"; "c t 132,132,132"; "FlocTankCon"; "  "; "_-view o t _zoom w 0.16,6.29,0 -6.63087,9.46,2.33895 _box 0,6.45,0 -6.47087,9.3,2.33895 _box 0.15,6.3,-0.15 -6.62087,9.45,2.33895 _subtract 0.15,6.3,-0.15  0,6.45,0 "; "_box -6.62087,7.05,0 0.15,7.2,2.33895"; "-array l  R 3 1 0.75"; "-group c FlocTankCon y "; "all "; "-layer s 0"
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]
AC_FlocTankB =  # error
AC_FlocTankD =  # error
AC_FlocTankC =  # error
AC_OperatorAccessA = [
    "-layer m OpWalkwayCon"; "c t 132,132,132"; "OpWalkwayCon"; "  "; "_-view o f"; "_pline"; "-10.35552,3.00454"; "-10.05552,3.00454"; "-10.05552,2.80311"; "-9.75552,2.80311"
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]
AC_OperatorAccessC =  # error
AC_OperatorAccessB =  # error
AC_SedTankA = [
    "-layer m SedTankCon"; "c t 132,132,132"; "SedTankCon"; "  "; "_-view o r"; "_pline"; "2.05,0"; "1.54608,0"; "1.54608,0.09216"; "1.56608,0.09216"
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]
AC_SedTankB = [
    "-layer f SedSludgeFittingPlu"; "  "; "-layer m SedSludgeAdapterPlu"; "c t 255,0,0"; "SedSludgeAdapterPlu"; "  "; "_zoom w -6.70995,1.42571,0.09931 -6.93791,1.57429,-0.02928"; "_cylinder -6.76693,1.5,0.03501 0.06429 a -6.82393,1.5,0.03501"; "_cylinder -6.75693,1.5,0.03501 0.05715 a -6.83393,1.5,0.03501"; "_subtract -6.76693,1.43571,0.03501  -6.75693,1.44285,0.03501 "
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]
AC_SedTankC = [
    "_zoom w -6.12937,0.04794,0.06494 -5.92397,0.23621,0.23321"; "_cylinder -5.93397,0.14208,0.14907 0.08414 a -6.11937,0.14208,0.14907"; "-group c DeleteMe y "; "l "; "-layer t SedTankCon"; "  "; "_subtract"; "g SedTankCon"; " g DeleteMe "; "-layer f SedTankCon"
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]
AC_ChemTanksA = [
    "-layer m CoagTanks"; "c t 132,132,132"; "CoagTanks"; "  "; "_-view o t"; "_zoom w -8.75252,10.90658,1.88954 -7.76252,11.89657,3.01454"; "_cylinder -8.25752,11.40158,3.00454 0.485 a -9.36252,11.40158,3.00454"; "rotate3d l  y -8.25752,11.40158,3.00454 90"; "-group c CoagTanks y "; "all "
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]
AC_ChemTanksB = [
    "_zoom w -8.68274,11.36186,1.41448 -8.66274,11.40319,1.41448";
    "_subtract -8.67274,11.39319,1.41448  -8.68274,11.39218,1.41448 ";
    "rotate3d l  z -8.25752,11.38253,1.41448 90";
    "_cylinder -8.23847,10.94826,1.41448 0.01067 a -8.86442,10.94826,1.41448";
    "_cylinder -8.22847,10.94826,1.41448 0.00966 a -8.87442,10.94826,1.41448";
    "_zoom w -8.87442,10.92759,1.41448 -8.85442,10.96892,1.41448";
    "_subtract -8.86442,10.95892,1.41448  -8.87442,10.95791,1.41448 ";
    "rotate3d l  z -8.23847,10.94826,1.41448 180";
    "_cylinder -9.18327,11.57678,1.41448 0.01067 a -9.83542,11.57678,1.41448";
    "_cylinder -9.17327,11.57678,1.41448 0.00966 a -9.84542,11.57678,1.41448"
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]
AC_ChemTanksC =  # error
AC_DrainChannelA = [
    "-layer m DC"; "c t 132,132,132"; "DC"; "  "; "3dpoly"; "0.15,10.95,1.44651"; "0.15,10.95,1.06669"; "0.15,11.70965,1.06669"; "0.15,11.70965,1.44651"; "0.15,10.95,1.44651 "
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]
AC_DrainChannelB =  # error
AC_DrainChannelC =  # error
AC_ZZLayoutA = [
    "laythw"; "-layout t AguaClara 0"; "View"; "layout d Layout1"; " d Layout2"; "layout r View"; "TopView"; "layout s TopView"; ".ms"; "z o all "
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]
AC_ZZLayoutB =  # error
AC_ZZLayoutC =  # error
AC_ZPlantLayout = [
    "-layer t Floc*"; "t DC*"; "  "; "mirror3d all  yz -3.23544,0 y  "; "-layer s 0"; "  "; "-layer f Floc*"; "f Sed*"; "f DC*"; "  "
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]
AC_FilterA = [
    "-layer m FiInletchannelCon";
    "c t 214,214,214";
    "FiInletchannelCon";
    "  ";
    "_-view o t _zoom w -7.61087,4.86666,0.65979 -8.26741,8.54158,1.8432 _box -7.77087,5.02666,0.65979 -8.10741,8.38158,1.8432 _box -7.62087,4.87666,0.50979 -8.25741,8.53158,1.8432 _subtract -7.62087,4.87666,0.50979  -7.77087,5.02666,0.65979 ";
    "-group c FiInletchannelCon y ";
    "all ";
    "-layer s 0";
    "  ";
    "-layer f FiInletchannelCon"
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]
AC_FilterD = [
    "_cylinder -7.67787,6.6962,-0.73789 0.06429 a -7.62087,6.6962,-0.73789";
    "_cylinder -7.68787,6.6962,-0.73789 0.05715 a -7.61087,6.6962,-0.73789";
    "_subtract -7.67787,6.6319,-0.73789  -7.61087,6.63905,-0.73789 ";
    "_cylinder -7.73994,6.6962,-0.73789 0.06429 a -7.68294,6.6962,-0.73789";
    "_cylinder -7.74994,6.6962,-0.73789 0.05715 a -7.67294,6.6962,-0.73789";
    "_subtract -7.73994,6.6319,-0.73789  -7.74994,6.63905,-0.73789 ";
    "_cylinder -7.68294,6.6962,-0.73789 0.05715 a -7.67787,6.6962,-0.73789";
    "_cylinder -7.69294,6.6962,-0.73789 0.0525 a -7.66787,6.6962,-0.73789";
    "_subtract -7.68294,6.63905,-0.73789  -7.69294,6.6437,-0.73789 ";
    "_union -7.62087,6.6319,-0.73789 -7.73994,6.6319,-0.73789 -7.67787,6.63905,-0.73789 "
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]
AC_FilterB = [
    "-layer s 0"; "  "; "-layer f FiTrunksPlu"; "  "; "-layer m FiBwtrunkPlu"; "c t 0,255,255"; "FiBwtrunkPlu"; "  "; "_cylinder -11.20772,8.20539,-2.07432 0.10954 a -12.16487,8.20539,-2.07432"; "_cylinder -11.19772,8.20539,-2.07432 0.1006 a -12.17487,8.20539,-2.07432"
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]
AC_FilterC = [
    "-layer f FiEntexitboxesCon";
    "  ";
    "_cylinder -8.69203,8.20539,0.51424 0.10954 a -11.1028,8.20539,0.51424";
    "_cylinder -8.68203,8.20539,0.51424 0.1006 a -11.1128,8.20539,0.51424";
    "_zoom w -11.1128,8.08585,0.51424 -11.0928,8.32493,0.51424";
    "_subtract -11.1028,8.31493,0.51424  -11.1128,8.30598,0.51424 ";
    "rotate3d l  y -8.69203,8.20539,0.51424 270";
    "_cylinder -8.69203,8.20539,-1.89652 0.10954 a -8.69203,8.02759,-1.89652";
    "_cylinder -8.51423,8.02759,-1.89652 0.10954 a -8.86983,8.02759,-1.89652";
    "_zoom w -8.94383,7.89932,-2.02479 -8.44023,8.27939,-1.76826"
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]
HW_Sed = 1.96037 m
# this variable is displayed to ensure that LabView can read AC.ZZEnd (error in LabView "read mathcad file" code that it misses the last variable)
AC_CdcA = [
    "-layer m Cdc"; "c t 125,0,160"; "Cdc"; "  "; "-insert CdcLeverArmwithReducer.dwg"; "-6.20022,11.24208,2.71674 x 1 1  270"; "-insert CdcLeverArmBracket.dwg"; "-6.61297,11.21008,2.69184 x 1 1  270"; "-insert CdcCht.dwg"; "-7.54632,11.24208,2.80954 x 1 1  90"
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]
AC_CdcC =  # error
AC_CdcB =  # error
# AC_ZZMatApplyA | AC_ZZMatApplyB
AC_ZZMatApplyC
Q_Plant = 0.032 m^3/s
