# [reference: MasterProgram.xmcd]
# [reference: Operator Access v2 lxa3.xmcd]
AlumTank1_origin := [
    Et_Origin[0] - L_Et - T_PlantWall - 3*R_AlumTank - 3*T_ChemTankWall - S_TankBorder - S_BetweenTanks;
    Et_Origin[1] + 0.5*(R_AlumTank + T_ChemTankWall);
    Z_EtTop + H_AlumTankAboveHeadTank + HL_ChemDoserMin - B_StockOutlet
]
alumtankscript :=
    layernew ← layer_new("alumtanks", grey)
    viewtop ← viewtop1
    outertankwall ← cylinderC(AlumTank1_origin, R_AlumTank + T_ChemTankWall, H_AlumTank + T_ChemTankWall)
    innertankwall ← cylinderC([AlumTank1_origin[0]; AlumTank1_origin[1]; AlumTank1_origin[2] + T_ChemTankWall], R_AlumTank, H_AlumTank)
    viewtop ← viewtop1
    subtract ← subtractD([AlumTank1_origin[0] - (R_AlumTank + T_ChemTankWall); AlumTank1_origin[1]; AlumTank1_origin[2]], [AlumTank1_origin[0] - R_AlumTank; AlumTank1_origin[1]; AlumTank1_origin[2]])
    SecondTank ← Mirror3dAll("YZ", [AlumTank1_origin[0] + (R_AlumTank + T_ChemTankWall); 0 m; 0 m] + 0.5*S_BetweenTanks, "N")
    union ← union_allA
    layerset0 ← layer_set("0")
    Mirror ← Mirror3dAll("YZ", [Plant_Origin[0] - 1/2*L_Sed; 0 m; 0 m], "Y")
    layerfreeze ← layer_freeze("alumtanks")
    Final ←
        stack(layernew, viewtop, outertankwall, innertankwall, viewtop, subtract, SecondTank, union, layerset0, Mirror, layerfreeze) if mod(N_FlocChannels, 2) == 0
        stack(layernew, viewtop, outertankwall, innertankwall, viewtop, subtract, SecondTank, union, layerset0, Mirror, layerfreeze) otherwise
    return Final
AC_ChemTanks := stack(alumtankscript)
# [component: inputs AC_ChemTanks]
