# [reference: MasterProgram.xmcd]
# Drain Channel
K_Valve := K_Ent + K_ValveGate + K_Exit  # error: This variable is undefined.
V_Valve := sqrt(h_e*2*g/K_valve)  # error: This variable is undefined.
Q_Valve := (π*(D_Valve/2)^2)*V_Valve  # error: This variable is undefined.
Ti_Drain := 30 min
Q_DChannel := Q  # error: This variable is undefined.
Vol_DChannel := Q_DChannel*Ti_Drain/2  # error: This variable is undefined.
Q_Plant = 150 L/s
D_SedDrainValve = 0.0889 m
HW_FlocStart = 1.9847 m
HW_FlocChannel = 1.78505 m
HW_FlocEnd = 1.78505 m
Q_Valves := ((A_FlocValve*(2*g*HW_FlocStart)^(1/2) + A_FlocValve) □ (2*g*HW_FlocChannel)^(1/2))*(A_SedDrainValve*□)  # error: An operator is required.
