# Automated Entrance Tank Code
# [reference: MasterProgram.xmcd]
# [reference: new entrance tank.xmcd]
# [reference: MtoATranslators Wrapped.xmcd]
Et_Origin := Et_origin
W_EtWalkway := 1.5 m  # should we make this a standard (design assumption) for all walkways?
L_RMPipeHorizLower := W_EtWalkway + 2*SocketDepth(ND_RMPipe)  # this length will change when I see the rest of the entrance tank
L_RMPipeVertLower := Z_EtExit - ShortTeeLength(ND_RMPipe) - RMFlocCoupling_Origin[2] - ElbowRadius(ND_RMPipe)
L_RMPipeVertPipeUpper := ZW_RMPipe - Z_EtExit  # should overestimate the needed length of this pipe
L_EtExitOuter := W_EtWalkway  # this length will also probably change when I see the rest of the entrance tank
L_CdcLever := 0.45 m  # assumed from Drew's drawing for now
L_EtExitInner := L_CdcLever + S_Elbow + outerradius(ND_RMPipe) - CouplingLength(ND_RMPipe) - ElbowRadius(ND_RMPipe) + 2*SocketDepth(ND_RMPipe)
# might need to add a constraint to lever arm length to ensure
# that the float isn't obstructed by the hopper in the min flow
# situation
L_EtWeir := ZW_Et - (Et_Origin[2] + ConRadius(ND_EtOverflow)*tan(AN_EtSlope)) + SocketDepth(ND_EtOverflow)
L_EtDrainPipe :=
    (ConRadius(ND_RMPipe)*tan(AN_EtSlope) - CouplingLength(ND_RMPipe) + SocketDepth(ND_RMPipe) - T_PlantWall) if ConRadius(ND_RMPipe)*tan(AN_EtSlope) < CouplingLength(ND_RMPipe) + T_PlantWall
    2*SocketDepth(ND_RMPipe)
# Origin Points
Elbow1_Origin := [0 m; L_RMPipeHorizLower + CouplingLength(ND_RMPipe) - 2*SocketDepth(ND_RMPipe); 0 m] + RMFlocCoupling_Origin
PipeHorizLower_Origin := [0 m; CouplingLength(ND_RMPipe) - 2*SocketDepth(ND_RMPipe); 0 m] + RMFlocCoupling_Origin
PipeVertLower_Origin := [0 m; ElbowRadius(ND_RMPipe); ElbowRadius(ND_RMPipe)] + Elbow1_Origin
RMTee_Origin := [0 m; ShortTeeLength(ND_RMPipe); L_RMPipeVertLower + ShortTeeLength(ND_RMPipe)] + PipeVertLower_Origin
PipeVertUpper_Origin := [0 m; -ShortTeeLength(ND_RMPipe); ShortTeeLength(ND_RMPipe)] + RMTee_Origin
WeirPipe_Origin := [□; □; □]  # error: This placeholder is empty.
# don't forget micromix plate!!!
RMScriptEvenChannels :=
    RMPipeLayer ← layer_new("RMPipe", blue)
    PipeHorizLower ← PipeF(PipeHorizLower_Origin, L_RMPipeHorizLower, [270; 0]*deg, ND_RMPipe, EN_PipeSpec)
    PipeVertLower ← PipeF(PipeVertLower_Origin, L_RMPipeVertLower, [0; 90]*deg, ND_RMPipe, EN_PipeSpec)
    FreezeRMPipe ← FreezeLayer("RMPipe")
    RMTeePipeLayer ← layer_new("RMTeePipe", blue)
    PipeVertUpper ← PipeF(PipeVertUpper_Origin, L_RMPipeVertPipeUpper, [0; 90]*deg, ND_RMPipe, EN_PipeSpec)
    FreezeRMTeePipe ← FreezeLayer("RMTeePipe")
    RMElbowLayer ← layer_new("RMElbow", green)
    Elbow ← ElbowF(Elbow1_Origin, [0; 90; 0]*deg, ND_RMPipe, EN_PipeSpec)
    FreezeRMElbow ← FreezeLayer("RMElbow")
    RMTeeLayer ← layer_new("RMTee", green)
    RMTee ← TeeF(RMTee_Origin, [0; 270; 0]*deg, ND_RMPipe, EN_PipeSpec)
    FreezeRMTee ← FreezeLayer("RMTee")
    return stack(RMPipeLayer, PipeHorizLower, PipeVertLower, FreezeRMPipe, RMTeePipeLayer, PipeVertUpper, FreezeRMTeePipe, RMElbowLayer, Elbow, FreezeRMElbow, RMTeeLayer, RMTee, FreezeRMTee)
# Change ExitCoupling and ExitPipeInner to SUBF functions after getting Akta's code!
# did not add (N)LFOM yet!!!
EtWaterExitScript :=
    EtExitPipeLayer ← layer_new("EtExitPipe", blue)
    ExitPipeOuter ← PipeF(RMTee_Origin, L_EtExitOuter, [270; 0]*deg, ND_RMPipe, EN_PipeSpec)
    ExitPipeInner ← PipeF(RMTee_Origin + [0 m; L_EtExitOuter + CouplingLength(ND_RMPipe) - 2*SocketDepth(ND_RMPipe); 0 m], L_EtExitInner, [270; 0]*deg, ND_RMPipe, EN_PipeSpec)
    FreezeEtExitPipes ← FreezeLayer("EtExitPipe")
    ExitCouplingLayer ← layer_new("EtExitCoupling", green)
    ExitCoupling ← CouplingF(RMTee_Origin + [0 m; L_EtExitOuter + CouplingLength(ND_RMPipe) - 2*SocketDepth(ND_RMPipe); 0 m], [90; 0]*deg, ND_RMPipe, EN_PipeSpec)
    FreezeExitCoupling ← FreezeLayer("EtExitCoupling")
    ExitElbowLayer ← layer_new("EtExitElbow", green)
    ExitElbow ← ElbowF(RMTee_Origin + [0 m; L_EtExitOuter + L_EtExitInner + CouplingLength(ND_RMPipe) - 2*SocketDepth(ND_RMPipe); 0 m], [0; 90; 0]*deg, ND_RMPipe, EN_PipeSpec)
    FreezeExitElbow ← FreezeLayer("EtExitCoupling")
    return stack(EtExitPipeLayer, ExitPipeOuter, ExitPipeInner, FreezeEtExitPipes, ExitCouplingLayer, ExitCoupling, FreezeExitCoupling, ExitElbowLayer, ExitElbow, FreezeExitElbow)
# Must change coupling and pipe to "SUBF" when possible!!!
EtWeirScript :=
    ElbowLayer ← layer_new("EtWeirElbow", green)
    WeirElbow ← ElbowF([-L_EtHopper/2; ConRadius(ND_RMPipe) + S_Elbow; ConRadius(ND_EtOverflow)*tan(AN_EtSlope)] + Et_Origin, [0; 270; 270]*deg, ND_EtOverflow, EN_PipeSpec)
    FreezeElbow ← FreezeLayer("EtWeirCoupling")
    WeirLayer ← layer_new("EtWeirPipe", blue)
    WeirPipe ← PipeF([-L_EtHopper/2; ConRadius(ND_RMPipe) + S_Elbow; ConRadius(ND_EtOverflow)*tan(AN_EtSlope)] + Et_Origin, L_EtWeir, [0; 90]*deg, ND_EtOverflow, EN_PipeSpec)
    FreezeWeir ← FreezeLayer("EtWeirPipe")
    return stack(ElbowLayer, WeirElbow, FreezeElbow, WeirLayer, WeirPipe, FreezeWeir)
# need SUBFs here too!!!
# add chimney stops when possible
EtDrainScript :=
    LocalElbow ← layer_new("EtDrainElbow", green)
    for i ∈ 1 .. N_EtHoppers - 1
        LocalElbow ← stack(LocalElbow, ElbowF([-L_EtHopper/2 - L_EtHopper*i; ConRadius(ND_RMPipe) + S_Elbow; ConRadius(ND_RMPipe)*tan(AN_EtSlope)] + Et_Origin, [0; 270; 270]*deg, ND_RMPipe, EN_PipeSpec))
    FreezeElbow ← FreezeLayer("EtDrainElbow")
    LocalPipe ← layer_new("EtDrainPipe", blue)
    for i ∈ 1 .. N_EtHoppers - 1
        LocalPipe ← stack(LocalPipe, PipeF([
            -L_EtHopper/2 - L_EtHopper*i;
            W_Et/2;
            ConRadius(ND_RMPipe)*tan(AN_EtSlope) - CouplingLength(ND_RMPipe) + 2*SocketDepth(ND_RMPipe)
        ] + Et_Origin, L_EtDrainPipe, [0; 270]*deg, ND_RMPipe, EN_PipeSpec))
    FreezePipe ← FreezeLayer("EtDrainPipe")
    return stack(LocalElbow, FreezeElbow)
# will this loop work if we only have two hoppers?
# Entrance tank dimensions
ND_EtFloat = 6 in
S_EtFloat = 0.1 m
L_Et = 4.08288 m
# x is the width
# y is the length
# z is the height
W_Et := 1 m - T_PlantWall = 0.85 m
Z_EtTop = 2.3943 m
# Coordinates of entrance tank
S_Walkway := 1.3183 m
Et_origin := [
    Plant_Origin[0] + T_PlantWall;
    Plant_Origin[1] + (N_SedTanks*(W_Sed + T_PlantWall) + (N_FlocChannels*(W_FlocChannel + T_PlantWall)) + S_Walkway);
    Z_Et
] = [0.15; 8.9983; 0.911212] m
EtTop_Origin := [
    Plant_Origin[0];
    Plant_Origin[1] + N_SedTanks*(W_Sed + T_PlantWall) + (N_FlocChannels*(W_FlocChannel + T_PlantWall)) + S_Walkway + T_PlantWall;
    Z_Et + H_EtHopper
] = [0; 9.1483; 2.08984] m
Et_dim := [-(L_Et + 2*T_PlantWall); W_Et + T_PlantWall; Z_EtTop - Z_Et] = [-4.38288; 1; 1.48309] m
EtTop_dim := [-L_Et; W_Et; Z_EtTop - Z_EtHopper]
Et_FarCorner := Et_origin + Et_dim = [-4.23288; 9.9983; 2.3943] m
# Scripts
EtTankScript :=
    Layer ← layer_new("EntranceTank", ltgrey)
    EntranceTank ← BoxF(Et_origin, Et_FarCorner, [0; 0; 0]*deg)
    FreezeEntranceTank ← FreezeLayer("EntranceTank")
    UpperBox ← BoxF(EtTop_Origin, EtTop_Origin + EtTop_dim, [0; 0; 0]*deg)
    Group ← GroupAll("DeleteMe")
    Subtract ← SubtractF(["EntranceTank"], "DeleteMe")
    Freeze ← FreezeLayer("EntranceTank")
    return stack(Layer, EntranceTank, FreezeEntranceTank, UpperBox, Group, Subtract, Freeze)
EtHopper_origin := [Et_origin[0] - T_PlantWall; Et_origin[1] + T_PlantWall; Et_origin[2]] = [0; 9.1483; 0.911212] m
Hopper_farcorner := [EtHopper_origin[0] + W_Et; EtHopper_origin[1] + L_EtHopper; Z_EtHopper] = [0.85; 10.5093; 2.08984] m
HopperScript :=
    HopperLayer ← layer_new("Hopper", blue)
    Hopper ← WedgeF(EtHopper_origin, Hopper_farcorner, [90; 0; 0]*deg)
    FreezeHopper ← FreezeLayer("Hopper")
    return stack(HopperLayer, Hopper, FreezeHopper)
# [component: inputs stack(RMScriptEvenChannels, EtWaterExitScript, EtWeirScript, EtDrainScript, EtTankScript, HopperScript)]
