# Floc Hopper Draw Script
# [reference: MasterProgram.xmcd]
origin_box := [0; 0; 0]
dim_box := [L_FlocHopper; T_FlocHopper; H_FlocHopper] = [0.92; 0.5; 0.80279] m
dim_wedge := [(L_FlocHopper - W_FlocHopper)/2; T_FlocHopper; origin_box[2]] = [0.435; 0.5; 0] m
h_wedge := H_FlocHopper
FlocHopperScript :=
    layer1 ← layer_new("flochopper", green)
    viewtop ← viewtop1
    flochopper_box ← box(origin_box, dim_box)
    flochopper_wedge1 ← wedge(origin_box, dim_wedge, h_wedge)
    mirror_wedge ← mirrorD(dim_wedge, [origin_box[0] + L_FlocHopper/2; origin_box[1]], [origin_box[0] + L_FlocHopper/2; T_FlocHopper])
    zoomin ← zoom_win([origin_box[0]; origin_box[1]], [2*dim_box[0]; 2*dim_box[1]])
    subtract_wedge1 ← subtractD([dim_box[0]/2; dim_box[1]; dim_box[2]], [dim_wedge[0]; dim_wedge[1]/2; origin_box[2]])
    subtract_wedge2 ← subtractD([dim_box[0]/2; dim_box[1]], [dim_wedge[0] + W_FlocHopper; dim_wedge[1]/2])
    rotate_flochopper ← rotate_3d(dim_box, [origin_box[0]; T_FlocHopper + origin_box[1]; origin_box[2]], "x", AN_FlocHopper)
    one ← stack(layer1, viewtop, flochopper_box, flochopper_wedge1, mirror_wedge, zoomin, subtract_wedge1, subtract_wedge2, rotate_flochopper)
    return one
# [component: inputs FlocHopperScript]
