# [reference: EtFlocSedFi.xmcd]
# Mathcad to AutoCAD translators:
# The wrapped MtoA translator contains the functions that the user will want to access. These functions will draw pieces with full functionality - specifying the location, dimension, and orientation of the object. Also, it contains layer control and subtraction capabilities for grouped objects.
# Layers
WoodLayer := layer_new("Wood", ltgrey)
SteelLayer := layer_new("Steel", grey)
SelectWoodLayer := SelectLayer("Wood")
SelectSteelLayer := SelectLayer("Steel")
WoodFrz := FreezeLayer("Wood")
SteelFrz := FreezeLayer("Steel")
ThawWood := ThawMultiple(["Wood"])
ThawSteel := ThawMultiple(["Steel"])
vscurrentXray := vscurrent("x")
# Dimensions
L_Pin := 8 cm
W_LBody := 116 cm
W_RBody := 24 cm
L_TopOfPinToTop := 1 cm
T_Body := 5 cm
D_Pin := 1 cm
H_Body := 23 cm
L_SafetySpace := 1 cm
D_ManifoldPipe := 2 in = 5.08 cm
H_LBracket2 := 5 cm
W_LBracket2 := 4 cm
T_LBracket := 2 cm
W_LBracket1 := 2 cm
# Left Body
Body_Origin := [0 m; 0 m; 0 m]
LBody_FarCorner := Body_Origin + [W_LBody; H_Body; -T_Body]
LBodyBox := Box(Body_Origin, LBody_FarCorner)
# Right Body
RBody_Origin := [W_LBody + 1 cm; 0 m; 0 m]
RBody_FarCorner := RBody_Origin + [W_RBody; H_Body; -T_Body]
RBodyBox := Box(RBody_Origin, RBody_FarCorner)
# Stack MathCAD Scripts
WoodBody_Script := stack(WoodLayer, LBodyBox, WoodFrz, SelectWoodLayer, RBodyBox, WoodFrz, ThawWood)
Platform_Script := stack(WoodBody_Script)
# [component: inputs Platform_Script]
