# Draw a single bay within a sed tank with
# Array the single bay then array the whole tanks
Plant_Origin := [0; 0; 0]
SedManCoupling_Origin := [
    -L_Sed + T_ConcreteMin + ConRadius(ND_SedManifold);
    W_Sed - W_SedBay/2;
    Z_SedChannelBottom - SocketDepth(ND_SedManifold)
] + Plant_Origin
SedManNipple_Origin := [0 m; 0 m; -CouplingLength(ND_SedManifold) + SocketDepth(ND_SedManifold)] + SedManCoupling_Origin
SedManFlexCoupling_Origin := [0 m; 0 m; -SocketDepth(ND_SedManifold) - SocketDepthFlex(ND_SedManifold)] + SedManNipple_Origin
SedManVertPipe_Origin := [0 m; 0 m; 2*SocketDepthFlex(ND_SedManifold) - CouplingLengthFlex(ND_SedManifold)] + SedManFlexCoupling_Origin
SedManElbow_Origin := [
    SedManVertPipe_Origin[0] + ElbowRadius(ND_SedManifold);
    SedManVertPipe_Origin[1];
    Z_SedManifoldPipe
]
SedManPipe_Origin := SedManElbow_Origin + [L_SedManifoldPipe; 0 m; 0 m]  # This is the same as the cap origin
# Draw the Concrete components of the sedimentation tank (excluding channels and launder ledge)
SedTankLayer := layer_new("SedTankCon", grey)
# viewrightside1
# ViewRightSide1
SedSlopePolyline :=
    if Z_SedLaunder - (Plant_Origin[2] + H_SedSideSlopes + 2*ConRadius(ND_SedPlateFrame)) > 0
        Pline([
            [Plant_Origin[1] + W_Sed; Plant_Origin[2]];
            [Plant_Origin[1] + W_Sed; Plant_Origin[2]] + [-W_SedBay/2 + W_SedSludge/2; Plant_Origin[2]];
            [Plant_Origin[1] + W_Sed; Plant_Origin[2]] + [-W_SedBay/2 + W_SedSludge/2; H_SedSludge];
            [Plant_Origin[1] + W_Sed; Plant_Origin[2]] + [-W_SedBay/2 + W_SedSludge/2 + T_ConcreteMin; H_SedSludge];
            [Plant_Origin[1] + W_Sed; Plant_Origin[2]] + [-W_SedBay/2 + W_SedSludge/2 + T_ConcreteMin; H_SedSludge + H_SedDrainCoverTotal];
            [Plant_Origin[1] + W_Sed; Plant_Origin[2]] + [-T_ConcreteMin; H_SedSideSlopes];
            [Plant_Origin[1] + W_Sed; 0 m] + [-T_ConcreteMin; Z_LamellaBottom - 2*ConRadius(ND_SedPlateFrame)];
            [Plant_Origin[1] + W_Sed; 0 m] + [0 m; Z_LamellaBottom - 2*ConRadius(ND_SedPlateFrame)];
            [Plant_Origin[1] + W_Sed; Plant_Origin[2]]
        ])
    otherwise
        Pline([
            [Plant_Origin[1] + W_Sed; Plant_Origin[2]];
            [Plant_Origin[1] + W_Sed; Plant_Origin[2]] + [-W_SedBay/2 + W_SedSludge/2; Plant_Origin[2]];
            [Plant_Origin[1] + W_Sed; Plant_Origin[2]] + [-W_SedBay/2 + W_SedSludge/2; H_SedSludge];
            [Plant_Origin[1] + W_Sed; Plant_Origin[2]] + [-W_SedBay/2 + W_SedSludge/2 + T_ConcreteMin; H_SedSludge];
            [Plant_Origin[1] + W_Sed; Plant_Origin[2]] + [-W_SedBay/2 + W_SedSludge/2 + T_ConcreteMin; H_SedSludge + H_SedDrainCoverTotal];
            [Plant_Origin[1] + W_Sed; Plant_Origin[2]] + [-T_ConcreteMin; H_SedSideSlopes];
            [Plant_Origin[1] + W_Sed; Plant_Origin[2]] + [0 m; H_SedSideSlopes];
            [Plant_Origin[1] + W_Sed; Plant_Origin[2]]
        ])
# viewrightside1
ExtrudeSedSlopes := extrude([Plant_Origin[0] + W_Sed; Plant_Origin[1]], -L_Sed)
MirrorSedSlopes := MirrorLast([Plant_Origin[1] + W_Sed - W_SedBay/2; Plant_Origin[2]], [Plant_Origin[1] + W_Sed - W_SedBay/2; Plant_Origin[2] + zc], "n")
# viewtop1
ArraySedSlopes := array_all(N_SedBays, 1, -W_SedBay)
# viewfront1
SedHopper :=
    if H_SedHopperBackSlope > 0 m
        Pline([
            [Plant_Origin[0]; Plant_Origin[2]];
            [Plant_Origin[0]; Plant_Origin[2]] + [-L_SedHopper; 0 m];
            [Plant_Origin[0]; Plant_Origin[2]] + [-L_SedHopper; H_SedFlocWeir];
            [Plant_Origin[0]; Plant_Origin[2]] + [-L_SedHopper + T_ConcreteMin; H_SedFlocWeir];
            [Plant_Origin[0]; Plant_Origin[2]] + [-L_SedHopperBackSlope; ElbowRadius(ND_SedHopperDrain)];
            [Plant_Origin[0]; Plant_Origin[2]] + [0 m; H_SedHopperBackSlope];
            [Plant_Origin[0]; Plant_Origin[2]]
        ])
    if L_SedHopper < T_ConcreteMin + H_SedFlocWeir/tan(AN_SedSlope)
        Pline([
            [Plant_Origin[0]; Plant_Origin[2]];
            [Plant_Origin[0]; Plant_Origin[2]] + [-L_SedHopper; 0 m];
            [Plant_Origin[0]; Plant_Origin[2]] + [-L_SedHopper; H_SedFlocWeir];
            [Plant_Origin[0]; Plant_Origin[2]] + [-L_SedHopper + T_ConcreteMin; H_SedFlocWeir];
            [Plant_Origin[0]; Plant_Origin[2]] + [(T_ConcreteMin + H_SedFlocWeir/tan(AN_SedSlope) - L_SedHopper)*tan(AN_SedSlope); 0 m];
            [Plant_Origin[0]; Plant_Origin[2]] + [0 m; H_SedHopperBackSlope];
            [Plant_Origin[0]; Plant_Origin[2]]
        ])
    otherwise
        Pline([
            [Plant_Origin[0]; Plant_Origin[2]];
            [Plant_Origin[0]; Plant_Origin[2]] + [-L_SedHopper; 0 m];
            [Plant_Origin[0]; Plant_Origin[2]] + [-L_SedHopper; H_SedFlocWeir];
            [Plant_Origin[0]; Plant_Origin[2]] + [-L_SedHopper + T_ConcreteMin; H_SedFlocWeir];
            [Plant_Origin[0]; Plant_Origin[2]]
        ])
# viewfront
ExtrudeSedHopper := extrude([Plant_Origin[0]; Plant_Origin[2]] + [-L_SedHopper + T_ConcreteMin; H_SedFlocWeir], -W_Sed)
# viewtop
SedManifoldLedge := BoxF([-L_SedHopper + Plant_Origin[0]; Plant_Origin[1]; Z_SedManifoldPipe - ConRadius(ND_SedManifold)], [
    -L_SedHopper - T_ConcreteMin + Plant_Origin[0];
    W_Sed + Plant_Origin[1];
    Z_SedManifoldPipe - ConRadius(ND_SedManifold) - T_ConcreteMin
], [0; 0; 0]*deg)
SedManifoldSlope := WedgeF(Plant_Origin - [L_Sed; 0 m; 0 m], [L_SedEndSlope; W_Sed; H_SedEndSlope] + Plant_Origin - [L_Sed; 0 m; 0 m], [0; 0; 0]*deg)
DrawSedTank := Tank(Plant_Origin, [L_Sed; W_Sed; H_Sed], T_PlantWall)
# unionall
FreezeSedTank := FreezeLayer("SedTankCon")
# this cuts a space for the channel on the side closest to the floc tank
SedInletChannelCut := BoxF([-L_Sed + W_SedInletChannel; W_Sed; H_Sed - H_SedInletChannel] + Plant_Origin, [-L_Sed; W_Sed + T_PlantWall; H_Sed] + Plant_Origin, [0; 0; 0]*deg)
SedExitChannelCut := BoxF(Plant_Origin + [0 m; W_Sed; H_Sed - H_SedExitChannel], Plant_Origin + [-W_SedExitChannel; W_Sed + T_PlantWall; H_Sed], [0; 0; 0]*deg)
MirrorSedChannelCuts := Mirror3dAll("zx", [Plant_Origin[0]; Plant_Origin[1] + W_Sed/2], "n")
GroupSedChannelCuts := GroupAll("DeleteMe")
SubtractSedChannelCuts := SubtractF(["SedTankCon"], "DeleteMe")
SedTankScript :=
    stack(SedTankLayer, viewrightside1, SedSlopePolyline, viewrightside1, ExtrudeSedSlopes, MirrorSedSlopes, viewfront1, SedHopper, viewfront1, ExtrudeSedHopper, viewtop1, SedManifoldLedge, SedManifoldSlope, DrawSedTank, union_allA, FreezeSedTank, SedInletChannelCut, SedExitChannelCut, MirrorSedChannelCuts, GroupSedChannelCuts, SubtractSedChannelCuts) if N_SedBays == 1
    stack(SedTankLayer, viewrightside1, SedSlopePolyline, viewrightside1, ExtrudeSedSlopes, MirrorSedSlopes, viewtop1, ArraySedSlopes, viewfront1, SedHopper, viewfront1, ExtrudeSedHopper, viewtop1, SedManifoldLedge, SedManifoldSlope, DrawSedTank, union_allA, FreezeSedTank, SedInletChannelCut, SedExitChannelCut, MirrorSedChannelCuts, GroupSedChannelCuts, SubtractSedChannelCuts) otherwise
# Draw the channels and launder ledge
SedChannelLayer := layer_new("SedChannelsCon", grey)
InletChannelVertBox := BoxF([-L_Sed + W_SedInletChannel; W_Sed; Z_SedChannelBottom] + Plant_Origin, [-L_Sed + W_SedInletChannel + T_ChannelWall; W_Sed - W_SedBay; H_Sed] + Plant_Origin, [0; 0; 0]*deg)
ExitChannelVertBox := BoxF([-W_SedExitChannel; W_Sed; Z_SedChannelBottom] + Plant_Origin, [-W_SedExitChannel - T_ChannelWall; W_Sed - W_SedBay; H_Sed] + Plant_Origin, [0; 0; 0]*deg)
InletChannelHorizBox := BoxF([-L_Sed; W_Sed; Z_SedChannelBottom] + Plant_Origin, [-L_Sed + W_SedInletChannel + T_ChannelWall; W_Sed - W_SedBay; Z_SedChannelBottom - T_ChannelWall] + Plant_Origin, [0; 0; 0]*deg)
ExitChannelHorizBox := BoxF([0 m; W_Sed; Z_SedChannelBottom] + Plant_Origin, [-W_SedExitChannel - T_ChannelWall; W_Sed - W_SedBay; Z_SedChannelBottom - T_ChannelWall] + Plant_Origin, [0; 0; 0]*deg)
# unionall
FreezeSedChannels := FreezeLayer("SedChannelsCon")
SedChannelScript := stack(SedChannelLayer, InletChannelVertBox, ExitChannelVertBox, InletChannelHorizBox, ExitChannelHorizBox, union_allA, FreezeSedChannels)
# Draw the manifold components
SedManLayer := layer_new("SedManifoldPlumbing", blue)
SedManRigidCoupling := CouplingSUBF(SedManCoupling_Origin, [0; 270]*deg, ND_SedManifold, PS_Default, ["SedChannelsCon"])
SedManNipple := PipeSUBF(SedManNipple_Origin, SocketDepthFlex(ND_SedManifold) + SocketDepth(ND_SedManifold), [0; 270]*deg, ND_SedManifold, PS_Default, ["SedChannelsCon"])
SedManFlexCoupling := FlexCouplingF(SedManFlexCoupling_Origin, [0; 270]*deg, ND_SedManifold)
SedManVertPipe := PipeF(SedManVertPipe_Origin, SedManVertPipe_Origin[2] - Z_SedManifoldPipe + ElbowRadius(ND_SedManifold), [0; 270]*deg, ND_SedManifold, PS_Default)
SedManElbow := ElbowF(SedManElbow_Origin, [90; 0; 270]*deg, ND_SedManifold, PS_Default)
SedManPipe := PipeF(SedManPipe_Origin, L_SedManifoldPipe, [0; 0], ND_SedManifold, PS_Default)
SedManCap := CapF(SedManPipe_Origin, [0; 0; 0]*deg, ND_SedManifold)
FreezeSedMan := FreezeLayer("SedManifoldPlumbing")
SedManOrifice := CylinderF(SedManPipe_Origin + [-B_SedManifoldPort/2; 0 m; 0 m], D_SedManifoldPort, ND_SedManifold, [0; 90]*deg)
ArraySedManOrifice := array_all(N_SedManifoldPort, 1, B_SedManifoldPort)
GroupSedManOrifices := GroupAll("DeleteMe")
SubtractSedManOrifices := SubtractF(["SedManifoldPlumbing"], "DeleteMe")
SedManifoldScript := stack(SedManLayer, SedManRigidCoupling, SedManNipple, SedManFlexCoupling, SedManVertPipe, SedManElbow, SedManPipe, SedManCap, FreezeSedMan, SedManOrifice, ArraySedManOrifice, GroupSedManOrifices, SubtractSedManOrifices)
