# [reference: MasterProgram.xmcd]
# [reference: SRSF jcw57.xmcd]
N_Fi := 2
FilterInletTank_origin := [
    Plant_Origin[0];
    Plant_Origin[1] - T_PlantWall - W_ExitChannel;
    Plant_Origin[2] + H_Sed - H_ExitChannel
] = [0; -0.523167; 1.38183] m
FiEntranceBox_dim := [L_FiEntrance; W_FiEntrance; H_FiEntrance]
FiEntranceBox_origin := [
    Plant_Origin[0] - W_ExitChannel - 2*T_PlantWall;
    Plant_Origin[1] - W_FiEntrance - T_PlantWall;
    Z_FiEntranceBottom
]
FiExitBox_dim := [L_FiExit; W_FiExit; H_FiExit]
FiExitBox_origin := [
    Plant_Origin[0] - W_ExitChannel - 4*T_PlantWall - L_FiEntrance;
    Plant_Origin[1] - W_FiExit - T_PlantWall;
    Z_FiExitBottom
]
Fi_origin := [
    Plant_Origin[0] - W_ExitChannel - 6*T_PlantWall - L_FiEntrance - L_FiExit - S_Walkway;
    Plant_Origin[1] - W_Fi - T_PlantWall - OuterDiameterFittingPVC(ND_FiBwTrunk);
    Z_FiBottom
]
Fi_dim := [L_Fi; W_Fi + OuterDiameterFittingPVC(ND_FiBwTrunk); H_Fi] = [1.7; 1.03868; 4.34682] m
FiEnclosureTank_origin := [Plant_Origin[0] - W_ExitChannel - 2*T_PlantWall; Plant_Origin[1] - 2*W_Fi; 0]
FiBwInletCoupling_origin := [
    Plant_Origin[0] - W_ExitChannel - 2*T_PlantWall - 0.5*ND_FiBwTrunk - T_ConcreteMin;
    Plant_Origin[1] - T_PlantWall - 0.5*ND_FiBwTrunk - T_ConcreteMin;
    Z_FiEntranceBottom - T_PlantWall/2
]
FiInletCoupling1_origin := [
    Plant_Origin[0] - W_ExitChannel - 2*T_PlantWall - L_FiEntrance + (0.5*ND_FiTrunk) + T_ConcreteMin;
    Plant_Origin[1] - T_PlantWall - 0.5*ND_FiTrunk - T_ConcreteMin;
    Z_FiEntranceBottom - T_PlantWall/2
]
FiInlet
Dist_Fi := 2*T_ConcreteMin + OuterDiameterFittingPVC(ND_DistPipe) = 0.28415 m  # Distance between inlet and outlet boxes
Filterinletchannelscript :=
    layer2 ← layer_new("Filter Inlet Channel", ltgrey)
    channel1 ← ChannelDrawing([Plant_Origin[0] - W_ExitChannel; 0; Plant_Origin[2] + H_Sed - H_ExitChannel], [W_FiEntrance + W_FiExit + Dist_Fi + 4*T_PlantWall; W_ExitChannel; H_ExitChannel], T_ChannelWall)
    rotate1 ← rotate([Plant_Origin[0] - W_ExitChannel; 0; Plant_Origin[2] + H_Sed - H_ExitChannel], 270)
    bigunion ← union_allA
    layerset ← layer_set("0")
    layerfreeze2 ← layer_freeze("Filter Inlet Channel")
    one ← stack(layer2, channel1, rotate1, bigunion, layerset, layerfreeze2)
    return ← one
Fiexitboxscript :=
    layernewfob ← layer_new("SRSF exit boxes", ltgrey)
    tankbw ← Tank(FiExitBox_origin, FiExitBox_dim, T_PlantWall)
    tankbw2 ← Tank([FiExitBox_origin[0]; FiExitBox_origin[1] - W_FiExit - 2*T_PlantWall - Dist_Fi; FiExitBox_origin[2]], FiExitBox_dim, T_PlantWall)
    layerset ← layer_set("0")
    layerfreezefob ← layer_freeze("SRSF exit boxes")
    one ← stack(layernewfob, tankbw, tankbw2, layerset, layerfreezefob)
    return one
Fiinletboxscript :=
    layernewfilt ← layer_new("SRSF inlet boxes", ltgrey)
    tankfilt ← Tank(FiEntranceBox_origin, FiEntranceBox_dim, T_PlantWall)
    tankfilt2 ← Tank([
        FiEntranceBox_origin[0];
        FiEntranceBox_origin[1] - W_FiEntrance - 2*T_PlantWall - Dist_Fi;
        FiEntranceBox_origin[2]
    ], FiEntranceBox_dim, T_PlantWall)
    bwcoupling1 ← CouplingSUBF([FiBwInletCoupling_origin[0]; FiBwInletCoupling_origin[1]; FiBwInletCoupling_origin[2]], [0; 90]*deg, ND_FiBwTrunk, EN_PipeSpec, ["SRSF inlet boxes"])
    bwcoupling2 ← CouplingSUBF([
        FiBwInletCoupling_origin[0];
        FiEntranceBox_origin[1] - W_FiEntrance - 2*T_PlantWall - Dist_Fi + (0.5*ND_FiBwTrunk) + T_ConcreteMin;
        FiBwInletCoupling_origin[2]
    ], [0; 90]*deg, ND_FiBwTrunk, EN_PipeSpec, ["SRSF inlet boxes"])
    layerset ← layer_set("0")
    layerfreezefilt ← layer_freeze("SRSF inlet boxes")
    one ← stack(layernewfilt, tankfilt, tankfilt2, bwcoupling1, bwcoupling2, layerset, layerfreezefilt)
    return one
Fiscript :=
    layernewfilt ← layer_new("SRSF filters", ltgrey)
    tankfilt ← Tank(Fi_origin, Fi_dim, T_PlantWall)
    tankfilt2 ← Tank([Fi_origin[0]; Fi_origin[1] - Fi_dim[1] - 2*T_PlantWall; Fi_origin[2]], Fi_dim, T_PlantWall)
    layerset ← layer_set("0")
    layerfreezefilt ← layer_freeze("SRSF filters")
    one ← stack(layernewfilt, tankfilt, tankfilt2, layerset, layerfreezefilt)
    return one
AC_Filter := stack(Filterinletchannelscript, Fiexitboxscript, Fiinletboxscript, Fiscript)
# [component: inputs AC_Filter]
□, □, □, EN_PipeSpec, "SRSF inlet boxes"
AngleVector := [0; 0]*deg
OriginPoint := [FiBwInletCoupling_origin[0]; FiBwInletCoupling_origin[1]; FiBwInletCoupling_origin[2]]
ND := ND_FiBwTrunk
SubtractionLayers := □  # error: This placeholder is empty.
EN := EN_PipeSpec
CouplingSUBF(OriginPoint, AngleVector, ND, EN, SubtractionLayers) :=
    Zoom ← zoom_win([
        OriginPoint[0] - CouplingLength(ND) - zc;
        OriginPoint[1] - ConRadius(ND) - zc;
        OriginPoint[2] + ConRadius(ND)
    ], [
        OriginPoint[0] + CouplingLength(ND) + zc;
        OriginPoint[1] + ConRadius(ND) + zc;
        OriginPoint[2] - ConRadius(ND)
    ])
    RightSocketOuter ← cylinderD([OriginPoint[0]; OriginPoint[1]; OriginPoint[2]], ConRadius(ND), [OriginPoint[0] + SocketDepth(ND); OriginPoint[1]; OriginPoint[2]])
    LeftSocketOuter ← cylinderD([OriginPoint[0] - CouplingLength(ND) + SocketDepth(ND); OriginPoint[1]; OriginPoint[2]], ConRadius(ND), [OriginPoint[0] - CouplingLength(ND) + 2*SocketDepth(ND); OriginPoint[1]; OriginPoint[2]])
    PipeOuter ← cylinderD([OriginPoint[0] - CouplingLength(ND) + 2*SocketDepth(ND); OriginPoint[1]; OriginPoint[2]], outerradius(ND), [OriginPoint[0]; OriginPoint[1]; OriginPoint[2]])
    UnionPieces ← UnionMultiple([
        [OriginPoint[0] + SocketDepth(ND); OriginPoint[1] - ConRadius(ND); OriginPoint[2]];
        [
            OriginPoint[0] - CouplingLength(ND) + SocketDepth(ND);
            OriginPoint[1] - ConRadius(ND);
            OriginPoint[2]
        ];
        [OriginPoint[0]; OriginPoint[1] - outerradius(ND); OriginPoint[2]]
    ])
    Rotate ← [Rotate3DLast(OriginPoint, "z", AngleVector[0]); Rotate3DLast(OriginPoint, "y", AngleVector[1])]
    Final ← stack(Zoom, RightSocketOuter, LeftSocketOuter, PipeOuter, UnionPieces)
    for i ∈ 0 .. 1
        Final ← stack(Final, Rotate[i]) if AngleVector[i]
    Group ← GroupLast("DeleteMe")
    Local ← stack(Final, Group, SubtractF(SubtractionLayers, "DeleteMe"))
    RightSocketInner ← cylinderD([OriginPoint[0] - zc; OriginPoint[1]; OriginPoint[2]], outerradius(ND), [OriginPoint[0] + SocketDepth(ND) + zc; OriginPoint[1]; OriginPoint[2]])
    SubtractRightSocket ← subtractD([OriginPoint[0]; OriginPoint[1] - ConRadius(ND); OriginPoint[2]], [OriginPoint[0] + SocketDepth(ND) + zc; OriginPoint[1] - outerradius(ND); OriginPoint[2]])
    LeftSocketInner ← cylinderD([OriginPoint[0] - CouplingLength(ND) + SocketDepth(ND) - zc; OriginPoint[1]; OriginPoint[2]], outerradius(ND), [OriginPoint[0] - CouplingLength(ND) + 2*SocketDepth(ND) + zc; OriginPoint[1]; OriginPoint[2]])
    SubtractLeftSocket ← subtractD([
        OriginPoint[0] - CouplingLength(ND) + SocketDepth(ND);
        OriginPoint[1] - ConRadius(ND);
        OriginPoint[2]
    ], [
        OriginPoint[0] - CouplingLength(ND) + SocketDepth(ND) - zc;
        OriginPoint[1] - outerradius(ND);
        OriginPoint[2]
    ])
    PipeInner ← cylinderD([OriginPoint[0] - CouplingLength(ND) + 2*SocketDepth(ND) - zc; OriginPoint[1]; OriginPoint[2]], innerdiameter(ND, EN)/2, [OriginPoint[0] + zc; OriginPoint[1]; OriginPoint[2]])
    SubtractPipe ← subtractD([
        OriginPoint[0] - CouplingLength(ND) + 2*SocketDepth(ND);
        OriginPoint[1] - outerradius(ND);
        OriginPoint[2]
    ], [
        OriginPoint[0] - CouplingLength(ND) + 2*SocketDepth(ND) - zc;
        OriginPoint[1] - innerdiameter(ND, EN)/2;
        OriginPoint[2]
    ])
    Draw ← stack(Local, RightSocketOuter, RightSocketInner, SubtractRightSocket, LeftSocketOuter, LeftSocketInner, SubtractLeftSocket, PipeOuter, PipeInner, SubtractPipe, UnionPieces)
    for i ∈ 0 .. 1
        Draw ← stack(Draw, Rotate[i]) if AngleVector[i] ≠ 0
    return Draw
