# Automated Design: AutoCAD: Flocculation Tank
EN_FlocHoriz =  # error: This variable is undefined.
H_FlocOption =  # error
Q_Plant =  # error
# Dimensions
floc_origin := [
    Plant_Origin[0];
    Plant_Origin[1] + N_SedTanks*(W_Sed + T_PlantWall);
    Plant_Origin[2] + (HW_Sed - HW_FlocChannel)
]
totalfloc_dim := [
    L_FlocTank/N_FlocChannels;
    (N_FlocChannels*W_FlocChannel) + ((N_FlocChannels - 1)*T_PlantWall);
    H_Floc
]
wall_dim := [totalfloc_dim[0] + (2*T_PlantWall); T_PlantWall; totalfloc_dim[2]]
L_Sed =  # error
flocport_dim :=
    for i ∈ 0 .. (N_FlocChannels - 2)
        flocport_dim[0, i] ← [W_FlocPort[N_FlocChannels - 2 - i]; T_PlantWall; (-H_FlocPort)[i]]
    return flocport_dim
# Floc ports connect the channels.
channelopening_dim := [
    W_SedInletchannelPreweir;
    T_PlantWall;
    (H_Floc - H_Sed) + H_InletChannel + (HW_Sed - HW_FlocChannel)
]
# normally want a 30deg slope, unless baffle is too close | set slope to be 5 cm away from nearest baffle
flocdrainslope_dim :=
    [sqrt(3)*H_FlocSlope; -D_FlocValve; -H_FlocSlope] if sqrt(3)*H_FlocSlope < W_FlocPort[0] + S_FlocPortGap - 5 cm
    [W_FlocPort[0] + S_FlocPortGap - 5 cm; -D_FlocValve; -H_FlocSlope] otherwise
Port_Dim := [T_FlocBaffle + 2*zc; L_BafflePort + L_Slot; L_BafflePort]
FlocCoupling_Origin := [
    {
        (floc_origin[0] - outerradius(ND_RMPipe) - S_Fitting) if mod(N_FlocChannels, 2) == 1
        (floc_origin[0] - L_Sed + outerradius(ND_RMPipe) + S_Fitting) otherwise
    };
    floc_origin[1] + N_FlocChannels*W_FlocChannel + T_PlantWall*(N_FlocChannels - 1) + SocketDepth(ND_RMPipe);
    floc_origin[2] + outerradius(ND_RMPipe) + S_Fitting
]
# Origin Points
floc_origin := [
    Plant_Origin[0];
    Plant_Origin[1] + N_SedTanks*(W_Sed + T_PlantWall);
    Plant_Origin[2] + (HW_Sed - HW_FlocChannel)
]
wall_origin := [floc_origin[0] - totalfloc_dim[0] - T_PlantWall; floc_origin[1] + W_FlocChannel; floc_origin[2]]
flocport_origin :=
    for i ∈ 0 .. (N_FlocChannels - 2)
        if mod(i, 2) == 0
            flocport_origin[0, i] ← [
                floc_origin[0] - W_FlocPort[N_FlocChannels - 2 - i];
                floc_origin[1] + (W_FlocChannel*(1 + i)) + (T_PlantWall*i);
                floc_origin[2] + H_FlocPort[i]
            ]
        otherwise
            flocport_origin[0, i] ← [
                floc_origin[0] - totalfloc_dim[0];
                floc_origin[1] + (W_FlocChannel*(1 + i)) + (T_PlantWall*i);
                floc_origin[2] + H_FlocPort[i]
            ]
    return flocport_origin
# The flocport origins were set to start at the top height of the ports themselves (added to the origin otherwise it disappears).  This changes the flocports to be at the bottom of the channel dividing walls instead of at the top (more structurally sound).
flocport_origin =  # error
# The x values were negative. I don't understand how the change in the floc code caused this problem.
# The Channel Opening was changed in the z-direction so that the bottom opening aligned with the bottom of the tank (for the same reason as the flocports).
channelopening_origin := [
    floc_origin[0] - totalfloc_dim[0];
    floc_origin[1] - T_PlantWall;
    floc_origin[2] + totalfloc_dim[2] - channelopening_dim[2]
]
# "L" origins are for the last channel only
LargeCap_Origin := [
    -CapDiameter(1.5 in)/2 + outerradius(1.5 in) + floc_origin[0] - L_Sed + X_FlocBaffles[0, 0];
    (floc_origin[1] + W_FlocChannel*N_FlocChannels + T_PlantWall*(N_FlocChannels - 1) - W_FlocChannel/3);
    floc_origin[2] + 3*S_ModulePipesV + S_FlocBaffle[last(S_FlocBaffle)]*Pi_FlocBaffle
]
LargeCapL_Origin := [
    -CapDiameter(1.5 in)/2 + outerradius(1.5 in) + floc_origin[0] - L_Sed + X_FlocBaffles[0, cols(X_FlocBaffles) - 1];
    floc_origin[1] + W_FlocChannel - W_FlocChannel/3;
    floc_origin[2] + 3*S_ModulePipesV + S_FlocBaffle[last(S_FlocBaffle)]*Pi_FlocBaffle
]
FittedCap_Origin := LargeCap_Origin + [
    T_FlocBaffle + CapDiameter(0.5 in)/2 - outerradius(0.5 in) + CapDiameter(1.5 in)/2 - outerradius(1.5 in);
    0 m;
    0 m
]
FittedCapL_Origin := LargeCapL_Origin + [
    T_FlocBaffle + CapDiameter(0.5 in)/2 - outerradius(0.5 in) + CapDiameter(1.5 in)/2 - outerradius(1.5 in);
    0 m;
    0 m
]
LongPipe_Origin := FittedCap_Origin + [L_FlocModuleLong[0]; 0 m; 0 m]
LongPipeL_Origin := FittedCapL_Origin + [L_FlocModuleLong[last(L_FlocModuleLong)]; 0 m; 0 m]
ModuleCoupling_Origin := LongPipe_Origin + [CouplingLength(0.5 in) - 2*SocketDepth(0.5 in); 0 m; 0 m]
ModuleCouplingL_Origin := LongPipeL_Origin + [CouplingLength(0.5 in) - 2*SocketDepth(0.5 in); 0 m; 0 m]
ConnectorPipe_Origin := ModuleCoupling_Origin + [L_FlocModuleConnector[0]; 0 m; 0 m]
ConnectorPipeL_Origin := ModuleCouplingL_Origin + [L_FlocModuleConnector[last(L_FlocModuleConnector)]; 0 m; 0 m]
FlocAdapter_Origin :=
    [-L_Sed - CouplingLength(ND_FlocValve) - T_PlantWall; Y_FlocDrainValves[0]; floc_origin[2]] if EN_PlantDrains == 0
    otherwise
        [
            Plant_Origin[0] + CouplingLength(ND_FlocValve) - SocketDepth(ND_FlocValve) + T_PlantWall + SocketDepth(ND_FlocValve);
            Y_FlocDrainValves[0];
            floc_origin[2]
        ]
FlocValve_Origin := FlocAdapter_Origin + [
    MaleAdapterLength(ND_FlocValve) - SocketDepth(ND_FlocValve) - 2*ValveSocket(ND_FlocValve) + ValveLength(ND_FlocValve);
    0 m;
    0 m
]
FlocDrainNipple_Origin := FlocValve_Origin + [SocketDepth(ND_FlocValve); 0 m; 0 m]
# assumes drains are on right
# Flocculation Tank Script
FlocTankLayer := layer_new("FlocTank", grey)
DrawFlocTank := Tank(floc_origin, totalfloc_dim, T_PlantWall)
DrawFlocWall := BoxF(wall_origin, wall_origin + wall_dim, [0; 0; 0]*deg)
ArrayFlocWall := ArrayLast(N_FlocChannels - 1, 1, W_FlocChannel + T_PlantWall)
FlocChannelPorts :=
    Local ← FreezeLayer("FlocTank")
    for i ∈ 0 .. (N_FlocChannels - 2)
        Local ← stack(Local, BoxF(flocport_origin[0, i], flocport_origin[0, i] + flocport_dim[0, i], [0; 0; 0]*deg))
FlocSubtractionPieces :=
    Final ← BoxF(channelopening_origin, channelopening_origin + channelopening_dim, [0; 0; 0]*deg)
    if L_Slot ≠ 0 m
        for j ∈ 0 .. (N_FlocChannels - 1)
            for i ∈ 0 .. (N_FlocChannelBaffles[j] - 1)
                Slot_Origin[i] ← [floc_origin[0] - L_Sed; -L_Slot; floc_origin[2]] + [X_FlocBaffles[i, j]; Y_FlocBaffles[0, j]; Z_FlocBaffles[i, j]]
                Slot_Dim[i] ← [T_FlocBaffle; W_FlocChannel + 2*L_Slot; H_Floc - Z_FlocBaffles[i, j]]
                DrawSlot ← BoxF(Slot_Origin[i], Slot_Origin[i] + Slot_Dim[i], [0; 0; 0]*deg)
                Final ← stack(Final, DrawSlot)
    for i ∈ 0 .. last(Y_FlocDrainValves)
        Wedge ←
            WedgeF([-L_Sed; Y_FlocDrainValves[i] + 0.5*D_FlocValve; floc_origin[2]], flocdrainslope_dim + [-L_Sed; Y_FlocDrainValves[i] + 0.5*D_FlocValve; floc_origin[2]], [0; 0; 0]*deg) if EN_PlantDrains == 0
            WedgeF([Plant_Origin[0]; Y_FlocDrainValves[i] + 0.5*D_FlocValve; floc_origin[2]], [-flocdrainslope_dim[0]; flocdrainslope_dim[1]; flocdrainslope_dim[2]] + [Plant_Origin[0]; Y_FlocDrainValves[i] + 0.5*D_FlocValve; floc_origin[2]], [0; 0; 0]*deg) otherwise
        Final ← stack(Final, Wedge)
    return Final
GroupFlocSubtractionPieces := GroupAll("DeleteMe")
SubtractFlocTankPieces := SubtractF(["FlocTank"], "DeleteMe")
FlocTankScript := stack(FlocTankLayer, DrawFlocTank, DrawFlocWall, ArrayFlocWall, FlocChannelPorts, FlocSubtractionPieces, GroupFlocSubtractionPieces, SubtractFlocTankPieces)
FlocBaffleLayerV := layer_new("Baffle", ltpurple)
DrawLowerBaffleV := BoxF([floc_origin[0] - L_Sed; -L_Slot; floc_origin[2]] + [X_FlocBaffles[0, 0]; Y_FlocBaffles[0, 0]; Z_FlocBaffles[0, 0]], [floc_origin[0] - L_Sed; -L_Slot; floc_origin[2]] + [X_FlocBaffles[0, 0]; Y_FlocBaffles[0, 0]; Z_FlocBaffles[0, 0]] + [T_FlocBaffle; W_FlocChannel + 2*L_Slot; L_FlocBaffles[0, 0]], [0; 0; 0]*deg)
ArrayLowerBaffleV := ArrayLast(1, ceil(N_FlocChannelBaffles[0]/2), 2*B_FlocBaffle[0])
DrawUpperBaffleV := BoxF([floc_origin[0] - L_Sed; -L_Slot; floc_origin[2]] + [X_FlocBaffles[1, 0]; Y_FlocBaffles[0, 0]; Z_FlocBaffles[1, 0]], [floc_origin[0] - L_Sed; -L_Slot; floc_origin[2]] + [X_FlocBaffles[1, 0]; Y_FlocBaffles[0, 0]; Z_FlocBaffles[1, 0]] + [T_FlocBaffle; W_FlocChannel + 2*L_Slot; L_FlocBaffles[1, 0]], [0; 0; 0]*deg)
ArrayUpperBaffleV := ArrayLast(1, floor(N_FlocChannelBaffles[0]/2), 2*B_FlocBaffle[0])
ArrayBafflesChannelV := array_all(N_FlocChannels - 1, 1, -W_FlocChannel - T_PlantWall)
DrawLastLowerBaffleV := BoxF([floc_origin[0] - L_Sed; -L_Slot; floc_origin[2]] + [
    X_FlocBaffles[0, N_FlocChannels - 1];
    Y_FlocBaffles[0, N_FlocChannels - 1];
    Z_FlocBaffles[0, N_FlocChannels - 1]
], [floc_origin[0] - L_Sed; -L_Slot; floc_origin[2]] + [
    X_FlocBaffles[0, N_FlocChannels - 1];
    Y_FlocBaffles[0, N_FlocChannels - 1];
    Z_FlocBaffles[0, N_FlocChannels - 1]
] + [T_FlocBaffle; W_FlocChannel + 2*L_Slot; L_FlocBaffles[0, N_FlocChannels - 1]], [0; 0; 0]*deg)
ArrayLastLowerBaffleV := ArrayLast(1, floor(N_FlocChannelBaffles[0]/2), 2*B_FlocBaffle[N_FlocChannels - 1])
DrawLastUpperBaffleV := BoxF([floc_origin[0] - L_Sed; -L_Slot; floc_origin[2]] + [
    X_FlocBaffles[1, N_FlocChannels - 1];
    Y_FlocBaffles[0, N_FlocChannels - 1];
    Z_FlocBaffles[1, N_FlocChannels - 1]
], [floc_origin[0] - L_Sed; -L_Slot; floc_origin[2]] + [
    X_FlocBaffles[1, N_FlocChannels - 1];
    Y_FlocBaffles[0, N_FlocChannels - 1];
    Z_FlocBaffles[1, N_FlocChannels - 1]
] + [T_FlocBaffle; W_FlocChannel + 2*L_Slot; L_FlocBaffles[1, N_FlocChannels - 1]], [0; 0; 0]*deg)
ArrayLastUpperBaffleV := ArrayLast(1, floor(N_FlocChannelBaffles[0]/2), 2*B_FlocBaffle[N_FlocChannels - 1])
FlocTankBafflePortsV :=
    Local ← FreezeLayer("Baffle")
    for j ∈ 0 .. (N_FlocChannels - 1)
        for i ∈ 0 .. N_FlocChannelBaffles[j] - 1
            if (mod(i, 2) == 1 and j == N_FlocChannels - 1) or (mod(i, 2) == 0 and j ≠ N_FlocChannels - 1)
                Port_Origin[i] ← [floc_origin[0] - L_Sed - zc; W_FlocChannel - L_BafflePort; floc_origin[2]] + [X_FlocBaffles[i, j]; Y_FlocBaffles[0, j]; Z_FlocBaffles[i, j]] if (mod(i, 4) == 0 and j ≠ (N_FlocChannels - 1)) or (mod(i - 1, 4) == 0 and j == (N_FlocChannels - 1))
                Port_Origin[i] ← [floc_origin[0] - L_Sed - zc; -L_Slot; floc_origin[2]] + [X_FlocBaffles[i, j]; Y_FlocBaffles[0, j]; Z_FlocBaffles[i, j]] otherwise
                PortBox ← BoxF(Port_Origin[i], Port_Origin[i] + Port_Dim, [0; 0; 0]*deg)
                Local ← stack(Local, PortBox)
    return Local
GroupBafflesV := GroupAll("DeleteMe")
SubtractBafflePortsV := SubtractF(["Baffle"], "DeleteMe")
FlocTankBaffleScriptV := stack(FlocBaffleLayerV, DrawLowerBaffleV, ArrayLowerBaffleV, DrawUpperBaffleV, ArrayUpperBaffleV, ArrayBafflesChannelV, DrawLastLowerBaffleV, ArrayLastLowerBaffleV, DrawLastUpperBaffleV, ArrayLastUpperBaffleV, FlocTankBafflePortsV, GroupBafflesV, SubtractBafflePortsV)
ModulePipingLayer := layer_new("ModulePiping", purple)
LargeCap := CapF(LargeCap_Origin, [0; 0]*deg, 1.5 in)
FittedCap := CapF(FittedCap_Origin, [180; 0]*deg, 0.5 in)
LongPipe := PipeF(LongPipe_Origin, L_FlocModuleLong[0], [0; 0]*deg, 0.5 in, 1)
ModuleCoupling := CouplingF(ModuleCoupling_Origin, [0; 0]*deg, 0.5 in, 1)
ArrayGroup(nrow, ncol, dist, GroupName) := concat("-array", sp, "g", sp, GroupName, sp, sp, "R", sp, stringit_nounits(nrow), sp, stringit_nounits(ncol), sp, stringit(dist))
ConnectorPipe := PipeF(ConnectorPipe_Origin, S_FlocBaffle[0] - CouplingLength(1/2*in) + SocketDepth(1/2*in) - (CapDiameter(3/2*in)/2 - outerradius(3/2*in)), [0; 0]*deg, 0.5 in, 1)
ArrayModulesX := array_all(1, N_FlocChannelModulesLong[0], B_FlocBaffle[0]*N_FlocChannelBafflesLong[0])
LeftPipe := PipeF([
    floc_origin[0] - X_FlocBaffles[rows(X_FlocBaffles) - 1, 0] - T_FlocBaffle - (CapDiameter(3/2*in)/2 - outerradius(1.5 in));
    LargeCap_Origin[1];
    LargeCap_Origin[2]
], L_Sed - X_FlocBaffles[rows(X_FlocBaffles) - 1, 0] - T_FlocBaffle - (CapDiameter(1.5 in)/2 - outerradius(1.5 in)), [0; 0]*deg, 0.5 in, 1)
LastLargeCap := CapF([
    {
        (floc_origin[0] - X_FlocBaffles[N_FlocChannelBafflesShort[0] - 1, 0] - T_FlocBaffle - (CapDiameter(3/2*in)/2 - outerradius(1.5 in))) if N_FlocChannelBafflesShort[0] ≥ 1
        (floc_origin[0] - X_FlocBaffles[0, 0] - T_FlocBaffle - (CapDiameter(3/2*in)/2 - outerradius(1.5 in))) otherwise
    };
    LargeCap_Origin[1];
    LargeCap_Origin[2]
], [0; 0]*deg, 1.5 in)
LastFittedCap := CapF([
    {
        (floc_origin[0] - X_FlocBaffles[N_FlocChannelBafflesShort[0] - 1, 0] + (CapDiameter(0.5 in)/2 - outerradius(0.5 in))) if N_FlocChannelBafflesShort[0] ≥ 1
        floc_origin[0] - X_FlocBaffles[0, 0] + (CapDiameter(0.5 in)/2 - outerradius(0.5 in))
    };
    LargeCap_Origin[1];
    LargeCap_Origin[2]
], [180; 0]*deg, 0.5 in)
RightPipe := PipeF([floc_origin[0]; LargeCap_Origin[1]; LargeCap_Origin[2]], {
    (X_FlocBaffles[N_FlocChannelBafflesShort[0] - 1, 0] - (CapDiameter(0.5 in)/2 - outerradius(0.5 in)) - floc_origin[0]) if N_FlocChannelBafflesShort[0] ≥ 1
    (X_FlocBaffles[0, 0] - (CapDiameter(0.5 in)/2 - outerradius(0.5 in)) - floc_origin[0]) otherwise
}, [0; 0]*deg, 0.5 in, 1)
ArrayModulesY := array_all(2, 1, -W_FlocChannel/3)
ArrayModulesZ := array_all(3, 1, -S_ModulePipesV)
GroupPiping := GroupAll("ModulePiping")
MirrorGroup(p1, p2, GroupName, Erase) := concat("_mirror", sp, "g", sp, GroupName, sp, sp, point(p1[:, 0]), sp, point(p2[:, 0]), sp, Erase, sp, sp)
MirrorLast(p1, p2, Erase) := concat("_mirror", sp, "l", sp, sp, point(p1[:, 0]), sp, point(p2[:, 0]), sp, Erase, sp, sp)
CopyLast(bp, np, Erase) := concat("_copy", sp, "l", sp, sp, point(bp[:, 0]), sp, point(np[:, 0]), sp, Erase, sp, sp)
MoveLast(bp, np) := concat("_move", sp, "l", sp, sp, point(bp[:, 0]), sp, point(np[:, 0]), sp, sp)
ArrayChannelModules :=
    Local ← stack(ModulePipingLayer, LargeCap, FittedCap, LongPipe, ModuleCoupling, ConnectorPipe, ArrayModulesX, LeftPipe, LastLargeCap, LastFittedCap, RightPipe, GroupPiping)
    Local ← stack(Local, MirrorGroup([floc_origin[0]; floc_origin[1]] - [L_Sed/2; 0 m], [floc_origin[0]; floc_origin[1]] - [L_Sed/2; zc], "ModulePiping", "y")) if mod(N_FlocChannels, 2) == 1
    Local ← stack(Local, MirrorGroup([floc_origin[0]; floc_origin[1]] - [L_Sed/2; 0 m], [floc_origin[0]; floc_origin[1]] - [L_Sed/2; zc], "ModulePiping", "n"), MoveLast(floc_origin, floc_origin - [0 m; (W_FlocChannel + T_PlantWall); 0 m])) if N_FlocChannels > 2
    if N_FlocChannels > 3
        for i ∈ 2 .. N_FlocChannels - 2
            Local ← stack(Local, MirrorLast([floc_origin[0]; floc_origin[1]] - [L_Sed/2; 0 m], [floc_origin[0]; floc_origin[1]] - [L_Sed/2; zc], "n"), MoveLast(floc_origin, floc_origin - [0 m; (W_FlocChannel + T_PlantWall); 0 m]))
    Local
LargeCapL := CapF(LargeCapL_Origin, [0; 0]*deg, 1.5 in)
ArrayModPieces := ArrayLast(1, N_FlocChannelModulesLong[last(N_FlocChannelModulesLong)], N_FlocChannelBafflesLong[last(N_FlocChannelBafflesLong)]*B_FlocBaffle[last(B_FlocBaffle)])
FittedCapL := CapF(FittedCapL_Origin, [180; 0]*deg, 0.5 in)
LongPipeL := PipeF(LongPipeL_Origin, L_FlocModuleLong[last(L_FlocModuleLong)], [0; 0]*deg, 0.5 in, 1)
ModuleCouplingL := CouplingF(ModuleCouplingL_Origin, [0; 0]*deg, 0.5 in, 1)
ConnectorPipeL := PipeF(ConnectorPipeL_Origin, S_FlocBaffle[last(S_FlocBaffle)] - CouplingLength(1/2*in) + SocketDepth(1/2*in) - (CapDiameter(3/2*in)/2 - outerradius(3/2*in)), [0; 0]*deg, 0.5 in, 1)
ArrayConPipe := ArrayLast(1, N_FlocChannelModulesLong[last(N_FlocChannelModulesLong)] - 1, N_FlocChannelBafflesLong[last(N_FlocChannelBafflesLong)]*B_FlocBaffle[last(B_FlocBaffle)])
X_FlocBaffles[0, cols(X_FlocBaffles) - 1] - CouplingLength(0.5 in) + SocketDepth(0.5 in) =  # error
RightPipeL := PipeF([floc_origin[0]; LargeCapL_Origin[1]; LargeCapL_Origin[2]], X_FlocBaffles[0, 0] - CouplingLength(0.5 in) + SocketDepth(0.5 in), [0; 0]*deg, 0.5 in, 1)
LeftPipeL := PipeF([
    floc_origin[0] - min(L_Sed - (W_SedInletchannelPreweir + S_FlocPortGap), X_FlocBaffles[rows(X_FlocBaffles) - 2, cols(X_FlocBaffles) - 1] + T_FlocBaffle) - (CapDiameter(1.5 in)/2 - outerradius(1.5 in));
    LargeCapL_Origin[1];
    LargeCapL_Origin[2]
], max(W_SedInletchannelPreweir + S_FlocPortGap - CapDiameter(1.5 in)/2 + outerradius(1.5 in), L_Sed - (X_FlocBaffles[rows(X_FlocBaffles) - 2, cols(X_FlocBaffles) - 1] + T_FlocBaffle + CapDiameter(1.5 in)/2 - outerradius(1.5 in))), [0; 0]*deg, 0.5 in, 1)
FreezeModulePiping := FreezeLayer("ModulePiping")
FlocTankModules := stack(ArrayChannelModules, LargeCapL, ArrayModPieces, FittedCapL, ArrayModPieces, LongPipeL, ArrayModPieces, ModuleCouplingL, ArrayModPieces, ConnectorPipeL, ArrayConPipe, RightPipeL, LeftPipeL, ArrayModulesY, viewfront1, ArrayModulesZ, viewtop1, FreezeModulePiping)
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FlocBaffleLayerH := layer_new("Baffle", ltpurple)
UpperBaffleH := BoxF([floc_origin[0] - L_Sed; -L_Slot; floc_origin[2]] + [X_FlocBaffles[0, 0]; Y_FlocBaffles[0, 0]; Z_FlocBaffles[0, 0]], [floc_origin[0] - L_Sed; -L_Slot; floc_origin[2]] + [X_FlocBaffles[0, 0]; Y_FlocBaffles[0, 0]; Z_FlocBaffles[0, 0]] + [T_FlocBaffle; L_FlocBaffles[0, 0]; H_Floc], [0; 0; 0]*deg)
LowerBaffleH :=
    BoxF([floc_origin[0] - L_Sed; -L_Slot; floc_origin[2]] + [X_FlocBaffles[1, 0]; Y_FlocBaffles[1, 0]; Z_FlocBaffles[0, 0]], [floc_origin[0] - L_Sed; -L_Slot; floc_origin[2]] + [X_FlocBaffles[1, 0]; Y_FlocBaffles[1, 0]; Z_FlocBaffles[0, 0]] + [T_FlocBaffle; L_FlocBaffles[0, 0]; H_Floc], [0; 0; 0]*deg) if EN_FlocHoriz == 1
    "" otherwise
ArrayBaffleH := array_all(1, N_FlocChannelBaffles[0]/2, 2*B_FlocBaffle[0])
ArrayBafflesChannelH := array_all(N_FlocChannels, 1, -W_FlocChannel - T_PlantWall)
FreezeFlocBafflesH := FreezeLayer("Baffle")
FlocTankBaffleScriptH := stack(FlocBaffleLayerH, UpperBaffleH, LowerBaffleH, ArrayBaffleH, ArrayBafflesChannelH, FreezeFlocBafflesH)
FlocTankDrainCouplingScript :=
    Local ← layer_new("FlocDrainCoupling", green)
    for i ∈ 0 .. last(Y_FlocDrainValves)
        Local ←
            stack(Local, CouplingSUBF([-L_Sed - SocketDepth(ND_FlocValve); Y_FlocDrainValves[i]; floc_origin[2]], [0; 0]*deg, ND_FlocValve, EN_PipeSpec, ["FlocTank"])) if EN_PlantDrains == 0
            otherwise
                stack(Local, CouplingSUBF([
                    Plant_Origin[0] + CouplingLength(ND_FlocValve) - SocketDepth(ND_FlocValve);
                    Y_FlocDrainValves[i];
                    floc_origin[2]
                ], [0; 0]*deg, ND_FlocValve, EN_PipeSpec, ["FlocTank"]))
    return stack(Local, FreezeLayer("FlocDrainCoupling"))
# This draws the valves on the far side (left side from top view) viewing from the right side
FlocTankDrainPipeScript :=
    Local ← layer_new("FlocDrainPipe", blue)
    for i ∈ 0 .. last(Y_FlocDrainValves)
        Local ←
            if EN_PlantDrains == 0
                stack(Local, PipeSUBF([
                    -L_Sed - CouplingLength(ND_FlocValve) + SocketDepth(ND_FlocValve);
                    Y_FlocDrainValves[i];
                    floc_origin[2]
                ], T_PlantWall + SocketDepth(ND_FlocValve), [0; 0]*deg, ND_FlocValve, EN_PipeSpec, ["FlocTank"]))
            otherwise
                stack(Local, PipeSUBF([
                    Plant_Origin[0] + CouplingLength(ND_FlocValve) - SocketDepth(ND_FlocValve) + T_PlantWall + SocketDepth(ND_FlocValve);
                    Y_FlocDrainValves[i];
                    floc_origin[2]
                ], T_PlantWall + SocketDepth(ND_FlocValve), [0; 0]*deg, ND_FlocValve, EN_PipeSpec, ["FlocTank"]))
    return stack(Local, FreezeLayer("FlocDrainPipe"))
FlocDrainAdapterLayer := layer_new("FlocDrainAdapter", green)
DrawFlocDrainAdapter :=
    MaleAdapterF([-L_Sed - CouplingLength(ND_FlocValve) - T_PlantWall; Y_FlocDrainValves[0]; floc_origin[2]], [0; 0]*deg, ND_FlocValve, EN_PipeSpec) if EN_PlantDrains == 0
    MaleAdapterF(FlocAdapter_Origin, [180; 0]*deg, ND_FlocValve, EN_PipeSpec) otherwise
FlocTankDrainAdapterScript := stack(FlocDrainAdapterLayer, DrawFlocDrainAdapter, FreezeLayer("FlocDrainAdapter"))
FlocDrainValveLayer := layer_new("FlocDrainValve", blue)
InsertFlocDrainValve := insertdwg("VAL-Scaled-Gate-Valve-Threaded", FlocValve_Origin, D_FlocScale, D_FlocScale, 0 deg)
FlocTankDrainValveScript := stack(FlocDrainValveLayer, InsertFlocDrainValve, FreezeLayer("FlocDrainValve"))
# For this script to work, you need to modify the search path in AutoCAD everytime you want to test this on a different computer.  Go to tools->options the under search directory add a new file path.  Browse to find the Final Desgins Folder (or equivalent on a different sevrer).
# Iterates through the values of drain locations and inserts a valve
FlocDrainNippleLayer := layer_new("FlocDrainNipple", blue)
DrawFlocDrainNipple := PipeF(FlocDrainNipple_Origin, SocketDepth(ND_FlocValve) + ValveSocket(ND_FlocValve), [0; 0]*deg, ND_FlocValve, EN_PipeSpec)
FlocDrainElbowLayer := layer_new("FlocDrainElbow", green)
DrawFlocDrainElbow := ElbowF(FlocDrainNipple_Origin, [-90; 0; 225]*deg, ND_FlocValve, EN_PipeSpec)
FlocTankDrainRedirect := stack(FlocDrainNippleLayer, DrawFlocDrainNipple, FreezeLayer("FlocDrainNipple"), FlocDrainElbowLayer, DrawFlocDrainElbow, FreezeLayer("FlocDrainElbow"))
ThawFlocDrains := ThawMultiple(["FlocDrainAdapter"; "FlocDrainValve"; "FlocDrainNipple"; "FlocDrainElbow"])
ArrayFlocDrains := array_all(ceil(N_FlocChannels/2), 1, 2*(W_FlocChannel + T_PlantWall))
FreezeDrains := FreezeMultiple(["FlocDrainAdapter"; "FlocDrainValve"; "FlocDrainNipple"; "FlocDrainElbow"])
FlocDrainArray := stack(ThawFlocDrains, ArrayFlocDrains, FreezeDrains)
FlocRMLayer := layer_new("FlocRMCoupling", green)
DrawFlocRMCoupling := CouplingSUBF(FlocCoupling_Origin, [270; 0]*deg, ND_RMPipe, EN_PipeSpec, ["FlocTank"])
FreezeFlocRMCoupling := FreezeLayer("FlocRMCoupling")
FlocRMCouplingScript := stack(FlocRMLayer, DrawFlocRMCoupling, FreezeFlocRMCoupling)
AC_FlocTank :=
    stack(FlocTankScript, FlocTankBaffleScriptH, FlocTankDrainCouplingScript, FlocTankDrainPipeScript, FlocTankDrainAdapterScript, FlocTankDrainValveScript, FlocTankDrainRedirect, FlocRMCouplingScript) if EN_FlocHoriz == 1 and N_FlocChannels ≤ 2
    stack(FlocTankScript, FlocTankBaffleScriptH, FlocTankDrainCouplingScript, FlocTankDrainPipeScript, FlocTankDrainAdapterScript, FlocTankDrainValveScript, FlocTankDrainRedirect, FlocDrainArray, FlocRMCouplingScript) if EN_FlocHoriz == 1 and N_FlocChannels > 2
    stack(FlocTankScript, FlocTankBaffleScriptV, FlocTankModules, FlocTankDrainCouplingScript, FlocTankDrainPipeScript, FlocTankDrainAdapterScript, FlocTankDrainValveScript, FlocTankDrainRedirect, FlocRMCouplingScript) if EN_FlocHoriz == 0 and N_FlocChannels ≤ 2
    stack(FlocTankScript, FlocTankBaffleScriptV, FlocTankModules, FlocTankDrainCouplingScript, FlocTankDrainPipeScript, FlocTankDrainAdapterScript, FlocTankDrainValveScript, FlocTankDrainRedirect, FlocDrainArray, FlocRMCouplingScript) otherwise
