# [reference: MasterProgram.xmcd]
T_LaunderCap := outerradius(ND_SedLaunder) - innerdiameter(ND_SedLaunder, EN_PipeSpec)/2
L_SedLaunder :=
    (L_Sed - W_InletChannel - W_ExitChannel - T_ChannelWall - CouplingLength(ND_SedLaunder) - CouplingLengthFlex(ND_SedLaunder) + SocketDepthFlex(ND_SedLaunder)) - T_LaunderCap if CouplingLength(ND_SedLaunder) ≥ T_ChannelWall
    (L_Sed - W_InletChannel - W_ExitChannel - 2*T_ChannelWall - CouplingLengthFlex(ND_SedLaunder) + SocketDepthFlex(ND_SedLaunder)) - T_LaunderCap otherwise
# [component: inputs SedLaunderscript]
PVCCouplingNew_origin := [
    Plant_Origin[0] + T_PlantWall;
    Plant_Origin[1] + W_Sed/(N_SedLaunders*N_SedBays*2);
    Plant_Origin[2] + HW_Sed - H_SedAbove + outerradius(ND_SedLaunder)
]
FlexCouplingNew_origin := [
    {
        Plant_Origin[0] + T_PlantWall - CouplingLength(ND_SedLaunder) if CouplingLength(ND_SedLaunder) ≥ T_PlantWall
        Plant_Origin[0] otherwise
    };
    Plant_Origin[1] + W_Sed/(N_SedLaunders*N_SedBays*2);
    Plant_Origin[2] + HW_Sed - H_SedAbove + outerradius(ND_SedLaunder)
]
SedLaunderNippleNew_origin := PVCCouplingNew_origin - CouplingLength(ND_SedLaunder) + SocketDepth(ND_SedLaunder)
SedLaunderNew_origin := FlexCouplingNew_origin - SocketDepthFlex(ND_SedLaunder)
LaunderCapNew_origin := SedLaunderNew_origin - L_SedLaunder
LengthSedLaunderNipple :=
    (SocketDepth(ND_SedLaunder) + SocketDepthFlex(ND_SedLaunder)) if CouplingLength(ND_SedLaunder) ≥ T_PlantWall
    (SocketDepth(ND_SedLaunder) + SocketDepthFlex(ND_SedLaunder) + (T_PlantWall - CouplingLength(ND_SedLaunder))) otherwise
T_PVCCoupling := outerradius(ND_SedLaunder) - innerdiameter(ND_SedLaunder, EN_PipeSpec)/2
SedLaunderScriptNEW :=
    LayerNew1 ← layer_new("launder", blue)
    LaunderPipe ← PipeF(SedLaunderNew_origin, L_SedLaunder, [0 deg; 0 deg], ND_SedLaunder, EN_PipeSpec)
    FreezeLaunder ← FreezeLayer("launder")
    Orifice ← cylinderD([
        SedLaunderNew_origin[0];
        SedLaunderNew_origin[1];
        SedLaunderNew_origin[2] + L_SedActive - B_SedLaunderOrifices/2
    ], D_SedLaunderOrifice/2, [
        SedLaunderNew_origin[0];
        SedLaunderNew_origin[1] + outerradius(ND_SedLaunder) + zc;
        SedLaunderNew_origin[2] + L_SedActive - B_SedLaunderOrifices/2
    ])
    ViewRightSide ← viewrightside1
    OrificeArray ← arrayB([
        SedLaunderNew_origin[1] + outerradius(ND_SedLaunder) + zc;
        SedLaunderNew_origin[2] + L_SedActive - B_SedLaunderOrifices/2;
        SedLaunderNew_origin[0]
    ], N_SedLaunderOrificesRow, 1, -B_SedLaunderOrifices)
    ThawLaunder ← SelectLayer("launder")
    FreezeLaunderAgain ← FreezeLayer("launder")
    SubtractOrifice ← subtractH([SedLaunderNew_origin[0]; SedLaunderNew_origin[1] - outerradius(ND_SedLaunder)], [
        SedLaunderNew_origin[0] + D_SedLaunderOrifice + zc;
        SedLaunderNew_origin[1] + outerradius(ND_SedLaunder) + 2*zc
    ], [SedLaunderNew_origin[0] - D_SedLaunderOrifice - zc; SedLaunderNew_origin[1] - zc])
    LayerNew2 ← layer_new("PVCCoupling", red)
    PVCCoupling ← CouplingSUBF(PVCCouplingNew_origin, [0 deg; 0 deg], ND_SedLaunder, EN_PipeSpec, ["tank"])
    FreezePVCCoupling ← FreezeLayer("PVCCoupling")
    LayerNew3 ← layer_new("SedLaunderNipple", blue)
    SedLaunderNipple ←
        PipeF(SedLaunderNippleNew_origin, LengthSedLaunderNipple, [0 deg; 0 deg], ND_SedLaunder, EN_PipeSpec) if CouplingLength(ND_SedLaunder) ≥ T_ChannelWall
        PipeSUBF(SedLaunderNippleNew_origin, LengthSedLaunderNipple, [0 deg; 0 deg], ND_SedLaunder, EN_PipeSpec, ["tank"]) otherwise
    FreezeSedLaunderNipple ← FreezeLayer("SedLaunderNipple")
    LayerNew4 ← layer_new("FlexCoupling", ltpurple)
    FlexCoupling ← FlexCouplingF(FlexCouplingNew_origin, [0 deg; 0 deg], ND_SedLaunder)
    FreezeFlexCoupling ← FreezeLayer("FlexCoupling")
    LayerNew5 ← layer_new("LaunderCap", yellow)
    LaunderCap ← CapF(LaunderCapNew_origin, [0 deg; 180 deg], ND_SedLaunder)
    FreezeLaunderCap ← FreezeLayer("LaunderCap")
    StackEverything ← stack(LayerNew1, LaunderPipe, FreezeLaunder, Orifice, ViewRightSide, OrificeArray, ThawLaunder, FreezeLaunderAgain, SubtractOrifice, LayerNew2, PVCCoupling, FreezePVCCoupling, LayerNew3, SedLaunderNipple, FreezeSedLaunderNipple, LayerNew4, FlexCoupling, FreezeFlexCoupling, LayerNew5, LaunderCap, FreezeLaunderCap)
    return StackEverything
PipeSUBF(OriginPoint, Length, AngleVector, ND, EN, SubtractionLayers)
# [component: inputs SedLaunderScriptNEW]
SedLaunderScriptNEW = [
    "-layer m launder"; "c t 0,255,255"; "launder"; "  "; "_cylinder -0.13575,0.4538,1.51898 0.10954 c -11.76145,0.4538,1.51898"; "_cylinder -0.12575,0.4538,1.51898 0.1006 c -11.77145,0.4538,1.51898"; "_zoom w -11.77145,0.33426,1.51898 -11.75145,0.57334,1.51898"; "_subtract -11.76145,0.56334,1.51898  -11.77145,0.5544,1.51898 "; "-group c launder y "; "all "
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]
