# Only parameters with units need to be entered in this file. The units must be attached as SI (meters, kg, s)
# Engineer Entered Values:
Q_Plant := Q_Plant*m^3/s
acad_version := 2008
# General Plant Parameters
H_PlantFreeboard := H_PlantFreeboard*m
# sed tank parameters
W_SedBay := W_SedBay*m
# width of lamella = width of sed tank bay
W_SedSlopePlate := W_SedManifoldPlate*m
T_SedSlopePlate := T_SedManifoldPlate*m
Ti_SludgeDrain := Ti_SludgeDrain*s
EN_PipeSpec := EN_PipeSeries
EN_DrillSeries := EN_DrillSeries  # Drain time for sed tank
N_SedTanks := N_SedTanks
N_SedBaysEst := N_SedBaysEst
W_SedFrameWall := 4 cm  # not given by ADT
H_SedFrameWall := 7 cm  # not given by ADT
T_SedManifoldEntrance := T_SedManifoldEntrance*m
B_SedPipe := 30 cm  # not given by ADT
T_SedPlate := T_SedPlate*m
T_SedInletSlope := T_SedManifoldPlate*m
L_SedPlateSheet := L_SedPlateSheet*m
ND_SedPlateFrame := round(ND_SedPlateFrame*m/in)*in  # This needs to be an exact inch otherwise the outerdiameter function call to the pipe database won't work
# floc parameteres
T_FlocBaffle := T_FlocBaffle*m
S_FlocChannel := S_FlocChannel*m
L_slot := 5 cm
# Chem Feed Parameters
C_FcmDoseMax := C_AlumDoseMax*kg/m^3
C_FcmAlum := C_AlumStock*kg/m^3
EN_FcmTube := EN_TubeSeries
Ti_StockMin := Ti_AlumStock*s
# Values used to Draw Plant:
T_PlantWall := T_PlantWall*m
W_MpWalkway := 1*m
# not given by ADT
W_GritWeir := 15 cm  # This should be removed. Needed for testing
