# [reference: MasterProgram.xmcd]
Q_FcmAlum := Q_Plant*C_FcmDoseMax/C_FcmAlum = 7.5e-6 m^3/s
Q_FcmAlum = 7.5e-6 m^3/s
H_AlumTank(Q_FcmAlum, Kvc, D_FcmValveOrifice, g) := (Q_FcmAlum/(Kvc*(.5*D_FcmValveOrifice)^2*π))^2/(2*g)
V_AlumtTank(Q_FcmAlum, Ti_StockMin) := Ti_StockMin*Q_FcmAlum
W_Alumtank(V_AlumTank, H_AlumTank) := (V_AlumTank/H_AlumTank)^.5
D_AlumTank(V_AlumtTank, H_AlumTank) := 2*(V_AlumTank/H_AlumTank)^.5/π^.5  # error: This variable is undefined.
