# Expert Inputs
# Miscellaneous
acad_version := 2008
ND_Rebar := 1/2*in
W_MpWalkway := 1*m
H_Freefall := 0.1 m
H_PlantFreeboard := 0.1*m
EN_PlantDrains := 1  # Set to zero if drains on left, 1 if drains on right
# Flow Orifice Meter
Π_Lfomorifice := 10  # Number of rows in lfom.  note: execution time of the lfom file exponentially increases with this number.
Π_LfomSafety := 2  # sefety coefficient for lfom pipe diameter
HL_Nlfom := 40 cm  # head loss through nonlinear orifice meter (simple orifice)
HL_Lfom := 20 cm  # head loss through linear orifice meter (sutro weir analog)
# Chemical Storage Tanks, Entrance Tank and Rapid Mixer
V_EtUp := 8*mm/s
HL_RMPipeEst := 10 cm
ED_RMMicroOrifice := 1*W/kg
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Pi_Jet := 0.4
# This is an empirically determined factor to make the equation
# correct.
C_CoagulantMinDose := 8*mg/L
H_CoagTankAboveHeadTank := 30 cm
# This is the elevation difference between the outlet of the coagulant stock tanks and the water level in the constant head tank, which is set by the hydraulic head required to provide the desired max chemical flow rate through the float valve orifice in the CHT. It is treated as constant here to ensure a practical amount of space is left between the stock tanks and the CHT even when a float valve is selected which requires very little hydraulic head to deliver the required maximum chemical flow rate.
T_ChemTankWall := 5 mm
B_StockOutlet := 10 cm  # This is the distance from the bottom of the stock tanks to the outlets to allow space for solids to settle.
S_ChemTankBorder := 25 cm  # Distance between a tank and the border of the platform
S_ChemTanks := 40 cm
S_ChemTankToWall := 1 m  # Distance between the tanks and the wall for operator mobility.
W_EtWalkway := 1.5 m
# Flocculator
# The minor loss coefficient is 2. According to measurements at Agalteca and according to
# https://confluence.cornell.edu/display/AGUACLARA/PAHO+Water+Treatment+Publications (page 100 in chapter on flocculation)
K_FlocBaffle := 2
W_HumanMin := 0.54 m  # Increased to 60 cm to make construction easier.
S_FlocBaffleSetBackPlastic := 2 cm
CP_Floc := 100 m^(2/3)  # increased to 100 at the request of Dan and Sarah
Pi_JSOptimal := 3
Pi_JSMin := 2
Pi_FlocBaffle := 1.5
# Ratio of space at the bottom of a baffle to the space between baffles. This used to be 1, but we have changed it to 1.5 to reduce the risk that the bottom of the flocculator will clog with sediment.
ED_Floc := 10*mW/kg
# Increased from 6 to 10 on 7/14/2011 to compensate for increase in Pi.Jet from 0.38 (in flocculator) and 0.34 (in ports, pipes, channels) to a new value of 0.4.
Ti_FlocDrain := 30 min
# Sedimentation
V_Scour := 0.1*m/s  # I believe this can be eliminated since we aren't using this constraint in design.
Pi_FlowManifold := 0.8
ED_SedInlet := ED_Floc
HW_SedEst := 2 m
V_SedUpBod := 0.8*mm/s
V_SedCBod := 0.12*mm/s
V_UpFlocHopper := 0.35*mm/s
AN_SedSlope := 60 deg  # Angle of the sloped bottom of the sed tank
HW_InletChannelMax := 0.5*m  # To make it easy to place pipe nipples in inlet pipes to block flow to sed tank
W_ChannelMin := 10 cm  # Minimum channel width for constructability
HL_SedChannelMax := 5 cm
# Maximum water level drop in the inlet sed channel that dumps flocculated water to waste and in the outlet sed channel that takes clarified water to the filter or to waste
B_SedPlateFramePipes := 30 cm  # No longer used.
AN_SedPlate := 60 deg
B_SedPlateMin := 2.5 cm + T_SedPlate  # error: This variable is undefined.
# This is to prevent floc roll up. We should specify this in a more fundamental way. (based on velocity gradients)
ND_SedManifoldMax := 12 in
B_SedManifoldPortEst := 10 cm
N_SedLaunders := 1  # Number of launders per bay
HL_SedLaunderBod := 4 cm  # target headloss in sed launders
Pi_Launder := 0.95
Pi_QLaunderOrifices := 0.80
B_SedLaunderOrificesEst := 10 cm
Pi_QSludgeOrifices := 0.85
ND_SedModulePipe := 0.5 in  # This is the diameter of the pipe used to hold the lamina together
ND_SedModulePipeSpace := 3/4*in  # This is the diameter of the ledge that serves as a ledge for the plate setter to lie on.
S_SedPlateModuleMin := 2 cm
ND_SedPlateFrame := 1.5 in
B_SedFrameSupport := 1/3*m
L_SedPlateCantilevered := 20 cm
# Maximum length of sed plate sticking out past module pipes without any additional support. The goal is to prevent floppy modules that don't maintain constant distances between the plates
# S.LamellaLaunder is the extra space between the top of the lamella and the ledge used to hold up the launder
S_LamellaLaunder := 4 cm
HL_SedWeirMax := 5 cm
Ti_SludgeDrain := 30 min
