# INPUT PLANT FLOW RATE
# DELETE this LATER for the design tool | XXXXXXXXXXX Delete for Design tool
# FIXED INPUT PARAMETERS FOR THE DOSER
# INPUT PARAMETERS FOR Non-Linear CDC Arm:
MaxΔH := 0.4 m  # Max plant head loss, this is constant for all future AguaClara plants
# DELEETE LATER Input Alum Concentration in stock tank | XXXXXXXXXXX Delete for Design tool
# Input Vena Contracta of Orifice
#
# Input tubing roughness for tube 1
#
# Input tubing roughness for tube 2
#
# Input tubing 1's length
#
# Input tubing 2's length
#
# Input tubing 1's diameter
#
# Input tubing 2's diameter
#
# Input viscosity of alum solution
#
# Input density of water
#
# Input density of alum solution
K_vc := 0.63
ε_tube1 := .000001 mm
ε_tube2 := .000001 mm
L_tube1 := 50 cm
L_tube2 := 50 cm
Diameter_tubing1 := 3/8*in
Diameter_tubing2 := 3/8*in
ν_alum := 1.1*10^-6*m^2/s
ρ_H2O := 1000*kg/m^3
ρ_alum := 1.62*gm/cm^3
# CONCENTRATION RANGES
Conc_2 := [20; 24; 28; 32; 36; 40; 44]*mg/l
Conc_1 := [10; 12; 14; 16; 18; 20; 22]*mg/l
Conc_3 := [40; 48; 56; 64; 72; 80; 88]*mg/l
# This is a three scaled doser
# SURFACE TENSION
σ := .074*N/m  # at 20 degrees C
d_orifices := .1 mm, .2 mm .. 15 mm  # create a range of possible orifice diameters
Δh(d) := 2*σ/(ρ_alum*g*d/2) - 2*d/2/3  # height required to form droplets
Δh2(d) := 2*σ/(ρ_alum*g*d/2)
ρ_alum = 1620 kg/m^3
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# TRIPLE SCALE CALCULATIONS
# LEVER ARM DIMENSIONS
L_lever := .9 m  # This is the length of the lever arm
L_back := L_lever/2
MaxH := .4 m  # This is the headloss through the whole plant
# This is the maximum angle of the lever arm at max plant flow
Max_Angle := asin(MaxH/L_back)
Max_Angle = 62.734 deg  # This is the maximum angle the lever arm will have, at max plant flow
# REQUIRED FLOW OF ALUM
Q_Alum1 := Q_Plant*Conc_1/C_AlumStock
# The flow of alum required, for each dosage range, to maintain set concentrations
Q_Alum1 =  # error: This variable is undefined.
Q_Alum2 := Q_Plant*Conc_2/C_AlumStock
# QUESTION: Can I assume that the diameter of a water
# droplet and the orifice diameter are the same?
Q_Alum2 =  # error
Q_Alum3 := Q_Plant*Conc_3/C_AlumStock
Q_Alum3 =  # error
# The following section is for the design tool definitions
Q_Alum0 := Q_Alum1[0]
Q_Alum20 := Q_Alum2[0]
Q_Alum30 := Q_Alum3[0]
Q_Alum1 := Q_Alum1[1]
Q_Alum21 := Q_Alum2[1]
Q_Alum31 := Q_Alum3[1]
Q_Alum2 := Q_Alum1[2]
Q_Alum22 := Q_Alum2[2]
Q_Alum32 := Q_Alum3[2]
Q_Alum3 := Q_Alum1[3]
Q_Alum23 := Q_Alum2[3]
Q_Alum33 := Q_Alum3[3]
Q_Alum4 := Q_Alum1[4]
Q_Alum24 := Q_Alum2[4]
Q_Alum34 := Q_Alum3[4]
Q_Alum5 := Q_Alum1[5]
Q_Alum25 := Q_Alum2[5]
Q_Alum35 := Q_Alum3[5]
Q_Alum6 := Q_Alum1[6]
Q_Alum26 := Q_Alum2[6]
Q_Alum36 := Q_Alum3[6]
# This sets the scale as a permanent aspect to all future AguaClara plants with the only parameter that changes is the dosing orifices. This original scale was generated at the Agalteca Plant.
ScaleFinal := [6.457; 9.299; 12.657; 16.531; 20.922; 25.83; 31.254]*cm
Scale_Distance0 := ScaleFinal[0] = 6.457 cm
Scale_Distance1 := ScaleFinal[1] = 9.299 cm
Scale_Distance2 := ScaleFinal[2] = 12.657 cm
Scale_Distance3 := ScaleFinal[3] = 16.531 cm
Scale_Distance4 := ScaleFinal[4] = 20.922 cm
Scale_Distance5 := ScaleFinal[5] = 25.83 cm
Scale_Distance6 := ScaleFinal[6] = 31.254 cm
Diameter_Or1(Q, h) := sqrt(4*Q/(π*K_vc))/(2*g*h)^.25
Diameter_Or1(Q_Alum1, ScaleFinal)[0] =  # error
Diameter_Or1(Q_Alum2, ScaleFinal)[0] =  # error  # These are the actual values of the orifices before they get rounded
Diameter_Or1(Q_Alum3, ScaleFinal)[0] =  # error
Orifice_Diam1 := round(Diameter_Or1(Q_Alum1, ScaleFinal)[0]/mm)
Orifice_Diam2 := round(Diameter_Or1(Q_Alum1, ScaleFinal)[0]/mm*sqrt(2), 1)
Orifice_Diam3 := round(Diameter_Or1(Q_Alum2, ScaleFinal)[0]/mm*sqrt(2), 1)
Diameter_Dosingorifice1 := Orifice_Diam1*1*mm
# These are the Final Dosing Orifice Diameters
# PUT THESE PARAMETERS IN THE DESIGN TOOL
Diameter_Dosingorifice2 := Orifice_Diam2*1*mm
Diameter_Dosingorifice3 := Orifice_Diam3*1*mm
# MINIMUM PLANT FLOW (accounting for surface tension)
# Purpose: to find the angle/flow rate where the first point starts to be affected by surface tension
K_vc = 0.63
Δh(Diameter_Dosingorifice1) =  # error
Area(d) := (π*d^2/4)
Q_min := K_vc*Area(Diameter_Dosingorifice1)*sqrt(2*g*Δh(Diameter_Dosingorifice1))
Angle_min := asin(Δh(Diameter_Dosingorifice1)/ScaleFinal[0])
Q_min =  # error
Angle_min =  # error
Angle_mindegrees := Angle_min*180/π
Δh_entrance := L_lever/2*sin(Angle_min)
MaxΔH = 0.4 m
K_plant := MaxΔH*2*g/(Q_Plant^2)
Q_PlantMin := sqrt((2*g*Δh_entrance)/K_plant)
# REQUIRED HEIGHT OF STOCK TANK
h(Q, D) := (Q/(K_vc*π*D^2/4))^2/(2*g)
HL_FloatValveOrifice := 30*cm  # This needs to be calculated based on the actual float valve that we select.
# OUTPUT:
# Scale | Min Plant Flow
Q_PlantMin =  # error
# Orifice Sizes
ScaleFinal = [6.457; 9.299; 12.657; 16.531; 20.922; 25.83; 31.254] cm
Diameter_Dosingorifice1 =  # error
Diameter_Dosingorifice2 =  # error
Diameter_Dosingorifice3 =  # error
# Input these parameters into the design tool
Q(D, h) := K_vc*π*D^2/4*sqrt(2*g*h)
Q(Diameter_Dosingorifice1, ScaleFinal[0]) =  # error
error1 := ((Q(Diameter_Dosingorifice1, ScaleFinal) - Q_Alum1)/Q_Alum1)*100
error2 := ((Q(Diameter_Dosingorifice2, ScaleFinal) - Q_Alum2)/Q_Alum2)*100
error3 := ((Q(Diameter_Dosingorifice3, ScaleFinal) - Q_Alum3)/Q_Alum3)*100
error1 =  # error
error2 =  # error
error3 =  # error
# These are the errors for each conentration range caused by rounding to the nearest available drill size for the dosing orifice caps
# Error due to rounding
