Pi_HbMin := 3  # Should go into Basis of Design. Doesn't really need to be accesible even to experts. Ratio of water depth to spacing between baffles.
# The new flocculation model more carefully distinguishes between maximum and average energydissipation rates. The flocculators should be designed based on a maximum allowed energy dissipation rate to ensure that suboptimal geometry (high h/b ratios) doesn't result in excessively high energy dissipation rates that could break flocs. However, since this model is now incorporating the concept of a maximum energy dissipation rate the energy dissipation rate guidelines need to be increased to account for the distinction between average and maximum.
# Because we are now using the concept of a maximum energy dissipation rate it should be possible to directly incorporate results from laminar flow flocculators to produce guidelines on the maximum allowable energy dissipation rates. One caveat is that the turbulent flow energy dissipation rates are time averaged and it is not yet clear what the expected temporal variability is for turbulent flow energy dissipation rates.
# CFD results and functions
# all design values from Yi, Wenqi, 2009
# The fraction of the maximum collision potential that could be achieved if the energy dissipation rate was uniformly distributed. Or, if this fraction of the available energy were uniformly distributed the collision potential would be the same as what it is given the nonuniformity in the energy dissipation rate distribution.
# ratio of water depth to baffle spacing
# Note that this data (ψ.Pdat) can not be used directly in design because it has units! It only applies to the case for b=0.1m (the case used in the CFD FLUENT analysis).
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ψ_Pdat := [0.49962; 0.65143; 0.67122; 0.71292; 0.89548; 1.00041; 1.24420; 1.45759; 2.15668]*m^(2/3)
Pi_HBdat := [2; 3; 4; 5; 8; 10; 15; 20; 40]  # h/b*values
α_ψdat := [0.65; 0.86; 0.87; 0.85; 0.71; 0.64; 0.53; 0.46; 0.33]
# The maximum energy dissipation rate is loosely defined as the the maximum energy dissipation rate that is seen by a significant fraction of the flow. We don't have a good way to characterize this parameter analytically yet, but I estimated this using the color contours of the energy dissipation rate (data from Yi, Wenqi, 2009). Note the very large values of this ratio for high h/b ratios. High h/b ratios have very nonuniform energy dissipation rates.
# Minor loss coefficient. This many equivalents of the kinetic energy are lost through one baffle. Note that the minor loss coefficient is very large for small h/b values
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K_Pdat := [9.60; 7.17; 4.32; 3.42; 3.15; 3.13; 3.22; 3.39; 3.84]
α_εdat := [1.875617391; 1.808368729; 1.776938668; 1.927164849; 3.356408643; 4.221784408; 6.332676611; 7.793864103; 13.75322341]
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α_ψ(Pi_HB) := linterp(Pi_HBdat, α_ψdat, Pi_HB)  # These functions use linear interpolation to create functional relationships as a function of the h/b ratios
α_ε(Pi_HB) := linterp(Pi_HBdat, α_εdat, Pi_HB)
K_P(Pi_HB) := linterp(Pi_HBdat, K_Pdat, Pi_HB)
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# True for h/b>5
3^(1/3) = 1.44225
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b := 0.1*m
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# True for h/b>3
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## Flocculator Functions
# The Floor function forces the number of baffle spaces to be an  integer
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N_FlocSpacesF(L, T, S) := Floor((L + T)/(S + T), 1)
SofN_FlocBaffleF(L, T, N_Spaces) := (L + T)/N_Spaces - T
# The function below can also be used directly to solve for W by substituting S for W
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S_FlocBaffleIterative(Q, W, H, S, ED) := (K_P(H/S)*α_ε(H/S)/(2*H*ED))^(1/3)*Q/W  # recursive function
S_FlocBaffleF(Q, W, H, ED) :=
    S ← S_FlocBaffleIterative(Q, W, H, H/4, ED)
    error ← 1
    while error > 0.001
        S_new ← S_FlocBaffleIterative(Q, W, H, S, ED)
        error ← |S - S_new|/(S + S_new)
        S ← S_new
    return S
# This function returns a spacing that gives the target energy dissipation rate.
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# Collision potential per baffle (p for pantalla)
ψ_P(H, S) := (H^2*α_ψ(H/S)*K_P(H/S)/2)^(1/3)
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ED(Q, H, S, W) := α_ε(H/S)*K_P(H/S)/(2*H)*(Q/(W*S))^3
ED_Target(ψ) :=
    Pi ← [0.4; 0.7]
    m ← (ED_Floc[0] - ED_Floc[1])/((Pi[0] - Pi[1])*CP_Floc)
    b ← ED_Floc[0] - m*Pi[0]*CP_Floc
    ED_Target ← ED_Floc[0] if ψ ≤ Pi[0]*CP_Floc
    ED_Target ← m*ψ + b if ψ > Pi[0]*CP_Floc and ψ ≤ Pi[1]*CP_Floc
    ED_Target ← ED_Floc[1] if ψ > Pi[1]*CP_Floc
    return ED_Target
# This function gives a reasonable relationship between maximum energy dissipation rate and collision potential through a flocculator. This function is a placeholder until we get better information from our research teams.
#
# We can tweak these Pi terms to get the baffle distribution that we like and the head loss that we like
# The Pi terms determine at what fraction of the total collision potential does the energy dissipation rate start to drop and at what energy dissipation rate does it level off again.
# The following function cycles through each flocculator channel and checks the possible range of the number of baffles in a channel to see which number of baffles results in the correct energy dissipation rate and cumulative collision potential at the end of the channel.
N_FlocChannelSpacesF(ED_ChannelRange, ψ_ChannelRange, N_FlocSpacesMax, N_FlocSpacesMin) :=
    ψ_Cumulative ← 0
    Channel ← 0
    while ψ_Cumulative < CP_Floc
        i ← 0
        while ED_ChannelRange[i] ≤ ED_Target(ψ_ChannelRange[i] + ψ_Cumulative) and i < (N_FlocSpacesMax - N_FlocSpacesMin)
            i ← i + 1
        N_FlocChannelSpaces[Channel] ← Floor(i + N_FlocSpacesMin, 2)
        ψ_Cumulative ← ψ_Cumulative + ψ_ChannelRange[i]
        Channel ← Channel + 1
    N_FlocChannelSpaces[last(N_FlocChannelSpaces)] ← N_FlocChannelSpaces[last(N_FlocChannelSpaces)] - 1
    return N_FlocChannelSpaces
# search for number of spaces that yields dissipation rate under target
# Floor the number of spaces to get an even number
# Set i to the correct value given the actual number of spaces used
# Calculate actual collision potential
# The number of spaces in the last channel needs to be an odd
# number so that the water flows up to the exit port to
# the sed tank.
## Calculation of Flocculator Geometry
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HW_FlocEnd := HW_Sed
S_FlocBaffleMax := SofN_FlocBaffleF(L_Sed, T_FlocBaffle, N_FlocSpacesF(L_Sed, T_FlocBaffle, HW_FlocEnd/Pi_HbMin))  # HERE *******************
W_FlocChannel := max(S_FlocBaffleIterative(Q_Plant, S_FlocBaffleMax, HW_FlocEnd, S_FlocBaffleMax, ED_Floc[last(ED_Floc)]), W_FlocChannelMin)
S_FlocBaffleMin := S_FlocBaffleF(Q_Plant, W_FlocChannel, HW_FlocEnd, ED_Floc[0])
N_FlocSpacesMin := N_FlocSpacesF(L_Sed, T_FlocBaffle, HW_FlocEnd/Pi_HbMin) - 1  # HERE *******************
# subtract one to handle the case when we reduce the number of spaces through rounding down to an odd or even integer.
N_FlocSpacesMax := N_FlocSpacesF(L_Sed, T_FlocBaffle, S_FlocBaffleMin)  # HERE *******************
# Now calculate the maximum energy dissipation rate given the range of possible baffle spacings and the total collision potential for a channel full of baffles of that spacing.
i := 0 .. N_FlocSpacesMax - N_FlocSpacesMin
# Now calculate the collision potential for an entire channel for each of the possible number of baffles and the corresponding energy dissipation rate
ψ_ChannelRange[i] := ψ_P(HW_FlocEnd, SofN_FlocBaffleF(L_Sed, T_FlocBaffle, i + N_FlocSpacesMin))*(i + N_FlocSpacesMin)
ED_ChannelRange[i] := ED(Q_Plant, HW_FlocEnd, SofN_FlocBaffleF(L_Sed, T_FlocBaffle, i + N_FlocSpacesMin), W_FlocChannel)
ED_ChannelRange =  # error: This variable is undefined.
ψ_ChannelRange =  # error
# Calculate the number of spaces in each channel
Q_Plant =  # error
N_FlocSpacesMax =  # error
CP_Floc =  # error
N_FlocSpacesMin =  # error
L_Sed =  # error
N_FlocChannelSpaces := N_FlocChannelSpacesF(ED_ChannelRange, ψ_ChannelRange, N_FlocSpacesMax, N_FlocSpacesMin)
N_FlocChannels := length(N_FlocChannelSpaces)
Channels := 0 .. N_FlocChannels - 1  # range variable for the floc channels
N_FlocChannelBaffles := N_FlocChannelSpaces - 1
N_FlocBaffles := sum(N_FlocChannelBaffles)  # Total number of baffles in the flocculator
# Now we need to calculate the following for each channel
# baffle center to center distance
# baffle separation distance
# head loss in each channel
# Calculate the baffle spacing given the number of baffles in each channel
S_FlocBaffle := SofN_FlocBaffleF(L_Sed, T_FlocBaffle, N_FlocChannelSpaces)
# Verify that the channels are all the correct length...
vectorize(N_FlocChannelSpaces*S_FlocBaffle) + (N_FlocChannelSpaces - 1)*T_FlocBaffle =  # error
ED_FlocChannel[Channels] := ED(Q_Plant, HW_FlocEnd, S_FlocBaffle[Channels], W_FlocChannel)
ED_FlocChannel =  # error  # This is the actual energy dissipation rate in each channel
# Calculate the collision potential for each channel
CP_FlocChannel[Channels] := ψ_P(HW_FlocEnd, S_FlocBaffle[Channels])*N_FlocChannelSpaces[Channels]
CP_FlocTotal := sum(CP_FlocChannel)
B_FlocBaffle := S_FlocBaffle + T_FlocBaffle  # center to center distance
HL_FlocBaffle := K_P(HW_FlocEnd/S_FlocBaffle)*Q_Plant^2/(2*g*(S_FlocBaffle*W_FlocChannel)^2) = m  # head loss per baffle in each channel
HL_FlocChannels := vectorize(HL_FlocBaffle*(N_FlocChannelBaffles + 1)) = m  # total head loss per channel
HL_Floc := HL_FlocBaffle*N_FlocChannelSpaces  # total head loss in the flocculator
HW_FlocStart := HW_FlocEnd + HL_Floc
# Here we are assuming that the entire flocculator has extra tall walls. But that isn't necessary. The walls could be different heights for each channel.
H_Floc := HW_FlocStart + H_PlantFreeboard
L_FlocTank := N_FlocChannels*L_Sed  # Total length of floc tanks
Ti_Floc := HW_FlocEnd*L_FlocTank*W_FlocChannel/Q_Plant
# The width of the floc port that connects channels will be based on the baffle spacing in that channel
W_FlocPortEst := S_FlocBaffle
H_FlocPortEst := W_FlocChannel
# This keeps the energy dissipation rate through the ports the same as through the baffles since the dimension of the port is actually exactly the same as the dimension through the baffles
A_FlocPort := W_FlocPortEst*H_FlocPortEst
W_FlocPort := W_FlocPortEst - S_FlocChannel
H_FlocPort := A_FlocPort/W_FlocPort
## Position calculations for each baffle
# Now we need to assign positions, lengths and elevations to floc baffles
L_FlocBaffleLower := HW_FlocEnd - S_FlocBaffle*Pi_FlocBaffle
# H.Floc should be an array with an element for each channel
L_FlocBaffleUpper := H_Floc - S_FlocBaffle*Pi_FlocBaffle
X_FlocBaffles :=
    for channel ∈ 0 .. N_FlocChannels - 2
        for i ∈ 0 .. N_FlocChannelBaffles[channel] - 1
            x[i, channel] ← S_FlocBaffle[channel] + B_FlocBaffle[channel]*i
    if (S_FlocChannel + W_InletChannel) > S_FlocBaffle[last(S_FlocBaffle)] and (2*S_FlocBaffle[last(S_FlocBaffle)]) > (S_FlocChannel + W_InletChannel)
        S_FlocBaffle[last(S_FlocBaffle)] ← SofN_FlocBaffleF(L_Sed - W_InletChannel + W_FlocPort[last(W_FlocPort)] - 2*S_FlocChannel, T_FlocBaffle, N_FlocChannelSpaces[last(N_FlocChannelSpaces)])
        for i ∈ 0 .. N_FlocChannelBaffles[last(N_FlocChannelBaffles)] - 1
            x[i, N_FlocChannels - 1] ← ((L_Sed - W_InletChannel - S_FlocChannel)/(N_FlocChannelSpaces[last(N_FlocChannelSpaces)] - 1))*i + S_FlocChannel + W_InletChannel
        x[i, N_FlocChannels - 1]
    if (S_FlocChannel + W_InletChannel) > (2*S_FlocBaffle[last(S_FlocBaffle)])
        N_FlocChannelSpaces[last(N_FlocChannelSpaces)] ← N_FlocChannelSpaces[last(N_FlocChannelSpaces)] - 2
        N_FlocChannelBaffles[last(N_FlocChannelBaffles)] ← N_FlocChannelBaffles[last(N_FlocChannelBaffles)] - 2
        S_FlocBaffle[last(S_FlocBaffle)] ← SofN_FlocBaffleF(L_Sed - 2*S_FlocChannel, T_FlocBaffle, N_FlocChannelSpaces[last(N_FlocChannelSpaces)])
        for i ∈ 0 .. N_FlocChannelBaffles[last(N_FlocChannelBaffles)] - 1
            x[i, N_FlocChannels - 1] ← S_FlocBaffle[last(S_FlocBaffle)] + B_FlocBaffle[N_FlocChannels - 1]*i + W_InletChannel - W_FlocPort[last(W_FlocPort)]
        x[i, N_FlocChannels - 1]
    otherwise
        for i ∈ 0 .. N_FlocChannelBaffles[last(N_FlocChannelBaffles)] - 1
            x[i, N_FlocChannels - 1] ← S_FlocBaffle[channel] + B_FlocBaffle[channel]*i
        x[i, N_FlocChannels - 1]
    return x
# X array is the distance from the inside of the wall of the floc tank (on the side of the plant that has the inlet channel to the sed tank) to the face of the baffle closest to that end of the floc tank
X_FlocBaffles =  # error
Y_FlocBaffles :=
    for j ∈ 0 .. (N_FlocChannels - 1)
        Y_FlocBaffles[0, j] ← Plant_Origin[1] + (N_SedTanks*(W_Sed + T_PlantWall)) + ((N_FlocChannels - j - 1)*(W_FlocChannel + T_PlantWall))
    return Y_FlocBaffles
# Z array is the elevation of the bottom of the baffle
Z_FlocBaffles :=
    for channel ∈ Channels
        for i ∈ 0 .. N_FlocChannelBaffles[channel] - 1
            z[i, channel] ← mod(i, 2)*S_FlocBaffle[channel]
            z[i, N_FlocChannels - 1] ← mod(i + 1, 2)*S_FlocBaffle[N_FlocChannels - 1]
    return z
# For the last channel, the up/down placement of the
# baffles needed to be down at the channel port and
# up at the exit port.
Z_FlocBaffles =  # error
L_FlocBaffles :=
    for channel ∈ Channels
        for i ∈ 0 .. N_FlocChannelBaffles[channel] - 1
            l[i, channel] ← L_FlocBaffleUpper[channel] if mod(i, 2) == 1
            l[i, channel] ← L_FlocBaffleLower[channel] otherwise
            l[i, N_FlocChannels - 1] ← L_FlocBaffleLower[N_FlocChannels - 1] if mod(i, 2) == 1
            l[i, N_FlocChannels - 1] ← L_FlocBaffleUpper[N_FlocChannels - 1] otherwise
    return l
# L array is the total height (length) of the baffle
# For the last channel, the length of the
# baffles needed to be changed since the
# up/down had been adjusted.
L_FlocBaffles =  # error
# This is a program to calculate how much time is required to drain out a flocculator section. Each section of the flocculator is connected to one another with alternating holes on the bottom of the baffles. These holes are small enough not to disrupt flow over the baffles and big enough such that one drain will empty out all the sections.
# Initially, the tank is full. This is denoted at time=t(0).
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# Once the tanks start draining, at time=t(1) all the water is level.
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# At time=t(2), section 1 has begun to drain quicker than sections 2, 3 & 4.
# Each hole on the bottom of the baffles is treated as an orifice.
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# available valve diameters
D_Valvem := [0.0508; 0.0762; 0.1016; 0.127; 0.1524; 0.1778; 0.2032]*m
Q_minor(K_minor, D, h1, h2) :=
    Q ← (π*D^2/4*sqrt(2*g*(h1 - h2)/K_minor)) if h1 - h2 > 0
    Q ← 0*m^3/s otherwise
# Base and width are defined as the base and width of a single channel
# We need to calculate 'n' different h values plus an extra 'h'
# which would be the value emptied from tank 1. The tanks are
# numbered from 1 to n
# There will only be n-1 different flows out from each tank
.
t_master(base, width, D_Valve, K_Valve, h_initial, H_LowerBaffle, n_tanks) :=
    time ← (sqrt(h_initial) - sqrt(H_LowerBaffle))/((π*D_Valve^2/(8*n_tanks*base*width))*sqrt(2*g/K_Valve))
    Δt ← base*width*H_LowerBaffle/(Q_minor(K_Valve, D_Valve, H_LowerBaffle, 0*m)*100)
    for i ∈ 0 .. n_tanks
        h_tank[i] ← H_LowerBaffle
    h_tank[0] ← 0*m
    while h_tank[n_tanks, 0] > 1 mm
        time ← time + Δt
        for i ∈ 0 .. n_tanks
            Q[i] ← Q_minor(K_Valve, D_Valve, h_tank[i + 1], h_tank[i]) if i < n_tanks
            Q[i] ← 0*m^3/s otherwise
            h_tank[i] ← h_tank[i] + (Q[i] - Q[i - 1])*Δt/(base*width) if i > 0
            h_tank[i] ← 0*m otherwise
    return time  # initial guess for time based on the total number of tanks in each channel
# The factor of 100 gives a fast solution and an error that is less that 0.1%.
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# delta t is based on the height of the lower baffle in the first channel
# Solution path to get port area and valve diameter
# Find area of ports assuming all including valve are same area.
# Try solution with valve one size smaller
# find required port area
# If that doesn't work, then increase valve size
# find required port area
# These equations are from integration of the flow out of a tank with changing depth
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# If the valve is the flow limiter, the relationship is linear
# The following function returns a port size based on allowable valve sizes
PortSize(desiredT) :=
    tankDrainTime ← 100 hr
    i ← 0
    D_port ← 0*m
    D_port ← D_Valvem[last(D_Valvem)] if desiredT ≤ t_master(L_FlocTank*N_FlocChannels/((N_FlocBaffles + N_FlocChannels + 1)/2), W_FlocChannel, D_Valvem[last(D_Valvem)], Pi_VenaContractaOrifice, (HW_FlocEnd + HW_FlocStart)/2, L_FlocBaffleLower[0], N_FlocChannels + N_FlocBaffles + 1)
    while i < rows(D_Valvem) and D_port == 0*m
        tankDrainTime ← t_master(L_FlocTank*N_FlocChannels/((N_FlocBaffles + N_FlocChannels + 1)/2), W_FlocChannel, D_Valvem[i], Pi_VenaContractaOrifice, (HW_FlocEnd + HW_FlocStart)/2, L_FlocBaffleLower[0], N_FlocChannels + N_FlocBaffles + 1)
        D_port ← D_Valvem[i] if tankDrainTime < 1.1*desiredT
        i ← i + 1 otherwise
        D_port
    return D_port
# The hieghts of lower baffles change between channels
# If the time difference is < 10%, use smaller ports to save on material costs (see if statement)
D_port := PortSize(Ti_wanted)
A_port := π/4*D_port^2
L_BafflePort := sqrt(A_port)
# Assupmtions:
# The Flocculator can be assumed as one straight channel rather than wrapping back and forth
# The volume of each "tank" (space between baffles) is equal
# The size of a port is equal to the size of the valve
# The minor loss through the port is the same as the minor loss through the valve (Pi.VenaContractaOrifice)
t_diff(base, width, D_Port, K_Port, D_Valve, K_Valve, h_initial, H_LowerBaffle, 1) =  # error
