# Flocculator design
# design at half flow rate for plants which are "double train" i.e. over 100Lps. this applies to the sed tank, flocculator and lfom files, in the entrance tank file this returns to the design flow and then goes back to half for the srsf.
# Geometry definitions
# Generic
# Ρ
# S
# J
# Vertical
# Width
# Space
# Height
# Horizontal
# Height
# Space
# Width
J_JS(Pi_JS, S) := Pi_JS*S
# Flocculator efficiency based on CFD results
Pi_VCBaffle := 1/(sqrt(K_FlocBaffle) + 1)
# |
# |
# |
# |
# |
# |
# |
# |
# |
# |
# |
# |
# |
# |
# |
# |
# |
# |
# |
# |
# |
# |
# |
# |
# |
# |
# |
# |
# |
# |
# |
# |
# |
# |
# |
# |
# |
# |
# |
# |
# |
# |
# |
# |
# |
# |
# |
# |
# |
# |
# |
# |
# |
# |
# |
# |
# |
# |
# |
# |
# |
# |
# |
# |
# |
# |
# |
# |
# |
# |
# |
# |
# |
# |
# |
# |
# |
# |
# |
# |
# |
# |
# |
# |
# |
# |
# |
# |
# |
# |
# |
# |
# |
# |
# |
# |
# |
# |
# |
# |
# |
# |
# |
# |
# |
# |
# |
# |
# |
# |
# |
# |
# |
# |
# |
# |
# |
# |
# |
# |
# |
# |
# |
# |
# |
# |
# Non-uniformity of the energy dissipation rate is a function of J/S ratio:
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# For 3 < J/S < 5
# For J/S > 5
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α_ε(Pi_JS) := max(2, Pi_JetPlane^3/Pi_VCBaffle^4*2/K_FlocBaffle*Pi_JS)
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# Flocculator efficiency:
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α_ψ(Pi_JS) := (1/α_ε(Pi_JS))^(1/6)
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# Collision potential for one baffle:
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ψ_B(J, S) := α_ψ(J/S)*J^(2/3)*(K_FlocBaffle/2)^(1/3)
Pi_JSGraph := 3 .. 40  # Used to create the graphs
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# Horizontal vs vertical flocculator decision
Z_FlocBottom := Plant_Origin[2] + T_FlocSlab
S_FlocBaffleMinH := W_HumanMin
# Will generally only use horizontal flocculator if flow rate is great enough that efficient geometry (J/S >= 3) gives at least the target max ED when matching the flocculator depth with the sedimentation tank and maintaining human width between baffles for ease of construction.
#
# To simplifying construction the flocculator will by default always match the sed tank depth. However by manually setting the variable H.FlocOption in Expert Inputs a shallower horizontal flocculator can be forced.
Q_MinHorizontal := (ZW_SedInletChannel - Z_FlocBottom)*S_FlocBaffleMinH*(J_JS(Pi_JSOptMin, S_FlocBaffleMinH)*ED_FlocBod/K_FlocBaffle)^(1/3)
Q_MinHorizontalHighHtoS := (Pi_VCBaffle*S_FlocBaffleMinH)^(4/3)*(ZW_SedInletChannel - Z_FlocBottom)/Pi_JetPlane*ED_FlocBod^(1/3)
# Not used because we won't design non-optimal horizontal flocculators, but Q to meet ED target for J/S > 5 is independent of flow path length (J). Based only on depth and min baffle spacing. This is the same as Q.MinHorizontal above for J/S = 5 (approx.)
EN_FlocHoriz :=
    EN_FlocHoriz ← 1 if Q_Train > Q_MinHorizontal
    EN_FlocHoriz ← 1 if H_FlocOption == -1
    EN_FlocHoriz ← 0 otherwise
T_FlocBaffleH := T_PlantWall
T_FlocBaffle :=
    T_FlocBaffleH if EN_FlocHoriz == 1
    T_SedPlate otherwise
# The maximum depth of a horizontal flocculator for a given flow rate corresponds to a minimum baffle spacing (S) and a width (J) that optimizes the J/S ratio for that minimum S. This is the water level that gives the desired energy dissipation rate.
H_MaxOptHorizF(Q, S_Min, Pi_JS, ED_MaxBod) := Q/S_Min*(K_FlocBaffle/(J_JS(Pi_JS, S_Min)*ED_MaxBod))^(1/3)
H_MaxOptHoriz := H_MaxOptHorizF(Q_Train, S_FlocBaffleMinH, Pi_JSOptMin, ED_FlocBod)
HW_FlocEnd :=
    ZW_SedInletChannel - Z_FlocBottom if H_FlocOption == 0 or H_MaxOptHoriz > (ZW_SedInletChannel - Z_FlocBottom)
    H_MaxOptHoriz if H_FlocOption == -1
    H_FlocOption*m if H_FlocOption > 0
# The flocculator shares the same foundation level with the sed tank when H.FlocOption is 0 OR when the optimal depth for the horizontal flocculator with the min baffle spaces is greater than the sed tank depth. This means that the flocculator will never be deeper than the sed tank unless the depth is manually inputted by assigning a positive value to H.FlocOption.
L_Floc := L_Sed
# Horizontal flocculator design
N_FlocSpacesFH(L, T, S_Min) := (Floor((L + T)/(S_Min + T) + 1, 2) - 1)
# This gives the number of spaces per channel for a horizontal flocculator. Floor to ensure minimum spacing constraint met for horizontal. Subtracting 1 forces it to be odd. Add one before flooring though to get more accurate estimate.
SofN_FlocBaffleF(L, T, N_Spaces) := (L + T)/N_Spaces - T
# This calculates the spacing between baffles given a number of spaces in a channel. Will always be greater than the min S used to calculate N.
S_FlocBaffleED(Q, P, Pi_JS, ED_MaxBod) := (Q/P)^(3/4)*(K_FlocBaffle/(Pi_JS*ED_MaxBod))^(1/4)  # Baffle spacing function for target ED for known P and J/S.
S_FlocBaffleHEst := max(S_FlocBaffleMinH, S_FlocBaffleED(Q_Train, HW_FlocEnd, Pi_JSOptMin, ED_FlocBod))
S_FlocBaffleH := SofN_FlocBaffleF(L_Sed, T_FlocBaffleH, N_FlocSpacesFH(L_Sed, T_FlocBaffleH, S_FlocBaffleHEst))
W_FlocChannelH := S_FlocBaffleH*Pi_JSOptMin
ψ_SpaceH := ψ_B(W_FlocChannelH, S_FlocBaffleH)  # Collision potential per space
# Total number of spaces needed to achieve target collision potential
N_FlocSpacesNeededH := ceil(CP_FlocBod/ψ_SpaceH)
N_FlocSpacesPerChannelH := N_FlocSpacesFH(L_Sed, T_FlocBaffleH, S_FlocBaffleH)
# Determines the number of channels needed based on the number of spaces per channel and the total number of spaces.
N_FlocChannelsH :=
    ceil(N_FlocSpacesNeededH/N_FlocSpacesPerChannelH) if mod(ceil(N_FlocSpacesNeededH/N_FlocSpacesPerChannelH), 2) == 0
    ceil(N_FlocSpacesNeededH/N_FlocSpacesPerChannelH) + 1 otherwise
N_FlocChannelSpacesH :=
    for i ∈ 0 .. N_FlocChannelsH - 1
        Spaces[i] ← N_FlocSpacesPerChannelH - (i == (N_FlocChannelsH - 1))*Floor(W_SedInletChannelPreWeir/S_FlocBaffleH, 2)
    return Spaces
N_FlocChannelBafflesH := N_FlocChannelSpacesH[0] - 1
N_FlocFirstChannelBafflesH := N_FlocChannelBafflesH
N_FlocLastChannelBafflesH := N_FlocChannelSpacesH[N_FlocChannelsH - 1] - 1
# Head loss per floc baffle in horiz flocculator
HL_FlocBaffleH(HW) := K_FlocBaffle*(Q_Train/(S_FlocBaffleH*HW))^2/(2*g)
N_FlocSpacesTotalH := sum(N_FlocChannelSpacesH)
HL_FlocH :=
    HL ← 0 m
    for i ∈ 0 .. N_FlocSpacesTotalH - 1
        HW_space ← HW_FlocEnd + HL
        HL ← HL + HL_FlocBaffleH(HW_space)
    return HL
H_FlocH := HW_FlocEnd + HL_FlocH + H_PlantFreeboard
# Opening to the first space in each channel:
# Extending the center wall between channels into the last flow path creates an expansion in the first baffle space of each channel that would otherwise be wasted. We design the width of the opening such that the vena contracta the follows it has the same velocity as the vena contracta following flow around a baffle.
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L_FlocWallExtensionH := S_FlocBaffleH*(Pi_VenaContractaOrifice - Pi_VCBaffle)/Pi_VenaContractaOrifice
# Parameters:
Vol_FlocH := N_FlocChannelsH*L_Floc*W_FlocChannelH*(HW_FlocEnd + HL_FlocH/2) - N_FlocChannelsH*(N_FlocChannelSpacesH - 1)*T_FlocBaffleH*(W_FlocChannelH - S_FlocBaffleH*Pi_FlocBaffle)*(HW_FlocEnd + HL_FlocH/2)
ψ_FlocH := ψ_SpaceH*N_FlocSpacesTotalH
V_FlocH := Q_Train/((HW_FlocEnd + HL_FlocH/2)*S_FlocBaffleH)
ED_FlocMaxH := α_ε(W_FlocChannelH/S_FlocBaffleH)*K_FlocBaffle*Q_Train^3/(2*W_FlocChannelH*S_FlocBaffleH^3*HW_FlocEnd^3)
ED_FlocAveH := K_FlocBaffle*Q_Train^3/(2*W_FlocChannelH*S_FlocBaffleH^3*HW_FlocEnd^3)
θ_FlocH := N_FlocChannelsH*(L_Sed*W_FlocChannelH*(HW_FlocEnd + HL_FlocH/2) - (N_FlocSpacesPerChannelH - 1)*T_FlocBaffleH*(HW_FlocEnd + HL_FlocH/2)*(W_FlocChannelH - S_FlocBaffleH))/Q_Train
G_FlocH := (ED_FlocAveH/Nu_Water)^(1/2)
Gθ_FlocH := G_FlocH*θ_FlocH
# Vertical flocculator design functions
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# For H/S > 5 (will be the greater of the two when H/S > 5)
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# These are equal when H/S = 5
S_FlocEstVF(ED_FlocBod, Q_Train, W_FlocChannel, HW_FlocEnd) := max((K_FlocBaffle/(ED_FlocBod*HW_FlocEnd))^(1/3)*Q_Train/W_FlocChannel, 1/(ED_FlocBod^(1/4)*Pi_VCBaffle)*(Pi_JetPlane*Q_Train/W_FlocChannel)^(3/4))
# For H/S < 5 (will be the greater of the two when H/S < 5)
N_FlocChannelSpacesVF(ED_FlocBod, Q_Train, W_FlocChannel, L_FlocChannel, T_FlocBaffle, HW_FlocEnd) := Floor((L_FlocChannel + T_FlocBaffle)/(S_FlocEstVF(ED_FlocBod, Q_Train, W_FlocChannel, HW_FlocEnd) + T_FlocBaffle), 2)
S_FlocVF(ED_FlocBod, Q_Train, W_FlocChannel, L_FlocChannel, T_FlocBaffle, HW_FlocEnd) := (L_FlocChannel + T_FlocBaffle - N_FlocChannelSpacesVF(ED_FlocBod, Q_Train, W_FlocChannel, L_FlocChannel, T_FlocBaffle, HW_FlocEnd)*T_FlocBaffle)/N_FlocChannelSpacesVF(ED_FlocBod, Q_Train, W_FlocChannel, L_FlocChannel, T_FlocBaffle, HW_FlocEnd)
ψ_BaffleEstVF(ED_FlocBod, Q_Train, W_FlocChannel, L_FlocChannel, T_FlocBaffle, HW_FlocEnd) := ψ_B(HW_FlocEnd, S_FlocVF(ED_FlocBod, Q_Train, W_FlocChannel, L_FlocChannel, T_FlocBaffle, HW_FlocEnd))
N_FlocBafflesMissingLastChannelVF(ED_FlocBod, Q_Train, W_FlocChannel, L_FlocChannel, T_FlocBaffle, HW_FlocEnd) := Ceil(W_SedInletChannelPreWeir/(S_FlocVF(ED_FlocBod, Q_Train, W_FlocChannel, L_FlocChannel, T_FlocBaffle, HW_FlocEnd) + T_FlocBaffle), 2) - 1
N_FlocBafflesMissingFirstChannelVF(ED_FlocBod, Q_Train, W_FlocChannel, L_FlocChannel, T_FlocBaffle, HW_FlocEnd) := Ceil((S_Fitting + 2*ConRadius(ND_RMPipe))/(S_FlocVF(ED_FlocBod, Q_Train, W_FlocChannel, L_FlocChannel, T_FlocBaffle, HW_FlocEnd) + T_FlocBaffle) - 1, 2)
N_FlocBafflesMissingVF(ED_FlocBod, Q_Train, W_FlocChannel, L_FlocChannel, T_FlocBaffle, HW_FlocEnd) := N_FlocBafflesMissingLastChannelVF(ED_FlocBod, Q_Train, W_FlocChannel, L_FlocChannel, T_FlocBaffle, HW_FlocEnd) + N_FlocBafflesMissingFirstChannelVF(ED_FlocBod, Q_Train, W_FlocChannel, L_FlocChannel, T_FlocBaffle, HW_FlocEnd)
N_FlocChannelsVF(ED_FlocBod, Q_Train, W_FlocChannel, L_FlocChannel, T_FlocBaffle, HW_FlocEnd) := Ceil((CP_FlocBod/ψ_BaffleEstVF(ED_FlocBod, Q_Train, W_FlocChannel, L_FlocChannel, T_FlocBaffle, HW_FlocEnd) + N_FlocBafflesMissingVF(ED_FlocBod, Q_Train, W_FlocChannel, L_FlocChannel, T_FlocBaffle, HW_FlocEnd))/N_FlocChannelSpacesVF(ED_FlocBod, Q_Train, W_FlocChannel, L_FlocChannel, T_FlocBaffle, HW_FlocEnd), 2)
N_FlocSpacesVF(ED_FlocBod, Q_Train, W_FlocChannel, L_FlocChannel, T_FlocBaffle, HW_FlocEnd) := N_FlocChannelsVF(ED_FlocBod, Q_Train, W_FlocChannel, L_FlocChannel, T_FlocBaffle, HW_FlocEnd)*N_FlocChannelSpacesVF(ED_FlocBod, Q_Train, W_FlocChannel, L_FlocChannel, T_FlocBaffle, HW_FlocEnd) - N_FlocBafflesMissingVF(ED_FlocBod, Q_Train, W_FlocChannel, L_FlocChannel, T_FlocBaffle, HW_FlocEnd) - 2
HL_FlocSpaceVF(ED_FlocBod, Q_Train, W_FlocChannel, L_FlocChannel, T_FlocBaffle, HW_FlocEnd) := K_FlocBaffle*(Q_Train/(S_FlocVF(ED_FlocBod, Q_Train, W_FlocChannel, L_FlocChannel, T_FlocBaffle, HW_FlocEnd)*W_FlocChannel))^2/(2*g)
HL_FlocVF(ED_FlocBod, Q_Train, W_FlocChannel, L_FlocChannel, T_FlocBaffle, HW_FlocEnd) := N_FlocSpacesVF(ED_FlocBod, Q_Train, W_FlocChannel, L_FlocChannel, T_FlocBaffle, HW_FlocEnd)*HL_FlocSpaceVF(ED_FlocBod, Q_Train, W_FlocChannel, L_FlocChannel, T_FlocBaffle, HW_FlocEnd)
ψ_FlocSpacesVF(ED_FlocBod, Q_Train, W_FlocChannel, L_FlocChannel, T_FlocBaffle, HW_FlocEnd) :=
    HW[0] ← HW_FlocEnd
    for i ∈ 1 .. N_FlocSpacesVF(ED_FlocBod, Q_Train, W_FlocChannel, L_FlocChannel, T_FlocBaffle, HW_FlocEnd)
        HW[i] ← HW[i - 1] + HL_FlocSpaceVF(ED_FlocBod, Q_Train, W_FlocChannel, L_FlocChannel, T_FlocBaffle, HW_FlocEnd)
        ψ[i] ← ψ_B(HW[i], S_FlocEstVF(ED_FlocBod, Q_Train, W_FlocChannel, HW_FlocEnd))
    return ψ
ψ_FlocVF(ED_FlocBod, Q_Train, W_FlocChannel, L_FlocChannel, T_FlocBaffle, HW_FlocEnd) := sum(ψ_FlocSpacesVF(ED_FlocBod, Q_Train, W_FlocChannel, L_FlocChannel, T_FlocBaffle, HW_FlocEnd))
ψ_FlocSimpleVF(ED_FlocBod, Q_Train, W_FlocChannel, L_FlocChannel, T_FlocBaffle, HW_FlocEnd) := N_FlocSpacesVF(ED_FlocBod, Q_Train, W_FlocChannel, L_FlocChannel, T_FlocBaffle, HW_FlocEnd)*ψ_BaffleEstVF(ED_FlocBod, Q_Train, W_FlocChannel, L_FlocChannel, T_FlocBaffle, HW_FlocEnd)
H_FlocWallsVF(ED_FlocBod, Q_Train, W_FlocChannel, L_FlocChannel, T_FlocBaffle, HW_FlocEnd) := Ceil(HW_FlocEnd + HL_FlocVF(ED_FlocBod, Q_Train, W_FlocChannel, L_FlocChannel, T_FlocBaffle, HW_FlocEnd) + H_PlantFreeboard, 1 cm)
V_FlocVF(ED_FlocBod, Q_Train, W_FlocChannel, L_FlocChannel, T_FlocBaffle, HW_FlocEnd) := Q_Train/(S_FlocVF(ED_FlocBod, Q_Train, W_FlocChannel, L_FlocChannel, T_FlocBaffle, HW_FlocEnd)*W_FlocChannel)
α_εVF(ED_FlocBod, Q_Train, W_FlocChannel, L_FlocChannel, T_FlocBaffle, HW_FlocEnd) := α_ε(HW_FlocEnd/S_FlocVF(ED_FlocBod, Q_Train, W_FlocChannel, L_FlocChannel, T_FlocBaffle, HW_FlocEnd))
ED_FlocMaxVF(ED_FlocBod, Q_Train, W_FlocChannel, L_FlocChannel, T_FlocBaffle, HW_FlocEnd) := α_εVF(ED_FlocBod, Q_Train, W_FlocChannel, L_FlocChannel, T_FlocBaffle, HW_FlocEnd)*K_FlocBaffle*(V_FlocVF(ED_FlocBod, Q_Train, W_FlocChannel, L_FlocChannel, T_FlocBaffle, HW_FlocEnd)^3/(2*HW_FlocEnd))
Vol_FlocVF(ED_FlocBod, Q_Train, W_FlocChannel, L_FlocChannel, T_FlocBaffle, HW_FlocEnd) := W_FlocChannel*N_FlocChannelsVF(ED_FlocBod, Q_Train, W_FlocChannel, L_FlocChannel, T_FlocBaffle, HW_FlocEnd)*L_FlocChannel*(HW_FlocEnd + HL_FlocVF(ED_FlocBod, Q_Train, W_FlocChannel, L_FlocChannel, T_FlocBaffle, HW_FlocEnd)/2)
Ti_FlocVF(ED_FlocBod, Q_Train, W_FlocChannel, L_FlocChannel, T_FlocBaffle, H_Floc) := Vol_FlocVF(ED_FlocBod, Q_Train, W_FlocChannel, L_FlocChannel, T_FlocBaffle, H_Floc)/Q_Train
L_FlocBafflesHighVF(ED_FlocBod, Q_Train, W_FlocChannel, L_FlocChannel, T_FlocBaffle, HW_FlocEnd, Pi_Baffle) := H_FlocWallsVF(ED_FlocBod, Q_Train, W_FlocChannel, L_FlocChannel, T_FlocBaffle, HW_FlocEnd) - Pi_Baffle*S_FlocVF(ED_FlocBod, Q_Train, W_FlocChannel, L_FlocChannel, T_FlocBaffle, HW_FlocEnd)
L_FlocBafflesLowVF(ED_FlocBod, Q_Train, W_FlocChannel, L_FlocChannel, T_FlocBaffle, HW_FlocEnd, Pi_Baffle) := HW_FlocEnd - Pi_Baffle*S_FlocVF(ED_FlocBod, Q_Train, W_FlocChannel, L_FlocChannel, T_FlocBaffle, HW_FlocEnd)
N_FlocBafflesHighVF(ED_FlocBod, Q_Train, W_FlocChannel, L_FlocChannel, T_FlocBaffle, HW_FlocEnd) := (N_FlocChannelSpacesVF(ED_FlocBod, Q_Train, W_FlocChannel, L_FlocChannel, T_FlocBaffle, HW_FlocEnd)/2 - 1)*N_FlocChannelsVF(ED_FlocBod, Q_Train, W_FlocChannel, L_FlocChannel, T_FlocBaffle, HW_FlocEnd) - floor(1/2*N_FlocBafflesMissingLastChannelVF(ED_FlocBod, Q_Train, W_FlocChannel, L_FlocChannel, T_FlocBaffle, HW_FlocEnd))
N_FlocBafflesLowVF(ED_FlocBod, Q_Train, W_FlocChannel, L_FlocChannel, T_FlocBaffle, HW_FlocEnd) := N_FlocChannelSpacesVF(ED_FlocBod, Q_Train, W_FlocChannel, L_FlocChannel, T_FlocBaffle, HW_FlocEnd)/2*N_FlocChannelsVF(ED_FlocBod, Q_Train, W_FlocChannel, L_FlocChannel, T_FlocBaffle, HW_FlocEnd) - ceil(1/2*N_FlocBafflesMissingLastChannelVF(ED_FlocBod, Q_Train, W_FlocChannel, L_FlocChannel, T_FlocBaffle, HW_FlocEnd))
# Vertical flocculator cost optimization and channel width
Cost_UnitSlab := 950/21*USD/m^2
Cost_UnitWall := 1618/21*USD/m^2
Cost_UnitLowerBeam := 321/21*USD/m
Cost_UnitBaffle := 1100/21*USD/(12 ft)
# Masonry costs
A_FlocWallsVF(ED_FlocBod, Q_Train, W_FlocChannel, L_FlocChannel, T_FlocBaffle, HW_FlocEnd) := (L_FlocChannel + 2*W_FlocChannel + 2*T_PlantWall)*H_FlocWallsVF(ED_FlocBod, Q_Train, W_FlocChannel, L_FlocChannel, T_FlocBaffle, HW_FlocEnd)*N_FlocChannelsVF(ED_FlocBod, Q_Train, W_FlocChannel, L_FlocChannel, T_FlocBaffle, HW_FlocEnd)
A_FlocSlabVF(ED_FlocBod, Q_Train, W_FlocChannel, L_FlocChannel, T_FlocBaffle, HW_FlocEnd) := L_FlocChannel*(W_FlocChannel + T_PlantWall)*N_FlocChannelsVF(ED_FlocBod, Q_Train, W_FlocChannel, L_FlocChannel, T_FlocBaffle, HW_FlocEnd)
Perimeter_FlocBeamVF(ED_FlocBod, Q_Train, W_FlocChannel, L_FlocChannel, T_FlocBaffle, HW_FlocEnd) := L_FlocChannel + 2*(W_FlocChannel + T_PlantWall)*N_FlocChannelsVF(ED_FlocBod, Q_Train, W_FlocChannel, L_FlocChannel, T_FlocBaffle, HW_FlocEnd)
Cost_FlocSlabVF(ED_FlocBod, Q_Train, W_FlocChannel, L_FlocChannel, T_FlocBaffle, HW_FlocEnd) := Cost_UnitSlab*A_FlocSlabVF(ED_FlocBod, Q_Train, W_FlocChannel, L_FlocChannel, T_FlocBaffle, HW_FlocEnd)
Cost_FlocWallVF(ED_FlocBod, Q_Train, W_FlocChannel, L_FlocChannel, T_FlocBaffle, HW_FlocEnd) := Cost_UnitWall*A_FlocWallsVF(ED_FlocBod, Q_Train, W_FlocChannel, L_FlocChannel, T_FlocBaffle, HW_FlocEnd)
Cost_FlocBeamVF(ED_FlocBod, Q_Train, W_FlocChannel, L_FlocChannel, T_FlocBaffle, HW_FlocEnd) := Cost_UnitLowerBeam*Perimeter_FlocBeamVF(ED_FlocBod, Q_Train, W_FlocChannel, L_FlocChannel, T_FlocBaffle, HW_FlocEnd)
Cost_FlocStructureVF(ED_FlocBod, Q_Train, W_FlocChannel, L_FlocChannel, T_FlocBaffle, HW_FlocEnd) := Cost_FlocWallVF(ED_FlocBod, Q_Train, W_FlocChannel, L_FlocChannel, T_FlocBaffle, HW_FlocEnd) + Cost_FlocSlabVF(ED_FlocBod, Q_Train, W_FlocChannel, L_FlocChannel, T_FlocBaffle, HW_FlocEnd) + Cost_FlocBeamVF(ED_FlocBod, Q_Train, W_FlocChannel, L_FlocChannel, T_FlocBaffle, HW_FlocEnd)
# Baffle material costs
L_FlocBafflesTotalVF(ED_FlocBod, Q_Train, W_FlocChannel, L_FlocChannel, T_FlocBaffle, HW_FlocEnd.Floc, Pi_Baffle) := N_FlocBafflesHighVF(ED_FlocBod, Q_Train, W_FlocChannel, L_FlocChannel, T_FlocBaffle, HW_FlocEnd)*L_FlocBafflesHighVF(ED_FlocBod, Q_Train, W_FlocChannel, L_FlocChannel, T_FlocBaffle, HW_FlocEnd, Pi_Baffle) + N_FlocBafflesLowVF(ED_FlocBod, Q_Train, W_FlocChannel, L_FlocChannel, T_FlocBaffle, HW_FlocEnd)*L_FlocBafflesLowVF(ED_FlocBod, Q_Train, W_FlocChannel, L_FlocChannel, T_FlocBaffle, HW_FlocEnd, Pi_Baffle)
Cost_FlocBafflesVF(ED_FlocBod, Q_Train, W_FlocChannel, L_FlocChannel, T_FlocBaffle, HW_FlocEnd, Pi_Baffle) := Cost_UnitBaffle*L_FlocBafflesTotalVF(ED_FlocBod, Q_Train, W_FlocChannel, L_FlocChannel, T_FlocBaffle, HW_FlocEnd, Pi_Baffle)*((1 + (W_FlocChannel > T_SedPlate/2))/2)
# Total flocculator cost
Cost_FlocVF(ED_FlocBod, Q_Train, W_FlocChannel, L_FlocChannel, T_FlocBaffle, HW_FlocEnd, Pi_Baffle) := Cost_FlocStructureVF(ED_FlocBod, Q_Train, W_FlocChannel, L_FlocChannel, T_FlocBaffle, HW_FlocEnd) + Cost_FlocBafflesVF(ED_FlocBod, Q_Train, W_FlocChannel, L_FlocChannel, T_FlocBaffle, HW_FlocEnd, Pi_Baffle)
# Select the flocculator width that gives the lowest total cost
W_FlocChannelMin := max(W_HumanMin, W_SedPlate/2)
W_FlocChannelMax := W_SedPlate
W_FlocChannelVF(ED_FlocBod, Q_Train, L_FlocChannel, T_FlocBaffle, H_Floc, Pi_FlocBaffleMin) :=
    for i ∈ 0 .. max(W_FlocChannelMax - W_FlocChannelMin, 0)/cm
        W_FlocArray[i] ← W_FlocChannelMin + i*cm
        Cost_FlocArray[i] ← Cost_FlocVF(ED_FlocBod, Q_Train, W_FlocArray[i], L_FlocChannel, T_FlocBaffle, H_Floc, Pi_FlocBaffleMin)
    MinCost ← min(Cost_FlocArray)
    Index ← match(min(Cost_FlocArray), Cost_FlocArray)
    W_FlocBest ← W_FlocArray[match(min(Cost_FlocArray), Cost_FlocArray)[0]]
    return W_FlocBest
# Vertical flocculator design
# Floc tank dimensions
W_FlocChannelV := W_FlocChannelVF(ED_FlocBod, Q_Train, L_Floc, T_FlocBaffle, HW_FlocEnd, Pi_FlocBaffle)
N_FlocChannelsV := N_FlocChannelsVF(ED_FlocBod, Q_Train, W_FlocChannelV, L_Floc, T_FlocBaffle, HW_FlocEnd)
H_FlocV := H_FlocWallsVF(ED_FlocBod, Q_Train, W_FlocChannelV, L_Floc, T_FlocBaffle, HW_FlocEnd)
# Baffle design
S_FlocBaffleV := S_FlocVF(ED_FlocBod, Q_Train, W_FlocChannelV, L_Floc, T_FlocBaffle, HW_FlocEnd)
N_FlocChannelBafflesV := N_FlocChannelSpacesVF(ED_FlocBod, Q_Train, W_FlocChannelV, L_Floc, T_FlocBaffle, HW_FlocEnd) - 1
N_FlocLastChannelBafflesV := N_FlocChannelBafflesV - N_FlocBafflesMissingLastChannelVF(ED_FlocBod, Q_Train, W_FlocChannelV, L_Floc, T_FlocBaffle, HW_FlocEnd)
N_FlocFirstChannelBafflesV := N_FlocChannelBafflesV - N_FlocBafflesMissingFirstChannelVF(ED_FlocBod, Q_Train, W_FlocChannelV, L_Floc, T_FlocBaffle, HW_FlocEnd)
H_FlocBaffleLow := L_FlocBafflesLowVF(ED_FlocBod, Q_Train, W_FlocChannelV, L_Floc, T_FlocBaffle, HW_FlocEnd, Pi_FlocBaffle)
H_FlocBaffleHigh := L_FlocBafflesHighVF(ED_FlocBod, Q_Train, W_FlocChannelV, L_Floc, T_FlocBaffle, HW_FlocEnd, Pi_FlocBaffle)
Z_FlocLowBaffleTop := Z_FlocBottom + H_FlocBaffleLow
Z_FlocHighBaffleBottom := Z_FlocBottom + S_FlocBaffleV*Pi_FlocBaffle
# Flocculator parameters
HL_FlocV := HL_FlocVF(ED_FlocBod, Q_Train, W_FlocChannelV, L_Sed, T_FlocBaffle, HW_FlocEnd)
ED_FlocMaxV := ED_FlocMaxVF(ED_FlocBod, Q_Train, W_FlocChannelV, L_Sed, T_FlocBaffle, HW_FlocEnd)
ED_FlocAveV := K_FlocBaffle*V_FlocVF(ED_FlocBod, Q_Train, W_FlocChannelV, L_Sed, T_FlocBaffle, HW_FlocEnd)^3/(2*HW_FlocEnd)
ψ_BaffleV := ψ_B(HW_FlocEnd, S_FlocBaffleV)
ψ_FlocV := ψ_FlocVF(ED_FlocBod, Q_Train, W_FlocChannelV, L_Sed, T_FlocBaffle, HW_FlocEnd)
Vol_FlocV := Vol_FlocVF(ED_FlocBod, Q_Train, W_FlocChannelV, L_Sed, T_FlocBaffle, HW_FlocEnd)
Ti_FlocV := Ti_FlocVF(ED_FlocBod, Q_Train, W_FlocChannelV, L_Sed, T_FlocBaffle, HW_FlocEnd)
V_FlocV := Q_Train/(W_FlocChannelV*S_FlocBaffleV)
# Assign final variables based on horiz/vert
# Tank dimensions
W_FlocChannel :=
    W_FlocChannelV if EN_FlocHoriz == 0
    W_FlocChannelH otherwise
N_FlocChannels :=
    N_FlocChannelsV if EN_FlocHoriz == 0
    N_FlocChannelsH otherwise
T_FlocChannelWall := T_PlantWall
W_Floc := N_FlocChannels*W_FlocChannel + (N_FlocChannels - 1)*T_FlocChannelWall
H_Floc :=
    H_FlocV if EN_FlocHoriz == 0
    H_FlocH otherwise
W_FlocPort :=
    S_FlocBaffleV - S_FlocBaffleSetBackPlastic if EN_FlocHoriz == 0
    S_FlocBaffleH - L_FlocWallExtensionH otherwise
H_FlocPort :=
    S_FlocBaffleV*W_FlocChannelV/W_FlocPort if EN_FlocHoriz == 0
    H_Floc otherwise
Vol_Floc :=
    Vol_FlocV if EN_FlocHoriz == 0
    Vol_FlocH otherwise
HL_Floc :=
    HL_FlocV if EN_FlocHoriz == 0
    HL_FlocH otherwise
ZW_FlocMax := Z_FlocBottom + HW_FlocEnd + HL_Floc
Z_FlocTop := Z_FlocBottom + H_Floc
# Baffles
S_FlocBaffle :=
    S_FlocBaffleV if EN_FlocHoriz == 0
    S_FlocBaffleH otherwise
B_FlocBaffle := S_FlocBaffle + T_FlocBaffle
N_FlocChannelBaffles :=
    N_FlocChannelBafflesV if EN_FlocHoriz == 0
    N_FlocChannelBafflesH otherwise
N_FlocFirstChannelBaffles :=
    N_FlocFirstChannelBafflesV if EN_FlocHoriz == 0
    N_FlocFirstChannelBafflesH otherwise
N_FlocLastChannelBaffles :=
    N_FlocLastChannelBafflesV if EN_FlocHoriz == 0
    N_FlocLastChannelBafflesH otherwise
# Flocculator parameters
V_Floc :=
    V_FlocV if EN_FlocHoriz == 0
    V_FlocH otherwise
G_Floc := sqrt(HL_Floc*Q_Train*g/(Nu_Water*Vol_Floc))
ED_FlocMax :=
    ED_FlocMaxV if EN_FlocHoriz == 0
    ED_FlocMaxH otherwise
Ti_Floc := Vol_Floc/Q_Train
CP_Floc :=
    ψ_FlocV if EN_FlocHoriz == 0
    ψ_FlocH otherwise
# Floc channel drain
Q_FlocDrain := Vol_Floc/(N_FlocChannels*Ti_FlocDrain)
ND_FlocDrain := D_pipeschedule(Q_FlocDrain, PS_Default, HW_FlocEnd/2, 0.5 m, Nu_Water, E_Pvc, K_PipeEnt + K_El90 + K_PipeExit)
