## Model Inputs
D_Fractal := 2.3  # based on data from Adachi
NTU := 1.7*mg/L
D_Clay := 2 μm
Π_HD := 0.1  # ratio of clay platelet height to diameter
Φ_Floc := 45/24  # shape factor for drag on flocs used in terminal velocity equation
# 0 is Alum
# 1 is PACl
# An enumerated type that is used in many of the functions below to select which coagulant to use in the analysis.
EN_Chem
D_PACl := 180 nm  # Estimated diameters of the nanoglobs formed by PACl and Alum
# ((AlO4Al12(OH)24(H2O)12)7+)
D_Alum := 70 nm
ρ_H2O := 1000*kg/m^3
ρ_Clay := 2650*kg/m^3
ρ_AlOH3 := 2420*kg/m^3
# Estimated densities of the coagulant precipitate nanoglobs
ρ_PACl := 1138*kg/m^3
ν := 1*10^-6*m^2/s
MW_Ca := 40*gm/mole
MW_Al := 27*gm/mole
MW_S := 32.064*gm/mole
MW_O := 16*gm/mole
MW_H := 1.008*gm/mole
MW_C := 12*gm/mole
MW_Alum := 2*MW_Al + 3*(MW_S + 4*MW_O) + 14.3*(2*MW_H + MW_O)
MW_Alum = 599.821 gm/mol
MW_CalciumCarbonate := MW_Ca + MW_C + 3*MW_O
MW_AlOH3 := MW_Al + 3*(MW_O + MW_H)
MW_CalciumCarbonate = 100 gm/mol
MW_PACl := 13*MW_Al + 24*(MW_O + 2*MW_H) + 16*MW_O = 1039.38 gm/mol
# From Stock Tank Mixing report Fall 2013 https://confluence.cornell.edu/download/attachments/137953883/20131213_Research_Report.pdf?version=1&modificationDate=1386988551000
ρ_PAClSolution(C_Al) := 0.492*C_Al*MW_PACl/(MW_Al*13) + ρ_H2O
C_Alf(ρ_PAClSolution) := 13*MW_Al*(ρ_PAClSolution - ρ_H2O)/(0.492*MW_PACl)  # Concentration of a PACl solution given the solution density
# Given aluminum dose find coagulant precipitate concentration
C_Precipitate(C_Al, EN_Chem) :=
    C_Precipitate ← C_Al/MW_Al*MW_AlOH3/1 if EN_Chem == 0
    C_Precipitate ← C_Al/MW_Al*MW_PACl/13 otherwise
    return C_Precipitate
D_Coag(EN_Chem) :=
    D_Coag ← D_Alum if EN_Chem == 0
    D_Coag ← D_PACl otherwise
    return D_Coag
η_Coag(EN_Chem) :=
    η_Coag ← 0.4*mm/s if EN_Chem == 0
    η_Coag ← 0.4*mm/s otherwise
    return η_Coag  # This is the fitting parameter for the flocculation model. Currently we set this to be the same for both coagulants.
C_Floc(C_Al, C_Clay, EN_Chem) := C_Precipitate(C_Al, EN_Chem) + C_Clay
Mole_Al(C_Al) := C_Al/MW_Al
N_A := 6.0221415*10^23*mole^-1  # Avogadro constant
# annotation to a formula above: from The NIST Reference on Constants, Units, and Uncertainty, from CODATA Recommended Values of the Fundamental Constants - 2002, by Peter J. Mohr and Barry N. Taylor, National Institute of Standards and Technology.
L_SeparationAl(C_Al) := (1/(N_A*Mole_Al(C_Al)))^(1/3)  # Separation distance between Aluminum molecules
N_Clay(C_Clay, D_Clay) := C_Clay/(ρ_Clay*1/6*π*D_Clay^3)
L_SeparationColloids(C_Clay, D_Clay) := (ρ_Clay/C_Clay*π*D_Clay^3/6)^(1/3)  # Separation distance between clay particles
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ϕ_Floc.0(C_Al, C_Clay, EN_Chem) :=
    ϕ_Floc.0 ← C_Precipitate(C_Al, EN_Chem)/ρ_AlOH3 + C_Clay/ρ_Clay if EN_Chem == 0
    ϕ_Floc.0 ← C_Precipitate(C_Al, EN_Chem)/ρ_PACl + C_Clay/ρ_Clay otherwise
    return ϕ_Floc.0
p(C, C_0) := -log(C/C_0)
Invp(pC, C_0) := C_0*10^(-pC)  # p functions!
## Fractal functions
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d(D_Fractal, d_0, i) := d_0*2^(i/D_Fractal)
# Diameter of a floc given i doubling collisions
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n(D_Fractal, d_0, d) := D_Fractal*log(d/d_0, 2)  # number of doubling collisions required to produce a floc of a diameter d.
L_Separation(C_Al, C_Clay, EN_Chem, D_Fractal, d_0, d) := d_0*(π/(6*ϕ_Floc.0(C_Al, C_Clay, EN_Chem)))^(1/3)*(d/d_0)^(D_Fractal/3)
# Separation distance as a function of floc size.
# Floc volume fraction
ϕ(C_Al, C_Clay, EN_Chem, D_Fractal, d_0, d) := ϕ_Floc.0(C_Al, C_Clay, EN_Chem)*(d/d_0)^(3 - D_Fractal)
ρ_Floc.0(C_Al, C_Clay, EN_Chem) := C_Floc(C_Al, C_Clay, EN_Chem)/ϕ_Floc.0(C_Al, C_Clay, EN_Chem)
# Density of the initial floc made of the primary colloid and nanoglobs.
## Floc density as a function of size
ρ_Floc(C_Al, C_Clay, D_Fractal, d_0, d, EN_Chem) := ((ρ_Floc.0(C_Al, C_Clay, EN_Chem) - ρ_H2O)*(d_0/d)^(3 - D_Fractal) + ρ_H2O)
## Floc terminal velocity
V_t(C_Al, C_Clay, EN_Chem, D_Fractal, d_0, d) := g*d_0^2/(18*Φ_Floc*ν)*(ρ_Floc.0(C_Al, C_Clay, EN_Chem) - ρ_H2O)/ρ_H2O*(d/d_0)^(D_Fractal - 1)
## Floc diameter as a function of terminal velocity
d_fVt(C_Al, C_Clay, EN_Chem, D_Fractal, d_0, V_t) := d_0*(18*V_t*Φ_Floc*ν/(g*d_0^2)*ρ_H2O/(ρ_Floc.0(C_Al, C_Clay, EN_Chem) - ρ_H2O))^(1/(D_Fractal - 1))
## Single Collision times for laminar and turbulent flow mediated collisions as a function of floc size
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t_claminar(C_Al, C_Clay, EN_Chem, D_Fractal, d_0, d, ε) := 1/6*(6/π)^(1/3)*ϕ_Floc.0(C_Al, C_Clay, EN_Chem)^(-2/3)*(ν/ε)^(1/2)*(d/d_0)^(2*D_Fractal/3 - 2)
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t_cturbulent(C_Al, C_Clay, EN_Chem, D_Fractal, d_0, d, ε) := 1/6*(6/π)^(1/9)*ϕ_Floc.0(C_Al, C_Clay, EN_Chem)^(-8/9)*ε^(-1/3)*d^(2/3)*(d/d_0)^(8*(D_Fractal - 3)/9)
## Kolmogorov length scale
η_Kolmogorov(ε) := (ν^3/ε)^(1/4)
# Size of the floc that has separation distances equal to the Kolmogorov length scale
D_Kolmogorov(C_Al, C_Clay, EN_Chem, d_0, D_Fractal, ε) := d_0*(1/d_0*(ν^3/ε)^(1/4)*(6*ϕ_Floc.0(C_Al, C_Clay, EN_Chem)/π)^(1/3))^(3/D_Fractal)
# Collision time function based on whether the floc separation distance is greater or less than the Kolmogorov length scale
t_c(C_Al, C_Clay, EN_Chem, D_Fractal, d_0, d, ε) :=
    t_c ← t_claminar(C_Al, C_Clay, EN_Chem, D_Fractal, d_0, d, ε) if L_Separation(C_Al, C_Clay, EN_Chem, D_Fractal, d_0, d) ≤ η_Kolmogorov(ε)
    t_c ← t_cturbulent(C_Al, C_Clay, EN_Chem, D_Fractal, d_0, d, ε) otherwise
    return t_c
# Summation of the collion times given an initial colloid size and a final floc size assuming turbulent flow conditions and that collisions are between similarly sized flocs.
# Use this function for turbulent flow reactors to calculate the total time for a sequence of collisions. Γ is the fraction coverage with nanoglobs and hence the fraction of the collisions that are successful.
t_FlocTotal(C_Al, C_Clay, EN_Chem, D_Fractal, d_0, d_Final, ε, Γ) :=
    n ← n(D_Fractal, d_0, d_Final)
    t ← 0 s
    for i ∈ 0 .. n - 1
        t ← t + t_c(C_Al, C_Clay, EN_Chem, D_Fractal, d_0, d(D_Fractal, d_0, i), ε)
    return t/Γ
# Use this function for laminar flow reactors to calculate the total time for a sequence of collisions
t_FlocTotalLaminar(C_Al, C_Clay, EN_Chem, D_Fractal, d_0, d_Final, ε, Γ) :=
    n ← n(D_Fractal, d_0, d_Final)
    t ← 0 s
    for i ∈ 0 .. n - 1
        t ← t + t_claminar(C_Al, C_Clay, EN_Chem, D_Fractal, d_0, d(D_Fractal, d_0, i), ε)
    return t/Γ
D_FlocMaxf(ε) := 75*μm*(W/kg/ε)^(1/3)
# based on Ian Tse's work with floc size as a function of energy dissipation rate. This is for the average energy dissipation rate in a tube flocculator. It isn't clear how to convert this to the turbulent flow case. Maybe the flocs are mostly experiencing viscous shear. But that isn't clear. Some authors have made the case that floc breakup is due to viscous effects. If that is the case, then the results from the tube flocculator should be applicable to the turbulent case. We will have to account for the temporal and spatial variability in the turbulent energy dissipation rate.
ε_D(D) := ((75 μm)/D)^3*W/kg  # Energy dissipation rate as a function of maximum floc diameter.
## Velocity gradient in coiled tubing for lab scale laminar flow flocculators
G_Straight(Q_Plant, ID_Tube) := 64*Q_Plant/(3*π*ID_Tube^3)
# Reynolds number
Re_Rm(Q_Plant, ID_Tube) := 4*Q_Plant/(π*ID_Tube*ν)
# Dean number: A dimensionless parameter that is the unfortunate combination of Reynolds and tube curvature. It would have been better to keep the Reynolds number and define a simple dimensionless geometric parameter.
De(Q_Plant, ID_Tube, R_Coil) := Re_Rm(Q_Plant, ID_Tube)*(ID_Tube/(2*R_Coil))^(1/2)
G_Coil(Q_Plant, ID_Tube, R_Coil) := G_Straight(Q_Plant, ID_Tube)*(1 + 0.033*log(De(Q_Plant, ID_Tube, R_Coil))^4)^(1/2)
# We need a reference for this. Karen's thesis likely has this equation and the reference.
# Residence time in the tube flocculator.
θ_Tube(ID_Tube, L_Tube, Q_Plant) := L_Tube*π*ID_Tube^2/4/Q_Plant
# Gθ calculated for a coiled tube flocculator.
Gθ(Q_Plant, ID_Tube, R_Coil, L_Tube) := G_Coil(Q_Plant, ID_Tube, R_Coil)*θ_Tube(ID_Tube, L_Tube, Q_Plant)
# Surface area to volume ratio for clay normalized by surface area to volume ratio for a sphere
Π_ClaySphere(Π_HD) := (1/2 + Π_HD)*(2/(3*Π_HD))^(2/3)
# Surface area of clay normalized by total surface of clay + reactor walls. This will be used to estimate how much coagulant actually goes to the clay.
Π_AClayATotal(C_Clay, D_Clay, D_Tube, Π_HD) := 1/(1 + 2*D_Clay/(3*D_Tube*Π_ClaySphere(Π_HD)*C_Clay/ρ_Clay))
# Coverage of clay with nanoglobs given loss to the tube flocculator walls and a poisson distribution on the clay given random hits by the nanoglobs. The poisson distribution results in the coverage only gradually approach full coverage as coagulant dose increases.
Γ_Coag(C_Clay, C_Al, EN_Chem, D_Tube, D_Clay, Π_HD) := 1 - exp(-ϕ_Floc.0(C_Al, 0*mg/L, EN_Chem)*D_Clay/(ϕ_Floc.0(0*mg/L, C_Clay, EN_Chem)*D_Coag(EN_Chem))*1/π*Π_AClayATotal(C_Clay, D_Clay, D_Tube, Π_HD)/Π_ClaySphere(Π_HD))
# The LambertW function is needed to calculate flocculator performance.
LambertW(a) :=
    " formula : courtesy Tom "
    x ←
        ln(a) - ln(ln(a)) if a > e
        error("Argment must be > -1/e") if a < -1/e
        sqrt(a + 1/e) - sqrt(1/e) otherwise
    x_p ← 2*x
    while |x - x_p|/|x| > 10^-10
        x_p ← x
        x ← (x^2 + a*e^(-x))/(1 + x)
    x
# Flocculator and sedimentation tank performance give a laminar coiled tube flocculator and rapid mix. This equation requires intermediate calculations. The coagulant dose is the concentration of aluminum. The max function prevents the prediction from going negative for small number of successful collisions.
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pC_ModelSimple(Gθ_Floc, Gθ_Rm, Γ, ϕ, N_C1, EN_Chem, V_Capture) := max(0, 3*log(e)/2*LambertW(2/3*((Gθ_Floc + Gθ_Rm)*Γ*ϕ^(2/3) - N_C1)*η_Coag(EN_Chem)/V_Capture))
# The equation below is the same as the equation above, but with complete raw parameters rather than intermediate calculations. The coagulant dose is the concentration of aluminum.
pC_ModelFull(Q_Plant, ID_Floc, R_CoilFloc, L_Floc, ID_Rm, R_CoilRm, L_Rm, C_Clay, C_Al, D_Clay, Π_HD, N_C1, EN_Chem, V_Capture) := max(0, 3*log(e)/2*LambertW(2/3*((Gθ(Q_Plant, ID_Floc, R_CoilFloc, L_Floc) + Gθ(Q_Plant, ID_Rm, R_CoilRm, L_Rm))*Γ_Coag(C_Clay, C_Al, EN_Chem, ID_Floc, D_Clay, Π_HD)*ϕ(C_Al, C_Clay, EN_Chem, D_Fractal, D_Clay, D_Clay)^(2/3) - N_C1)*η_Coag(EN_Chem)/V_Capture))
# Calculate the number of total collisions given a removal efficiency. C.Star is the effluent/influence clay concentration.
N_CTotal(C_Star, V_Capture, N_C1, EN_Chem) := -V_Capture/η_Coag(EN_Chem)*C_Star^(-2/3)*ln(C_Star) + N_C1
# This is useful in graphs where we have the N_CTotal for the data.
