D_LfomOrificeMax := .02 m
Π_Lfomorifice := 10
N_rows := Π_Lfomorifice = 10
Row_height := H_dmax/N_rows
r := D_LfomOrificeMax/2
Area := π*r^2*Pi_VenaContractaOrifice
H_halfRow := Row_height/2
H_LfomOrifice :=
    array[N_rows - 1] ← 0
    for i ∈ 0 .. last(array)
        array[i] ← i*Row_height + H_halfRow
    return array
D_LfomOrifices := .787 in
FlowOutSingle(RowIn, RowOut) :=
    heightDiff ← (RowIn - RowOut)*Row_height + H_halfRow
    heightDiff ← 0 if heightDiff < 0
    Velocity ← sqrt(2*g*heightDiff)
    Q_singleOrifice ← Velocity*Area
    return Q_singleOrifice
# this takes the value of the row number directly above the water level and tell the amount of water flowing out of the RowOut row note that FlowOutRow(i, i) = 0
# this sums all of the flow out of the different rows below the level of the input
FlowOutSingle(1, 1) =  # error: This variable is undefined.
TotalFlow_fromRowNumber(RowNumber, Orificearray) :=
    total ← 0
    for i ∈ 0 .. RowNumber
        total ← total + FlowOutSingle(RowNumber, i)*Orificearray[i]
    return total
TotalFlow_vector(orificeArray) :=
    OutFlow[last(orificeArray)] ← 0
    for i ∈ 0 .. last(OutFlow)
        OutFlow[i] ← TotalFlow_fromRowNumber(i, orificeArray)
    return OutFlow
Q_Plant =  # error
H_dmax =  # error
N_rows = 10
H_orificeHeights =  # error
TempOrificeArray[N_rows] := 0
TempOrificeArray = [0; 0; 0; 0; 0; 0; 0; 0; 0; 0; 0]
TotalFlow_fromRowNumber(3, TempOrificeArray) =  # error
incrementHoleOnLevel := FlowOutSingle(1, 1) = 8.62615e-5 m^3/s
IdealOutflow(TotalFlow, NumRows) :=
    Flow[NumRows] ← 0
    for i ∈ 0 .. last(Flow)
        Flow[i] ← (i + 1)*TotalFlow/(NumRows + 1)
    return Flow
TargetFlow := IdealOutflow(Q_Plant, N_rows) = [0.00109091; 0.00218182; 0.00327273; 0.00436364; 0.00545455; 0.00654545; 0.00763636; 0.00872727; 0.00981818; 0.0109091; 0.012] m^3/s
TargetFlow[0]/FlowOutSingle(1, 1) =  # error
MSE(flowArray) :=
    sum ← 0
    for i ∈ 0 .. last(flowArray)
        sum ← sum + (flowArray[i] - TargetFlow[i])^2
    return sum
incrementHoleOnLevel =  # error
pickBetterEstimator(testingArray, bestArray) :=
    testingFlow ← TotalFlow_vector(testingArray)
    bestFlow ← TotalFlow_vector(bestArray)
    toReturn ← testingArray if MSE(bestFlow) > MSE(testingFlow)
    toReturn ← bestArray otherwise
    return toReturn
TargetFlow[0]/(8.765*10^-5*m^3/s) =  # error
pickBottom(testingArray, level) :=
    previousFlow ← TotalFlow_fromRowNumber(level, testingArray)
    additionalFlow ← TargetFlow[level] - previousFlow
    bottom ← floor(additionalFlow/incrementHoleOnLevel)
    return bottom
recurseEstimator(testingArray, bestArray, level) :=
    toReturn ← pickBetterEstimator(testingArray, bestArray) if level > last(testingArray)
    otherwise
        if level ≤ last(testingArray)
            bottom ← pickBottom(testingArray, level)
            for i ∈ bottom .. bottom + 1
                tempArray ← testingArray
                tempArray[level] ← i
                bestArray ← recurseEstimator(tempArray, bestArray, level + 1)
            toReturn ← bestArray
    return toReturn
BestEstimate := recurseEstimator(TempOrificeArray, TempOrificeArray, 0)
BestEstimate =  # error
TotalFlow_vector(BestEstimate) =  # error
TargetFlow =  # error
FlowBestEstimate := TotalFlow_vector(BestEstimate)
FlowBestEstimatewithZERO :=
    temp[rows(FlowBestEstimate)] ← 0
    for i ∈ 1 .. last(temp)
        temp[i] ← FlowBestEstimate[i - 1]
    return temp
TargetFlowwithZERO :=
    temp[rows(TargetFlow)] ← 0
    for i ∈ 1 .. last(temp)
        temp[i] ← TargetFlow[i - 1]
    return temp
ToGraph := FlowBestEstimatewithZERO
TestLocations(array) :=
    temp[last(array)] ← 0
    for i ∈ 0 .. last(temp)
        temp[i] ← i*Row_height
    return temp
IdealGraph := TargetFlowwithZERO
IdealGraph =  # error
xi := 0 .. last(ToGraph)
H_testlocations := TestLocations(ToGraph)
H_testlocations =  # error
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N_LfomOrifices := BestEstimate
