# Linear Chemical Dose Controller
# Select the set of available tubing diameters
# [component: outputs tubediameterunitsystem]
# Select the coagulant to be used
# [component: outputs EN_Coag]
D_LABOrigintoLAOriginZ := 0.0249 m  # Height above top of entrance tank where lever arm is located
H_CdcTubeLong := Z_CdcDripZero - Z_SedChannelBottom
H_CdcTubeShort := Z_EtTop + D_LABOrigintoLAOriginZ - Z_SedChannelBottom - HL_Flowmeasure
H_CdcTubeLong/(W_PlantDC - x) == H_CdcTubeShort/x
X_TubeDrape := W_PlantDC*H_CdcTubeShort/(H_CdcTubeLong + H_CdcTubeShort)
L_CdcTubeMax := sqrt(H_CdcTubeLong^2 + (W_PlantDC - X_TubeDrape)^2) + sqrt(H_CdcTubeShort^2 + X_TubeDrape^2) = 2.48795 m
# slight underestimate
# Functions for Coagulant Viscosities and Selecting Available Tube Diameters
D_TubeAvailable :=
    D ← D_TubeMetric if tubediameterunitsystem
    D ← D_TubeEnglish otherwise
    return D
Nu_Alum(C_Alum) := (1 + 4.255*10^-6*(C_Alum/(kg/m^3))^2.289)*Nu_Water
Nu_PACl(C_PACl) := (1 + 2.383*10^-5*(C_PACl/(kg/m^3))^1.893)*Nu_Water
Nu_Coag(C_Coag, EN_Coag) :=
    Nu ← Nu_Alum(C_Coag) if EN_Coag == 0
    Nu ← Nu_PACl(C_Coag) otherwise
    return Nu
# Tube Diameter Constraints for Laminar Flow and Deviation from Linear Head Loss Behavior
# Minimum diameter for which flow is still laminar at max flow rate
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D_TubeMinLaminar(Q_Max, ν) := 4*Q_Max/(π*ν*Re_PipeTransition)
# Now calculate the minimum diameter which ensures less than 10% error in flow caused by minor losses
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D_TubeMinError(Q_Max, HL_Max) := (8*Q_Max^2*K_CdcTube/((1 - Π_LinearCdcError)*HL_Max*g*π^2)*(1/Π_LinearCdcError - Π_Q))^(1/4)
# The minimum diameter is constrained by both the requirement that tube flow be laminar and that there is a maximum acceptable deviation from linear head loss behavior
D_Min(Q_Max, HL_Max, ν) := max(D_TubeMinLaminar(Q_Max, ν), D_TubeMinError(Q_Max, HL_Max))
# Now we use the forceround function to select the design tube diameter, which is the smallest of the available tube diameters which is still greater than the minimum allowable tube diameter calculated by the function defined above
D_Design(Q_Max, HL_Max, ν) := ForceRound(D_Min(Q_Max, HL_Max, ν), D_TubeAvailable, 1)
# Flow Rate Constraints for Laminar Tube Flow, Deviation from Linear Head Loss Behavior, and Lowest Possible Flow
# This is the estimated maximum flow that can be sent through the a single tube without exceeding the maximum tube length. It is based on eliminating diameter from the Hagen-Poiseuille equation by using the maximum Reynolds number constraint
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Q_MaxLaminar(L_Max, HL_Max, ν) := (L_Max*Re_PipeTransition^4*π^3*ν^5/(2*g*HL_Max))^(1/3)
# Maximum flow that can be put through a tube of a given diameter without exceeding the allowable deviation from linear head loss behavior
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Q_MaxError(D) := π*D^2*sqrt((1 - Π_LinearCdcError)*HL_Cdc*g/(8*K_CdcTube*(1/Π_LinearCdcError - Π_Q)))
# The max flow rate through a dosing tube is the minimum of the previous two constraints
Q_TubeMax(D, L_Max, HL_Max, ν) := min(Q_MaxLaminar(L_Max, HL_Max, ν), Q_MaxError(D))
# At very low flows the design will fail given a finite set of tube diameters and a maximum allowable length. Thus calculate the minimum design flow that can be produced based on the Hagen-Poiseuille equation.
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Q_Min(L_Max, HL_Max, D_Min, ν) := HL_Max*g*π*D_Min^4/(128*ν*L_Max)
# Define a range of feasible coagulant flow rates for plotting. Note that the minimum flow plotted is the minimum design flow (which is the maximum flow for a given design). The maximum flow is set by the constraint for laminar tube flow.
Q_Range := Q_Min(L_CdcTubeMax, HL_Cdc, D_TubeAvailable[0], Nu_Coag(C_CoagDoseMax, EN_Coag)), Q_Min(L_CdcTubeMax, HL_Cdc, D_TubeAvailable[0], Nu_Coag(C_CoagDoseMax, EN_Coag)) + 1*mL/min .. Q_TubeMax(D_TubeAvailable[last(D_TubeAvailable)], L_CdcTubeMax, HL_Cdc, Nu_Coag(C_CoagDoseMax, EN_Coag))
# Length of Tubing Required Given Head Loss, Max Flow, and Diameter
# Length of tube required to get desired head loss at maximum flow based on the Hagen-Poiseuille equation.
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L_Tube(Q_Max, D, HL_Max, ν, K_Minor) := (HL_Max*g*π*vectorize(vectorize(D*D)*vectorize(D*D))/Q_Max - K_Minor*8*Q_Max/π)/(128*ν)
# The maximum tube length constraint may be violated if there aren't enough available tubing diameters.
L_MaxLine(Q) := L_CdcTubeMax
i := 0 .. last(D_TubeAvailable)
Q_CdcDesired[i] := floor(2*Q_TubeMax(D_TubeAvailable[i], L_CdcTubeMax, HL_Cdc, Nu_Coag(C_CoagDoseMax, EN_Coag))/(mL/s))*mL/s/2
# round for convenient flow values
ArrayTrunc(array) :=
    N ← 0.5
    i ← 0
    while N ≠ array[i]
        TruncArray[i] ← array[i]
        N ← array[i]
        i ← i + 1
    TruncArray
# this function will be used to truncate the arrays when the number of tubes is repeated
# Main Coagulant Small-Diameter Tube Design
Q_CoagMin := Q_Plant*C_CoagDoseMax/C_CoagStockMax = 10.5 mL/s
N_CoagCdcTubeArray := ArrayTrunc(ceil(Q_CoagMin/Q_CdcDesired)) = [21; 11; 6; 3]
Q_CoagStockArray := vectorize(submatrix(Q_CdcDesired, 0, last(N_CoagCdcTubeArray), 0, 0)*N_CoagCdcTubeArray) = [1.05e-5; 1.1e-5; 1.2e-5; 1.05e-5] m^3/s
C_CoagStockArray := C_CoagDoseMax*Q_Plant/Q_CoagStockArray = [400; 381.818; 350; 400] kg/m^3
L_CoagCdcTubeArray := L_Tube(submatrix(Q_CdcDesired, 0, last(N_CoagCdcTubeArray), 0, 0), submatrix(D_TubeAvailable, 0, last(N_CoagCdcTubeArray), 0, 0), HL_Cdc, Nu_Coag(C_CoagStockArray, EN_Coag), K_CdcTube) = [0.117969; 0.328635; 0.596564; 0.64575] m
L_CoagCdcTube := FloorNearest(L_CdcTubeMax, L_CoagCdcTubeArray) = 0.64575 m
D_CdcCoag := LookupFloor(L_CdcTubeMax, L_CoagCdcTubeArray, submatrix(D_TubeAvailable, 0, last(N_CoagCdcTubeArray), 0, 0)) = 0.1562 in
N_CoagCdcTubes := LookupFloor(L_CdcTubeMax, L_CoagCdcTubeArray, N_CoagCdcTubeArray) = 3
Q_CoagStock := LookupFloor(L_CdcTubeMax, L_CoagCdcTubeArray, Q_CoagStockArray) = 1.05e-5 m^3/s
C_CoagStock := LookupFloor(L_CdcTubeMax, L_CoagCdcTubeArray, C_CoagStockArray) = 400 kg/m^3
# Chlorine Small-Diameter Tube Design
Q_ChlorMin := Q_Plant*C_ChlorineDoseMax/C_ChlorineStockMax = 2.8 mL/s
N_ChlorCdcTubeArray := ArrayTrunc(ceil(Q_ChlorMin/Q_CdcDesired))
N_ChlorCdcTubeArray =  # error: This variable is undefined.
# we have several solutions with one tube for 32 L/s ...might want a better way to pick a design in this case
Q_ChlorStockArray := vectorize(submatrix(Q_CdcDesired, 0, last(N_ChlorCdcTubeArray), 0, 0)*N_ChlorCdcTubeArray)
C_ChlorStockArray := C_ChlorineDoseMax*Q_Plant/Q_ChlorStockArray = [46.6667; 46.6667; 35; 40] kg/m^3
L_ChlorCdcTubeArray := L_Tube(submatrix(Q_CdcDesired, 0, last(N_ChlorCdcTubeArray), 0, 0), submatrix(D_TubeAvailable, 0, last(N_ChlorCdcTubeArray), 0, 0), HL_Cdc, Nu_Coag(C_ChlorStockArray, EN_Coag), K_CdcTube) = [0.556037; 1.42482; 2.2539; 3.06867] m
L_ChlorCdcTube := FloorNearest(L_CdcTubeMax, L_ChlorCdcTubeArray) = 2.2539 m
D_CdcChlor := LookupFloor(L_CdcTubeMax, L_ChlorCdcTubeArray, submatrix(D_TubeAvailable, 0, last(N_CoagCdcTubeArray), 0, 0)) = 0.003175 m
N_ChlorCdcTubes := LookupFloor(L_CdcTubeMax, L_ChlorCdcTubeArray, N_ChlorCdcTubeArray) = 2
Q_ChlorStock := LookupFloor(L_CdcTubeMax, L_ChlorCdcTubeArray, Q_ChlorStockArray)
C_ChlorStock := LookupFloor(L_CdcTubeMax, L_ChlorCdcTubeArray, C_ChlorStockArray)
# Filter Coagulant Small-Diameter Tube Design
Q_FiCoagMin := Q_Plant*C_FilterCoagDoseMax/C_FilterCoagStockMax = 2.625 mL/s
N_FiCoagCdcTubeArray := ArrayTrunc(ceil(Q_FiCoagMin/Q_CdcDesired)) = [6; 3; 2; 1]
Q_FiCoagStockArray := vectorize(submatrix(Q_CdcDesired, 0, last(N_FiCoagCdcTubeArray), 0, 0)*N_FiCoagCdcTubeArray)
C_FiCoagStockArray := C_FilterCoagDoseMax*Q_Plant/Q_FiCoagStockArray = [14; 14; 10.5; 12] kg/m^3
L_FilterCoagCdcTubeArray := L_Tube(submatrix(Q_CdcDesired, 0, last(N_FiCoagCdcTubeArray), 0, 0), submatrix(D_TubeAvailable, 0, last(N_FiCoagCdcTubeArray), 0, 0), HL_Cdc, Nu_Coag(C_FiCoagStockArray, EN_Coag), K_CdcTube) = [0.570661; 1.46229; 2.28461; 3.12541] m
L_FiCoagCdcTube := FloorNearest(L_CdcTubeMax, L_FilterCoagCdcTubeArray) = 2.28461 m
D_CdcFiCoag := LookupFloor(L_CdcTubeMax, L_FilterCoagCdcTubeArray, submatrix(D_TubeAvailable, 0, last(N_CoagCdcTubeArray), 0, 0)) = 0.003175 m
N_FiCoagCdcTubes := LookupFloor(L_CdcTubeMax, L_FilterCoagCdcTubeArray, N_FiCoagCdcTubeArray) = 2
Q_FiCoagStock := LookupFloor(L_CdcTubeMax, L_FilterCoagCdcTubeArray, Q_FiCoagStockArray)
C_FiCoagStock := LookupFloor(L_CdcTubeMax, L_FilterCoagCdcTubeArray, C_FiCoagStockArray)
# Need the following...
# Select connectors/adaptors required.
# Main Coagulant CHT Float Valve Design
D_CoagFloatValveOrifice :=
    i ← 0
    while h_orifice(D_FltVlvOrificesAvail[i], Pi_VenaContractaOrifice, Q_CoagStock) ≥ H_CoagTankAboveHeadTank
        i ← i + 1
    return D_FltVlvOrificesAvail[i]
D_CoagFloatValveOrifice =  # error
HL_CoagFloatValveOrifice := h_orifice(D_CoagFloatValveOrifice, Pi_VenaContractaOrifice, Q_CoagStock) = 4.65761 cm
L_TubeStockToCHEst := 1 m
HL_CoagTubeStockToCHMax := H_CoagTankAboveHeadTank - HL_CoagFloatValveOrifice = 25.3424 cm
D_CoagTubeStockToCHEst := (128*Nu_Water*L_TubeStockToCHEst*Q_CoagStock/(π*g*HL_CoagTubeStockToCHMax))^(1/4) = 0.142606 in
D_CoagTubeStockToCH := max(3/8*in, D_CoagTubeStockToCHEst) = 0.375 in
# Use 3/8" tubing to connect the stock tank/calibration column to the constant head tank unless a larger tube is needed (which it probably never will be).
# Chlorine CHT Float Valve Design
D_ChlorFloatValveOrifice :=
    i ← 0
    while h_orifice(D_FltVlvOrificesAvail[i], Pi_VenaContractaOrifice, Q_ChlorStock) ≥ H_CoagTankAboveHeadTank
        i ← i + 1
    return D_FltVlvOrificesAvail[i]
D_ChlorFloatValveOrifice =  # error
HL_ChlorFloatValveOrifice := h_orifice(D_ChlorFloatValveOrifice, Pi_VenaContractaOrifice, Q_ChlorStock) = 11.0494 cm
HL_ChlorTubeStockToCHMax := H_CoagTankAboveHeadTank - HL_ChlorFloatValveOrifice = 18.9506 cm
D_ChlorTubeStockToCHEst := (128*Nu_Water*L_TubeStockToCHEst*Q_ChlorStock/(π*g*HL_ChlorTubeStockToCHMax))^(1/4) = 0.120479 in
D_ChlorTubeStockToCH := max(3/8*in, D_ChlorTubeStockToCHEst) = 0.375 in
# Use 3/8" tubing to connect the stock tank/calibration column to the constant head tank unless a larger tube is needed (which it probably never will be).
# Filter Coagulant CHT Float Valve Design
D_FilterCoagFloatValveOrifice :=
    i ← 0
    while h_orifice(D_FltVlvOrificesAvail[i], Pi_VenaContractaOrifice, Q_FiCoagStock) ≥ H_CoagTankAboveHeadTank
        i ← i + 1
    return D_FltVlvOrificesAvail[i]
D_FilterCoagFloatValveOrifice =  # error
HL_FilterCoagFloatValveOrifice := h_orifice(D_FilterCoagFloatValveOrifice, Pi_VenaContractaOrifice, Q_FiCoagStock)
HL_FilterCoagTubeStockToCHMax := H_CoagTankAboveHeadTank - HL_FilterCoagFloatValveOrifice
D_FilterCoagTubeStockToCHEst := (128*Nu_Water*L_TubeStockToCHEst*Q_FiCoagStock/(π*g*HL_FilterCoagTubeStockToCHMax))^(1/4)
D_FilterCoagTubeStockToCH := max(3/8*in, D_CoagTubeStockToCHEst)
# Use 3/8" tubing to connect the stock tank/calibration column to the constant head tank unless a larger tube is needed (which it probably never will be).
# Lever Arm Scale
L_LeverArmTotal := 36 in
L_SliderEffective := 3.5 in  # Distance between the end of the slider and the pivot point of the freefall PVC tube.
L_LeverArmEffective := L_LeverArmTotal - L_SliderEffective
H_Max := 20 cm  # The maximum elevation the doser tube will drop when the slider is at the end of the bar at max plant flow.
# To find the length of the side of the arm with the scale and the side of the arm with the float attached, solve two equations for two unknowns. One equation is similar triangles at maximum flow. The other is that the two sides of the bar must add up to the total.
L_ScaleArmEffective := L_LeverArmEffective/(1 + HL_Cdc/H_Max)
1.75*2.54 = 4.445
L_CdcScaleArm := L_ScaleArmEffective + L_SliderEffective
L_CdcScaleArm =  # error
L_CdcFloatArm := L_LeverArmTotal - L_CdcScaleArm
L_CdcFloatArm =  # error
Angle_LeverArmMax := asin(HL_Cdc/L_CdcFloatArm)  # Not necessarily important.
# This is the elevation difference between the point where the freefall PVC assembly is hung and the point where the end of the tube rests. The horizontal PVC has an outer radius of .525" and the tool hangar likely adds another .5".
#
# This is only significant in zeroing the CHT. It shouldn't effect the lever arm scale because it's a constant.
H_PVCAssembly := 1 in
