# REFERENCES
# [reference: BasicInputs.xmcd]
# [reference: ExpertInputs.xmcd]
# [reference: DesignAssumptions.xmcd]
# [reference: MathFunctions.xmcd]
# [reference: PipeDatabase.xmcd]
# [reference: MinorLossCoefficients.xmcd]
# [reference: FluidsFunctions.xmcd]
# [reference: Sedimentation Tank.xmcd]
# [reference: Flocculator.xmcd]
# [reference: LFOM.xmcd]
# [reference: EntranceTankDim.xmcd]
# INPUTS
Q_Plant = 12 L/s
C_CoagStock = 120 gm/L  # The user input for stock concentration of the coagulant.
C_CoagDoseMax = 60 mgm/L  # The maximum concentration of coagulant in the plant.
D_CdcAvailable1 := [0.0312; 0.0625; 0.0781; 0.0937; 0.125; 0.1562; 0.17; 0.1875; 0.25; 0.3125]*in
D_CdcBarb1 := [□; 0.047 in; □; 0.07 in; 0.075 in; □; □; □; 0.201 in; □]  # error: This placeholder is empty.
D_CdcAvailable1 = [0.79248; 1.5875; 1.98374; 2.37998; 3.175; 3.96748; 4.318; 4.7625; 6.35; 7.9375] mm
Q_CdcMax := Q_Plant*C_CoagDoseMax/C_CoagStock
Q_CdcMax = 6e-6 m^3/s
Q_CdcMax := 3*mL/s  # assumed for now
HL_Cdc = 20 cm
L_CdcDtMin := 80 cm
# The length of the dosing tube has to be at least as great as the maximum head loss with some additional length to be able to reach the ports
# for 2mm used 1/16 (=1.587mm)
L_CdcDtMax := 2 m  # The maximum length of tubing that we are willing to use for the dosing tube.
E_Tube := 0 mm
D_CdcAvailable := [2; 3.175; 4; 5; 6; 6.5]*mm
D_CdcBarb := [0.047 in; 0.075 in; 2.5 mm; 3 mm; 4 mm; 0.201 in]
Nu_Water = 1e-6 m^2/s  # Assume that the kinematic viscosity of coagulant is similar to that of water.
# for 6.5mm used 1/4in tube (= 6.35mm)
K_CdcTube := 5  # Minor loss coefficient estimated from CDC research team data.
HL_CdcMajor(h_l, Q, D, K) := h_l - h_e(Q, D, K)  # Function to calculate the major head losses
Q(L, h_f, D, ν) := h_f*g*π*D^4/(128*ν*L)  # Hagen-Poiseulle equation for laminar flow
# Estimating the minor loss coefficient
# **Estimating the minor loss coefficients from the barbed fitting and the dosing tube
D_CdcDt := 0.125 in
D_CdcBarb := 0.118 in
D_CdcBarb2 := 0.117 in
# 1. Entrance losses in the barbed fitting.
K_Entrance := 0.5  # For a 90 degree turn
# This loss is in the barbed fitting. Translate this loss into a loss in the dosing tube.
# Use a mass balance: Qin = Qout => VinAin =  VoutAout on the minor loss equation: he = Ke *V^2/(2g). The V here is Vin so use Vin = VoutAout/Ain.
K_EntranceDt(D_CdcDt, D_CdcBarb) := K_Entrance*(A_circle(D_CdcDt)/A_circle(D_CdcBarb))^2
# 2. Expansion losses into the dosing tube from the barbed fitting.
K_Expansion(D_CdcDt, D_CdcBarb) := (A_circle(D_CdcDt)/A_circle(D_CdcBarb) - 1)^2
# 3. Exit losses from the dosing tube.
# The centerline velocity in the tube is double the average velocity, so the minor loss coeffcient is doubled from 1.
K_Exit := 2
# 4. Contraction losses from tube into the barbed fitting
# There are losses as the flow travels from the dosing tube into the barbed fitting on the drop tube. The losses are from teh expansion after the contraction from the barbed fitting. The losses are dependednt on a contraction coefficient. The contraction coefficient is described by the ratio between the barbed fitting area and the dosing tube area. The figure below describes this relationship.
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# From: Monroe Weber-Shirk Lecture Notes
ARatio(D_CdcDt, D_CdcBarb2) := A_circle(D_CdcBarb2)/A_circle(D_CdcDt)
ARatio(D_CdcDt, D_CdcBarb2) = 0.876096
C_c := 0.9
# Estimate the contraction coefficient using the area ratio and the graph above.
K_Expansion2(C_c, D_CdcDt, D_CdcBarb2) := (1/C_c - 1)^2*(A_circle(D_CdcDt)/A_circle(D_CdcBarb2))^2
# 5.Total minor loss coefficient
K_Total(D_CdcDt, D_CdcBarb, D_CdcBarb2) := K_EntranceDt(D_CdcDt, D_CdcBarb) + K_Expansion(D_CdcDt, D_CdcBarb) + K_Exit + K_Expansion2(C_c, D_CdcDt, D_CdcBarb2)
K_Total(D_CdcDt, D_CdcBarb, D_CdcBarb2) = 2.66063
# Tube Diameter (diameter is set rather than calculated using the diameter constraint at
# the beg of the section)
# 1. Determine the minimum diameter required.
# a) Minimum diameter based on laminar flow contraint.
# This is the maximum flow that can be sent through the alum feeder without requiring extremely long tubes is based on eliminating diameter from the Hagen-Poiseuille equation by using the maximum Reynolds number constraint. For higher flows multiple parallel tubes could be used. However the maximum flow rate that can be handled by the float valve needs to be considered.
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Q_CdcMaxLaminar(L_max, h_fmax, ν) := (L_max*Re_PipeTransition^4*π^3*ν^5/(2*g*h_fmax))^(1/3)
Q_CdcMaxLaminar(L_CdcDtMax, HL_Cdc, Nu_Water) = 6.7493 mL/s
# Minimum diameter required to get laminar flow at max flow based on Reynolds number for transition to turbulence
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D_CdcMinLaminar(Q_max, ν) := 4*Q_max/(π*ν*Re_PipeTransition)
# Minimum diameter for the particular coagulant flow to maintain laminar flow.
D_CdcMinLaminar(Q_CdcMax, Nu_Water) = 1.81891 mm
# Now we can calculate the diameter of tubing required to accomodate the largest flow that a flow control module can deliver without requiring an excessively long tube
# Largest diameter tube we'd use.
D_CdcMinLaminar(Q_CdcMaxLaminar(L_CdcDtMax, HL_Cdc, Nu_Water), Nu_Water) = 4.09213 mm
# b) Minimum diameter based on head loss constraint.
# Calculate the minimum diameter required to produce the desired head loss at the maximum
# flow using the minimum length of tubing. Based on the Hagen-Poiseuille equation.
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D_CdcMinHeadLoss(Q_max, L_min, h_fmax, ν) := (128*ν*Q_max*L_min/(h_fmax*g*π))^(1/4)
D_CdcMinHeadLoss(Q_CdcMax, L_CdcDtMin, HL_Cdc, Nu_Water) = 2.65724 mm
# c) Minimum diameter to ensure minor losses are small compared to the total head loss.
# Set the minor loss to be at most 15% of the total head loss available.
Pi_CdcQerror := 0.15
HL_MinorMax := Pi_CdcQerror*HL_Cdc
D_CdcMinorLoss(h_e, K, Q) := (4*Q/π)^(1/2)*(K/(h_e*2*g))^(1/4)
D_CdcMaxMinorLoss := D_CdcMinorLoss(HL_MinorMax, K_CdcTube, Q_CdcMax) = 3.33688 mm
# d) Minimum diameter than satisfies laminar flow, head loss, and the minor loss constraints.
# The minimum diameter required would be the one that maintains laminar flow at the max length of tubing and produces the necessary head loss at the minimum length of tubing. Thus, the minimum diameter chosen in the one that is the maximum of the two previous diameters calculated. The diameters can be larger than the one calculated, but they cannot be smaller.
D_CdcMin(Q_max, L_min, h_fmax, ν, h_emax, K) := max(D_CdcMinLaminar(Q_max, ν), D_CdcMinHeadLoss(Q_max, L_min, h_fmax, ν), D_CdcMinorLoss(h_emax, K, Q_max))
D_CdcMin(Q_CdcMax, L_CdcDtMin, HL_Cdc, Nu_Water, HL_MinorMax, K_CdcTube) = 3.33688 mm
# e) Tube diameter constraint
# There is also a constraint of given tube diameters. First we write a function that will round up to the up to the next available tube size.
forceround(x, xarray, direction) :=
    xarray ← sort(xarray)
    i ← 0
    while x > xarray[i]
        i ← i + 1
    return xarray[i - 1 + direction]  # direction is for rounding up (1) or rounding down (0).
D_CdcAvailable = [2; 3.175; 4; 5; 6; 6.5] mm
# Now we use the forceround function to find the design tube diameter based on the minimum tube diameter and the available tube diameters.
D_CdcDtDesignf(Q_max, L_min, h_fmax, ν, h_emax, K) := forceround(D_CdcMin(Q_max, L_min, h_fmax, ν, h_emax, K), D_CdcAvailable, 1)
D_CdcDtDesign := D_CdcDtDesignf(Q_CdcMax, L_CdcDtMin, HL_Cdc, Nu_Water, HL_MinorMax, K_CdcTube)
D_CdcDtDesign = 4 mm  # This is the min diameter of tube that meets laminar flow, head loss, and minor  loss constraints.
D_CdcTubeDesign := D_CdcDtDesign
D_CdcTubeDesign := 0.124 in
# This is the diameter that will be used because it provides reasonable lengths and can cover the entire range when not considering minor losses.
D_CdcTubeDesign := 0.124 in
# Determine the maximum flow rate you could get out of the doser with minor losses using the optimal diameter, which is the one that produces reasonable tubing lengths.
Area(D) := 1/4*π*D^2
D_CdcTubeDesign = 0.124 in
Q_Minor(h_e, K, D) := (2*g*h_e/K*Area(D)^2)^(1/2)  # This is the minor loss equation.
Q_MaxMinor := Q_Minor(HL_MinorMax, K_CdcTube, D_CdcTubeDesign)
Q_MaxMinor = 2.67271 mL/s
# Design calculations: Number of tubes, tubing length, maximum doser flow rate
# If you set the max tubing length such that a small region meets that criteria it can cause a noncontinuos solution with a gap that has too high a tubing length.
Q_MaxMinor = 2.67271 mL/s
# The maximum flow rate you can get out of the dosing tube with the optimal diameter, keeping minor losses below a certain percentage of the total head loss available.
N_TubesMax := 9  # The maximum number of dosing tubes the design can have. A reducer is required if the number of tubes is greater than 3.
N_Tubef(Q_Coag, Q_CoagMaxDesign) := ceil(Q_Coag/Q_CoagMaxDesign)
N_Tube := N_Tubef(Q_CdcMax, Q_MaxMinor)
N_Tube = 2
# Coagulant flow rate per tube:
Q_Tube(Q_Coag, Q_CoagMaxDesign) := Q_Coag/N_Tubef(Q_Coag, Q_CoagMaxDesign)
Q_TubeDesign := Q_Tube(Q_CdcMax, Q_MaxMinor)
Q_TubeDesign = 1.5 mL/s
Q_TubeDesign = 1.5 mL/s
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L_CdcDtDesignf(Q, D, h_l, ν, K) := (h_l - h_e(Q, D, K))*g*π*D^4/(128*ν*Q)
L_CdcDtDesign := L_CdcDtDesignf(Q_TubeDesign, D_CdcTubeDesign, HL_Cdc, Nu_Water, K_CdcTube)
L_CdcDtDesign = 3.00886 m
# Length of tube required to get desired major head loss at maximum flow based on the Hagen-Poiseuille equation. It takes minor head loss into account. The flow rate is the flow rate per dosing tube (calculated above).
fraction := 0.5  # The fraction is used to fit point for calibration that minimizes maximum error.
# The equation below uses the fraction. Not using this right now.
L_CdcDtDesign1 := L_CdcDtDesignf(Q_TubeDesign*fraction, D_CdcTubeDesign, HL_Cdc*fraction, Nu_Water, K_CdcTube)
# This is the minimum length of the tubing assuming the tubing flow rate is the maximum flow rate. This takes minor losses into account.
Q_MaxMinor = 2.67271 mL/s
L_CdcDtDesignMinor(Q, D, h_l, ν, K) := (h_l - h_e(Q, D, K))*g*π*D^4/(128*ν*Q)
L_CdcDtDesignMin := L_CdcDtDesignf(Q_MaxMinor, D_CdcTubeDesign, HL_Cdc, Nu_Water, K_CdcTube)
L_CdcDtDesignMin = 1.50654 m
# The maximum coagulant flow rate for the CDC depends on the maximum coagulant flow rate given the minor losses.
Q_TotalMaxMinor := N_TubesMax*Q_MaxMinor
Q_TotalMaxMinor = 24.0544 mL/s
# RANGE OF FLOWS FOR GRAPH
# Define a range of flows that we will use to plot the results.
Q_CdcMax = 3 mL/s
Q_MaxMinor = 2.67271 mL/s
# want to find the maximum flow that we can get from our largest diameter tube.
# We need to use the laminar flow constraint because that dominates for high flows.
Q_CdcMaxDesign := π*D_CdcDtDesign*Re_PipeTransition*Nu_Water/4
D == 4*Q_max/(π*ν*Re_max)
Q_CdcMaxDesign = 6.59734 mL/s
# At very low flows the design will fail given a finite set of tube diameters. Thus calculate the minimum design flow that can be produced based on the Hagen-Poiseuille equation.
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Q_min(L_max, h_fmax, D_min, ν) := h_fmax*g*π*D_min^4/(128*ν*L_max)
Q_min(L_CdcDtMax, HL_Cdc, D_CdcAvailable[0], Nu_Water) = 0.385106 mL/s
# Redefine the flow rate to only include the feasible range given the constraints. Note that the minimum flow plotted is the minimum design flow. The design flow is the maximum flow for a flow control module.
Q_range := Q_min(L_CdcDtMax, HL_Cdc, D_CdcAvailable[0], Nu_Water), Q_min(L_CdcDtMax, HL_Cdc, D_CdcAvailable[0], Nu_Water) + 1*mL/min .. Q_CdcMaxLaminar(L_CdcDtMax, HL_Cdc, Nu_Water)
# The maximum tube length constraint may be violated if there aren't enough available tubing diameters.
Q_range := 0.1*mL/s, 0.2*mL/s .. Q_MaxMinor
# GRAPH WITH MINOR LOSS -Tubing
D_CdcDtDesign = 4 mm
D_CdcDtDesign = 0.15748 in
L_CdcDtDesign = 3.00886 m
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D_CdcTubeDesign = 0.0031496 m
Q_range2 := 1*mL/s, 1.01*mL/s .. Q_TotalMaxMinor
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# GRAPH WITH MINOR LOSS -Errors
# Determine what elevation has the maximum error in flow rate.
# The fluids function, Q.pipetotal, was used to estimate what the flow rate would be at different elevations given a total head loss and minor loss coefficient.
# With a HL.Cdc = 15cm, the greatest error is at 7cm.
# With a HL.Cdc = 20cm, the greatest error is at 9.4 cm
# ***** NEED TO FIX THIS
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D_CdcTubeDesign = 0.124 in
i := 1, 2 .. HL_Cdc/mm
L_design =  # error: This variable is undefined.
h[i] := i*mm
Error[i] := (Q_pipetotal(D_CdcTubeDesign, h[i], L_CdcDtDesign, Nu_Water, E_Tube, K_CdcTube) - Q_pipetotal(D_CdcTubeDesign, HL_Cdc, L_CdcDtDesign, Nu_Water, E_Tube, K_CdcTube)*h[i]/HL_Cdc)
MaxError := max(Error)
MaxError = 0.0176471 mL/s
indexError := index(MaxError, Error)
indexError = 96
H_maxerror := h[indexError]
H_maxerror = 9.6 cm
Error = [
    0; 0.000369045; 0.000733996; 0.00109486; 0.00145163; 0.00180432; 0.00215292; 0.00249745; 0.00283791; 0.00317429
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] mL/s
Error[indexError] = 0.0176434 mL/s
fraction[i] := Error[i]/(Q_pipetotal(D_CdcTubeDesign, HL_Cdc, L_CdcDtDesign, Nu_Water, E_Tube, K_CdcTube)*h[i]/HL_Cdc)
Error[0] = 0 m^3/s
fraction[i] = [
    0.0492006; 0.0489277; 0.0486549; 0.0483823; 0.0481098; 0.0478375; 0.0475653; 0.0472932; 0.0470213; 0.0467495
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]
# Entrance Region Effects
# Entrance Region Length
L_entrance(Q) := 0.06*4*Q/(π*Nu_Water)
L_Ent :=
    for i ∈ 0 .. 5
        Q[i] ← i*mL/s
        L[i] ← 0.06*4*Q[i]/(π*Nu_Water)
    return L
L_Ent = [0; 0.0763944; 0.152789; 0.229183; 0.305577; 0.381972] m
# Questions
# max flow for small float valve (where design flips to larger valve)
# Min diameter of supply flexible tubing to CHT at MAX flow of linear dose controller.
# Evaluate whether it is reasonable to always uses this large diameter of supply tubing.
# Determine appropriate diameters for calibration columns
# Is the calibration column fixed or movable?
# Is there one diameter of dosing tubing that will work for allllll flows?
#
# Is all of our logic correct in this sheet? simplify and beautify and document better than Monroe did!
#
# When calibrating a CDC you start with a piece of tubing that is too long. You measure the flow at max head loss. How do you use that information to figure out how long to make the tubing?
#
# What is the min length of tube for the diameter that you are using to maintain laminar flow? This should be reported in the design documentation as a warning to not cut the tube shorter than this length.
# Lever Arm Scale
HL_Cdc = 0.2 m  # Difference between the min and max water levels in the entrance tank. Maximum head loss through the LFOM.
L_LeverArmTotal := 36 in  # Set to be this length.
L_SliderEffective := 3.5 in  # Distance between the end of the slider and the pivot point of the freefall PVC tube.
L_LeverArmEffective := L_LeverArmTotal - L_SliderEffective
H_Max := 20 cm  # The maximum elevation the doser tube will drop when the slider is at the end of the bar at max plant flow.
# To find the length of the side of the arm with the scale and the side of the arm with the float attached, solve two equations for two unknowns. One equation is similar triangles at maximum flow. The other is that the two sides of the bar must add up to the total.
L_ScaleArmEffective := L_LeverArmEffective/(1 + HL_Cdc/H_Max) = 16.25 in
1.75*2.54 = 4.445
L_CdcScaleArm := L_ScaleArmEffective + L_SliderEffective
L_CdcScaleArm = 0.50165 m
L_CdcFloatArm := L_LeverArmTotal - L_CdcScaleArm
L_CdcFloatArm = 0.41275 m
Angle_LeverArmMax := asin(HL_Cdc/L_CdcFloatArm) = 28.9833 deg  # Not necessarily important.
L_SliderEffective := 3 in
# This is the distance between the end of the slider and the point where the freefall PVC is hung. (it's not drawn at exactly 3", but we'll change that. the drawing was arbitrary initially).
L_WallClearance := L_HalfWall + L_Slider - L_SliderEffective + L_Extra
# This is the minumum distance the first tick mark can be from the lever arm pivot point in order for the PVC assembly to have enough clearance from the entrance tank wall.
# This is the elevation difference between the point where the freefall PVC assembly is hung and the point where the end of the tube rests. The horizontal PVC has an outer radius of .525" and the tool hangar likely adds another .5".
#
# This is only significant in zeroing the CHT. It shouldn't effect the lever arm scale because it's a constant.
H_PVCAssembly := 1 in
H_MinDoseMaxFlow := 128*Nu_Water*L_Tube*Q_CdcCoagulantMinMax/(g*π*ID_CdcTube^4)
# This is the minumum tube head loss when the lever arm is at max angle (max plant flow) and the dose is at a minumum, which corresponds to the first point on the scale.
L_FirstPoint := H_MinDoseMaxFlow/sin(Angle_LeverArmMax) + L_SliderEffective
# This is the distance between the first tick mark and the pivot point along the lever arm. It must be greater than L.WallClearance in order for the PVC assembly to be far enough from the tank wall.
# Float Valve Selection
# Calculating the CHT float valve sizes required to supply the maximum coagulant flow rate.
CdcChtFloatValve := [0.093 in, .25 in, "Barb"; 0.187 in, 0.5 in, "NPT"; 0.25 in, 0.5 in, "NPT"; 0.312 in, 0.5 in, "NPT"]
CdcChtFloatValve = [2.3622, 6.35, "Barb"; 4.7498, 12.7, "NPT"; 6.35, 12.7, "NPT"; 7.9248, 12.7, "NPT"] mm
i := 0 .. rows(CdcChtFloatValve) - 1
D_CdcFloatValveOrifice[i] := CdcChtFloatValve[i, 0]
HL_StockMax := 30 cm  # Max head loss between stock tanks and constant head tank.
# Below are the flow rates that can be obtained from the float valve sizes above.
Q_CdcChtFloatValveMax := Q_orifice(D_CdcFloatValveOrifice, HL_StockMax, Pi_VenaContractaOrifice)
h_orifice(D, Pi_VenaContractaOrifice, Q) := (Q/(Pi_VenaContractaOrifice*A_circle(D)))^2*1/(2*g)
Q_CdcChtFloatValveMax = [6.59099; 26.6482; 47.6283; 74.1813] mL/s
100*L/s*80*mg/L/(120*gm/L) = 66.6667 mL/s
h_orifice(0.312 in, Pi_VenaContractaOrifice, 66.667*mL/s) = 0.242301 m
# Choose Stock Tank Float depending on highest coagulant flow needed.
# Find the float that will be able to supply the maximum coagulant flow.
Q_CdcChtFloatValve := CeilNearest(Q_CdcMax, Q_CdcChtFloatValveMax)
# Find the index of this float in the matrix to find the diameter of the float valve orifice.
index_CdcChtFloatValve := index(Q_CdcChtFloatValve, Q_CdcChtFloatValveMax) = 0
# The specific size of the float valve orifice required to supply the maximum coagulant flow rate.
D_CdcChtFloatValve := D_CdcFloatValveOrifice[index_CdcChtFloatValve] = 0.093 in
# GRAPH WITHOUT MINOR LOSS
D_CdcDtDesign1 =  # error
D_CdcDtDesign1 =  # error
L_CdcDtDesign1 = 3.08346 m
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