# AguaClara Water Treatment Plants
# Automated Design
# Add variable descriptions next to every varible so it is easy to interpret what this all means.
# Design References
# [reference: BasicInputs.xmcd]
# Use BasicClientInputs and ExpertClientInputs when this is run by LabVIEW.
# Use BasicInputs and ExpertInputs to use the program in MathCAD
# Change the reference by
# - right clicking
# - select properties
# - reference tab
# - type in the correct file name
# [reference: ExpertInputs.xmcd]
# [reference: DesignAssumptions.xmcd]
# [reference: MathFunctions.xmcd]
# [reference: PipeDatabase.xmcd]
# [reference: MinorLossCoefficients.xmcd]
# [reference: FluidsFunctions.xmcd]
# [reference: Sedimentation Tank.xmcd]
# [reference: Floc Hopper.xmcd]
# [reference: FCM.xmcd]
# [reference: Flocculator 3.xmcd]
# [reference: RapidMixer.xmcd]
# [reference: Materials List.xmcd]
# [reference: EntranceTankDim.xmcd]
# Sed Tanks and Slopes:
B_SedPort =  # no stored result  # Height of the narrowest part of the manifold ports
N_SedTanks = 2
W_SedPort = 3.68418 cm
H_SedBetween = 0 cm  # Distance from the top of the inlet manifold to the bottom of the ledge supporting the lamella frame
A_SedPort = 13.5732 cm^2  # Port Area
L_Sed = 2.01242 m
W_SedSludgeFlat = 5 cm  # Distance between tips of manifold plates (space alloted for the drain holes
N_SedBays = 1  # Number of bays of inlet manifolds in each sed tank
AN_SedTopInlet = 60 deg  # Angle of the top of the inlet manifold
L_SedPort = 4.25412 cm  # Length of the port through which water exits the inlet manifold
AN_SedBottom = 10 deg  # Angle of the bottom of inlet manifold
W_SedSlopePlate = 30 cm  # Width of ferrous cement plates in whice one manifold port is cut
Q_SedBay = 1.5 L/s
W_SedBayActual = 0.92 m
L_SedSlopeManifold = 0.800718 m  # This is the extra distance between the last slope and the wall
# Sedimentation Tank Sludge Drain:
N_SedSludgeOrifices = 13  # per cell
Ti_SludgeDrain = 30 min  # Tank Drain time
W_SedSludge = 7.02125 cm  # Width of the sludge channel
B_SedSludgeOrifices = 15 cm  # Distance center to center between drain orifices
H_SedSludge = 3.51063 cm  # Depth of the sludge channel
T_SedSludge = 7.4641 cm
T_SedSludge = 7.4641 cm
# Thickness of the plate topping the sludge channel
# through which drain holes are formed
W_SedDrainCover = 19.2376 cm
D_SedSludgeOrifice = 0.0127 m  # Diameter of drain orifices
W_SedInletBottom = 0.363812 m
N_SedSludgeOrifices = 13
ND_SedSludgeValve = 1.5 in
# Sedimentation Tank Dimensions:
Z_SedSludge = 0.109747 m  # Height from 0 of the top of the sludge drain
H_SedBottomSlope = 0.0598237 m  # Height of the bottom slope
H_SedTopSlope = 0.693442 m  # Height of the top of the inlet manifold
Z_SedSlopes = 0.803189 m  # Height from 0 of the top of the inlet manifold
W_Sed = 0.92 m  # Total tank wall height
L_Sed = 2.01242 m  # Total tank length
# Inlet Channel:
HW_InletChannel = 0.160129 m  # Width of the drop chimneys connecting channel to sed inlet manifolds
W_InletChannel = 0.160129 m  # length of drop chimmneys
L_Channel = 2.29 m
W_SedManifoldEntrance = 0.0369621 m
L_SedManifoldEntrance = 0.211412 m
H_SedManifoldPort = 0.132479 m  # Ports at bottom of inlet chimney are set to be triangles
W_SedManifoldPort = 0.298759 m
N_SedInletPipes = 2  # per sed bay
H_InletChannel = 0.260129 m
# Sedimentation Tank Effluent Launder:
N_SedLaunderOrifices = 30  # Number of orifices per launder
Q_SedLaunderOrifices =  # no stored result
# More Launder Dimensions
ND_SedLaunder = 3 in
B_SedLaunderOrifices = 0.1 m  # Center to center launder spacing
L_SedLaunder = 1.54217 m
# Exit Channel:
D_SedLaunderOrifice = 0.3125 in
W_ExitChannel = 0.160129 m
H_ExitChannel = 0.260129 m
L_ExitChannel = 2.29 m
H_PltWeir = 0.0900418 m  # height of the weir carrying water to the distribution tank
HW_ExitChannel = 0.120129 m  # water height in exit channel from 0
# Lamella:
L_SedPlate = 0.4572 m
B_SedPlate = 1.75545 cm  # center to center distance between lamella
S_SedPlate = 1.7 cm  # spacing between lamella
N_SedPlates = 59  # Number of Sed Plates per Sedimentation Tank Bay.
AN_SedPlate = 60 deg
ZW_ExitChannel = 1.45456 m
V_SedC = 11.6139 m/day
L_SedActive = 0.959183 m
T
V_SedUp = 70 m/day
Z_SedLaunder = 1.41011 m
H_SedPlate = 0.395947 m
H_SedAbove = 0.1289 m  # Height of water needed above the lamella
N_SedPlates = 59
HW_Sed = 1.49456 m
H_Sed = 1.59456 m
Z_Mp = 1.33443 m
N_SedPorts = 5
H_SedBayDivider = 0.873189 m
W_SedSlopePlateRemaining = 0.512422 m
W_SedBayDivider = 0.15 m
# Sedimentation Tank Floc Hopper:
A_FlocHopper = 0.46656 m^2
L_FlocHopper = 0.50713 m  # Length of the hopper cement plate
L_FlocHopperOffset = 0.2286 m  # distance from the edge of the channel to the bottom of the first lamella (collection distance)
W_FlocHopper = 0.92 m  # width of the hopper set within each bay
# Flow Controller:
# [reference: FCM.xmcd]
N_Fcm = 1
ID_FcmTube = 3.175 mm
ID_FcmTube = 0.125 in
L_FcmTube = 209.132 cm
Q_FcmTubeMax = 135 mL/min
HL_FcmValve = 3.386 cm
# Flocculator: | Look at Flocculator Positioning arrays
# [reference: Flocculation Energy Dissapation.xmcd]
W_FlocChannel = 0.45 m
# Fill last channel with bafffles from last channel
# Fix port width to be based on energy dissipation in that channel
ED_Floc = [20; 2] mW/kg
# Adjust spacing after the number of baffles per channel is known.
# Check the residence time of the flocculator should be at least 20minutes
HW_FlocEnd = 1.49456 m
X_FlocBaffles = [
    0.0284141, 0.0389393, 0.0626211, 0.0626211;
    0.0968282, 0.117879, 0.165242, 0.165242;
    0.165242, 0.196818, 0.267863, 0.267863;
    0.233656, 0.275757, 0.370484, 0.370484;
    0.30207, 0.354697, 0.473106, 0.473106;
    0.370484, 0.433636, 0.575727, 0.575727;
    0.438899, 0.512575, 0.678348, 0.678348;
    0.507313, 0.591515, 0.780969, 0.780969;
    0.575727, 0.670454, 0.88359, 0.88359;
    0.644141, 0.749393, 0.986211, 0.986211;
    0.712555, 0.828333, 1.08883, 1.08883;
    0.780969, 0.907272, 1.19145, 1.19145;
    0.849383, 0.986211, 1.29407, 1.29407;
    0.917797, 1.06515, 1.3967, 1.3967;
    0.986211, 1.14409, 1.49932, 1.49932;
    1.05463, 1.22303, 1.60194, 1.60194;
    1.12304, 1.30197, 1.70456, 1.70456;
    1.19145, 1.38091, 1.80718, 1.80718;
    1.25987, 1.45985, 1.9098, 1.9098;
    1.32828, 1.53879, 0, 0;
    1.3967, 1.61773, 0, 0;
    1.46511, 1.69667, 0, 0;
    1.53352, 1.7756, 0, 0;
    1.60194, 1.85454, 0, 0;
    1.67035, 1.93348, 0, 0;
    1.73877, 0, 0, 0;
    1.80718, 0, 0, 0;
    1.87559, 0, 0, 0;
    1.94401, 0, 0, 0
] m
L_FlocBaffles = [
    2.17984, 2.16931, 2.14563, 2.14563;
    1.46614, 1.45562, 1.43194, 1.43194;
    2.17984, 2.16931, 2.14563, 2.14563;
    1.46614, 1.45562, 1.43194, 1.43194;
    2.17984, 2.16931, 2.14563, 2.14563;
    1.46614, 1.45562, 1.43194, 1.43194;
    2.17984, 2.16931, 2.14563, 2.14563;
    1.46614, 1.45562, 1.43194, 1.43194;
    2.17984, 2.16931, 2.14563, 2.14563;
    1.46614, 1.45562, 1.43194, 1.43194;
    2.17984, 2.16931, 2.14563, 2.14563;
    1.46614, 1.45562, 1.43194, 1.43194;
    2.17984, 2.16931, 2.14563, 2.14563;
    1.46614, 1.45562, 1.43194, 1.43194;
    2.17984, 2.16931, 2.14563, 2.14563;
    1.46614, 1.45562, 1.43194, 1.43194;
    2.17984, 2.16931, 2.14563, 2.14563;
    1.46614, 1.45562, 1.43194, 1.43194;
    2.17984, 2.16931, 2.14563, 2.14563;
    1.46614, 1.45562, 0, 0;
    2.17984, 2.16931, 0, 0;
    1.46614, 1.45562, 0, 0;
    2.17984, 2.16931, 0, 0;
    1.46614, 1.45562, 0, 0;
    2.17984, 2.16931, 0, 0;
    1.46614, 0, 0, 0;
    2.17984, 0, 0, 0;
    1.46614, 0, 0, 0;
    2.17984, 0, 0, 0
] m
Z_FlocBaffles = [
    0.0284141, 0.0389393, 0.0626211, 0.0626211;
    0, 0, 0, 0;
    0.0284141, 0.0389393, 0.0626211, 0.0626211;
    0, 0, 0, 0;
    0.0284141, 0.0389393, 0.0626211, 0.0626211;
    0, 0, 0, 0;
    0.0284141, 0.0389393, 0.0626211, 0.0626211;
    0, 0, 0, 0;
    0.0284141, 0.0389393, 0.0626211, 0.0626211;
    0, 0, 0, 0;
    0.0284141, 0.0389393, 0.0626211, 0.0626211;
    0, 0, 0, 0;
    0.0284141, 0.0389393, 0.0626211, 0.0626211;
    0, 0, 0, 0;
    0.0284141, 0.0389393, 0.0626211, 0.0626211;
    0, 0, 0, 0;
    0.0284141, 0.0389393, 0.0626211, 0.0626211;
    0, 0, 0, 0;
    0.0284141, 0.0389393, 0.0626211, 0.0626211;
    0, 0, 0, 0;
    0.0284141, 0.0389393, 0, 0;
    0, 0, 0, 0;
    0.0284141, 0.0389393, 0, 0;
    0, 0, 0, 0;
    0.0284141, 0.0389393, 0, 0;
    0, 0, 0, 0;
    0.0284141, 0, 0, 0;
    0, 0, 0, 0;
    0.0284141, 0, 0, 0
] m
N_FlocChannels = 4
L_FlocTank = 8.04969 m
HL_Floc = 61.3694 cm
HW_FlocStart = 2.10825 m
S_FlocBaffle = [2.84141; 3.89393; 6.26211; 6.26211; 9.68282; 9.68282] cm
B_FlocBaffle = [6.84141; 7.89393; 10.2621; 10.2621; 13.6828; 13.6828] cm
N_FlocChannelBaffles = [29; 25; 19; 19; 14; 14]
W_FlocPort = [-0.0215859; -0.0110607; 0.0126211; 0.0126211; 0.0468282; 0.0468282] m
HL_FlocChannels = [33.6807; 15.5426; 4.62291; 4.62291; 1.45016; 1.45016] cm
L_FlocBaffleLower = [1.46614; 1.45562; 1.43194; 1.43194; 1.39773; 1.39773] m
L_FlocBaffleUpper = [2.17984; 2.16931; 2.14563; 2.14563; 2.11142; 2.11142] m
H_FlocPort = [-0.592346; -1.58423; 2.23273; 2.23273; 0.93048; 0.93048] m
Ti_Floc = 30.0768 min  # residence time of the flocculator
N_FlocBaffles = 120
# Rapid Mix Unit and Entrance Tank:
# [reference: EntranceTankDim.xmcd]
L_Et = 0.608511 m
W_Et = 0.608511 m
H_Et = 2.50825 m  # Height of Entrance Tank Orifice
W_EtOrifice[30] = 0.031 m
L_trueET[30] = 0.0775584 m  # Length of Entrance Tank Orifice
Pi_EtFlow[30] = 0.278388  # Ratio of the minimum flow divided by the maximum flow through the plant.
L_FlocEntryOrifice = 45 cm  # Length of orifice entering into flocculator from Rapid Mix Unit
W_FlocEntryOrifice = 1.02868 cm  # Height of orifice entering into flocculator
ED_Diffusion =  # error: This variable is undefined.  # Minimum Energy Dissipation needed
HL_FlocEntryOrifice = 3.19585 cm  # Head loss caused by entering flocculation tank.
A_FlocEntry = 0.00462905 m^2
A_EtOrifice = 24.0431 cm^2
HW_EtTotal = 1.97704 m  # Total Height of water at beginning of rapid mix unit
HW_Channel2 =  # error  # Height of water at the back of the entrance tank channel (from channel bottom)
HW_EtChannel = 4.00565 cm  # Height of Waterfall into flocculator
W_EtChannel = 6.26211 cm  # Widt of entrance tank channel
Vol_Stock = 243 L  # Volume of chemical stock tanks
ZW_ExitChannel = 1.45456 m  # Water Level at the end of the plant in the exit channel and exit channel box
HW_Sed = 1.49456 m
HW_FlocStart = 2.10825 m  # Water level at the beginning of the floc tank
HL_Floc = 61.3694 cm  # just for ref. the head loss throught the floc tank
HW_EtTotal = 1.97704 m  # Height of the water in the entrance channel
# Materials List:
# [reference: Materials List.xmcd]
L_LaunderPipe = 1.54217 m
N_Launders = 4
L_LaunderPipeTotal = 6.16866 m
N_Valves = 2
N_LaunderCouplings = 4
N_ValveCouplings = 2
N_SedPlatesTotal = 118
N_SedPlatesPerSheet = 8
N_SedPlateSheets = 15
N_PipeSedPlateStand =  # error
A_SedTank = 5.29545 m^2
# [reference: AutoCADMasterProgram.xmcd]
# AutoCAD References
AC_SedTank = [
    "_-view o t"; "-layer m tank"; "c t 132,132,132"; "tank"; "  "; "_-view o t _zoom w 0.16,-0.16,0 -2.17242,1.08,1.59456 _box 0,0,0 -2.01242,0.92,1.59456 _box 0.15,-0.15,-0.15 -2.16242,1.07,1.59456 _subtract 0.15,-0.15,-0.15  0,0,0 "; "-layer s 0"; "  "; "-layer f tank"; "  "
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]
AC_EntranceTank = [
    "-layer m entrancetank";
    "c t 214,214,214";
    "entrancetank";
    "  ";
    "_-view o t _zoom w 0.16,4.38,0 -0.76851,5.30851,2.50825 _box 0,4.54,0 -0.60851,5.14851,2.50825 _box 0.15,4.39,-0.15 -0.75851,5.29851,2.50825 _subtract 0.15,4.39,-0.15  0,4.54,0 ";
    "-layer s 0";
    "  ";
    "-layer f entrancetank";
    "  ";
    "-layer s entrancetank";
    "  ";
    "_box -0.60851,4.39,2.45825 -0.5801,4.54,2.50825";
    "-layer s 0";
    "  ";
    "-layer t entrancetank";
    "  ";
    "_-view o t";
    "_subtract 0.15,4.54,0  -0.60851,4.39,2.45825 ";
    "-layer f entrancetank";
    "  "
]
AC_FlocTank = [
    "-layer m floctank"; "c t 91,91,91"; "floctank"; "  "; "_-view o t _zoom w 0.16,1.98,0 -2.17242,4.55,2.20825 _box 0,2.14,0 -2.01242,4.39,2.20825 _box 0.15,1.99,-0.15 -2.16242,4.54,2.20825 _subtract 0.15,1.99,-0.15  0,2.14,0 "; "-layer s 0"; "  "; "-layer f floctank"; "  "; "-layer m floctankwall"
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]
