# Automated Materials List
N_SedPlatesTotal := N_SedPlates*N_SedBays*N_SedTanks = 240  # ***Purple variables are verified***
N_SedPlatesPerSheet := floor(L_SedPlateSheet/L_SedPlate) = 5
N_SedPlateSheets := ceil(N_SedPlatesTotal/N_SedPlatesPerSheet) = 48
# Channel and Tank Walls
A_FlocFloor := (L_Sed + 2*T_PlantWall)*(W_FlocChannel*N_FlocChannels + T_PlantWall*(N_FlocChannels + 1)) = 12.171 m^2
A_FlocWalls := ((H_Floc*L_Sed) - (H_FlocPort[N_FlocChannels - 1]*W_FlocPort[N_FlocChannels - 1])) + (L_Sed*H_Floc) + ((N_FlocChannels*W_FlocChannel + ((N_FlocChannels + 1)*T_PlantWall))*H_Floc) + ((N_FlocChannels - 1)*((L_Sed*H_Floc) - (H_FlocPort[0]*W_FlocPort[0]))) = 44.9248 m^2
Vol_FlocFloor := A_FlocFloor*T_PlantWall = 1.82565 m^3
# **This is for vertical flocculator; Calculate for horizontal in the future**
Vol_FlocWalls := A_FlocWalls*T_PlantWall = 6.73871 m^3
A_SedWalls := (N_SedTanks + 1)*(L_Sed*H_Sed - ((H_ExitChannel*W_ExitChannel) + (H_InletChannel*W_InletChannel))) + ((N_SedTanks*W_Sed) + ((T_PlantWall*(N_SedTanks + 1))*2))*H_Sed = 25.5069 m^2
Vol_SedWalls := A_SedWalls*T_PlantWall = 3.82603 m^3
A_SedFloor := (L_Sed + 2*T_PlantWall)*(N_SedTanks*W_Sed + (N_SedTanks + 1)*T_PlantWall) = 15.9297 m^2
Vol_SedFloor := A_SedFloor*T_PlantWall = 2.38945 m^3
A_EtWalls := 2*(H_Et*(L_Et + (2*T_EtWall))) + 2*(H_Et*W_Et) = 11.418 m^2
A_EtFloor := (W_Et + 2*T_EtWall)*(L_Et + 2*T_EtWall) = 1.99088 m^2
Vol_EtWalls := A_EtWalls*T_EtWall = 1.71271 m^3
Vol_EtFloor := A_EtFloor*T_EtWall = 0.298631 m^3
Vol_EntranceTank := Vol_EtFloor + Vol_EtWalls
Vol_StockTank := Q_AlumStockMax*Ti_StockMin
# ***Pink variables are unable to be calculated at this time***
R_StockTank := D_StockTank/2
H_StockTank := Vol_StockTank/(pi*R_StockTank^2)  # **Stock Tank is not drawn yet**
A_StockTank := 2*pi*R_StockTank^2 + 2*pi*R_StockTank*H_StockTank
A_StockTankFloor := Vol_StockTank/(2*R_StockTank)
# ***Turquoise variables are intermediate variables***
L_InletTank := S_Elbow + ElbowRadius(ND_PltWeir) + ConRadius(ND_PltWeir) + SocketDepth(ND_PltWeir)
W_InletTank := ((2*ConRadius(ND_PltWeir)) + (2*S_Elbow))
Vol_InletTankWalls := (((L_InletTank + 2*T_ChannelWall)*(W_InletTank + 2*T_ChannelWall)) - (L_InletTank*W_InletTank) - ((L_InletTank - T_ChannelWall)*T_ChannelWall))*H_InletChannel
A_InletTankFloor := (W_InletTank + 2*T_ChannelWall)*(L_InletTank + 2*T_ChannelWall)
Vol_InletTankFloor := A_InletTankFloor*T_ChannelWall
Vol_InletChannelTank := Vol_InletTankFloor + Vol_InletTankWalls
L_ExitTank := S_Elbow + ElbowRadius(ND_PltWeir) + ConRadius(ND_PltWeir) + SocketDepth(ND_PltWeir)
W_ExitTank := 4*ConRadius(ND_PltWeir) + 3*S_Elbow
A_ExitTankWalls := (L_ExitTank*T_ChannelWall) + 2*((W_ExitTank + 2*T_ChannelWall)*T_ChannelWall)
Vol_ExitTankWalls := A_ExitTankWalls*H_ExitChannel
A_ExitTankFloor := (L_ExitTank + 2*T_ChannelWall)*(W_ExitTank + 2*T_ChannelWall)
Vol_ExitTankFloor := A_ExitTankFloor*T_ChannelWall
Vol_ExitChannelTank := Vol_ExitTankFloor + Vol_ExitTankWalls
A_ExitChannelWalls := L_Channel*(H_ExitChannel + T_ChannelWall)
# **Area and Volume of the walls are only for the INSIDE wall; the outside wall is already inlcuded in the area and volume of the sed walls.**
A_ExitChannelFloor := L_Channel*W_ExitChannel
Vol_ExitChannelWalls := A_ExitChannelWalls*T_ChannelWall
Vol_ExitChannelFloor := A_ExitChannelFloor*T_ChannelWall
# **Area and Volume of the walls are only for the INSIDE wall; the outside wall is already inlcuded in the area and volume of the sed walls.**
A_InletChannelWalls := L_Channel*(H_InletChannel + T_ChannelWall)
A_InletChannelFloor := L_Channel*W_InletChannel
Vol_InletChannelWall := A_InletChannelWalls*T_ChannelWall
Vol_InletChannelFloor := A_InletChannelFloor*T_ChannelWall
A_SedSlope := Z_SedSlopes*(W_SedBay - W_SedSludge)/2  # **Cross Sectional Area of One Slope**
A_SedSlopes := A_SedSlope*N_SedBays*N_SedTanks
Vol_SedSlopes := A_SedSlopes*L_Sed
# Ferrous Cement
Vol_DistributionTunnelCovers := T_SedSlopePlate*L_SedSlopeManifold*W_SedSlopePlate*N_SedPorts
A_DistributionTunnelCovers := Vol_DistributionTunnelCovers/T_SedSlopePlate
Vol_FlocBafflesTotal := W_FlocChannel*T_FlocBaffle*(L_FlocBaffleLower*ceil(N_FlocChannelBaffles/2) + L_FlocBaffleUpper*floor(N_FlocChannelBaffles/2))
A_FlocBafflesTotal := Vol_FlocBafflesTotal/T_FlocBaffle  # **new variable defined here**
# Pipes and Valves
N_PipeSedPlateFrame := W_Sed/B_SedPipe - 1 + L_Sed/B_SedPipe - 1
L_PipeSedPlateFrameTotal := N_SedTanks*((W_Sed/B_SedPipe - 1)*L_Sed + (L_Sed/B_SedPipe - 1)*W_Sed)
# Length of pipe needed for Sedimentation Tank Plate Frame at ND.SedPlateFrame
L_Weir := 2*H_PltWeir  # Total length of Weir pipe in Inlet and Exit Channel Tanks at ND.PltWeir
L_SedLaunder =  # error: This variable is undefined.
N_Launders := N_SedTanks*N_SedBays*N_SedLaunders
L_LaunderPipeTotal := L_SedLaunder*N_Launders
N_LaunderCouplings := N_Launders  # Number of couplings for launder pipe going through concrete wall
N_Valves := N_SedBays*N_SedTanks
N_ValveCouplings := N_Valves
