# [reference: MasterProgram.xmcd]
# Automated Materials List
N_SedPlatesTotal := N_SedPlates*N_SedBays*N_SedTanks
N_SedPlatesPerSheet := floor(L_SedPlateSheet/L_SedPlate)
N_SedPlateSheets := ceil(N_SedPlatesTotal/N_SedPlatesPerSheet) = 226  # Total number of corrugated sheets needed to construct lamella/plate settlers
# Channel and Tank Walls
A_FlocFloor := (L_Sed + 2*T_PlantWall)*(W_FlocChannel*N_FlocChannels + T_PlantWall*(N_FlocChannels + 1)) = 18.5057 m^2
A_FlocWalls := A_FlocFloor - (W_FlocChannel*N_FlocChannels)*L_Sed = 5.64857 m^2
Vol_FlocFloor := A_FlocFloor*T_PlantWall = 2.77586 m^3  # **check these areas and volumes in AutoCAD**
Vol_FlocWalls := A_FlocWalls*H_Floc = 76.1814 m^3
Vol_SedTank := 2*((L_Sed + T_PltWall)*T_PlantWall*H_Sed) + 2*(W_Sed*N_SedTanks + N_SedTanks*T_PltWall)*T_PlantWall*H_Sed - (A_SedSludge*L_Sed) = 9.02999 m^3
A_SedWalls := (N_SedTanks + 1)*(L_Sed*(H_Sed + T_PlantWall) - (2*H_ExitChannel*W_ExitChannel)) + 4*(T_PlantWall*(H_Sed + T_PlantWall)) + ((N_SedTanks*W_Sed) + ((T_PlantWall*(N_SedTanks + 1))*2))*(T_PlantWall + H_Sed) = 70.8144 m^2
Vol_SedWalls := (A_SedWalls*T_PlantWall) - 2*(L_Sed*T_PlantWall^2) - ((N_SedTanks*W_Sed + (N_Sedtanks + 1)*T_PlantWall)*T_PlantWall) - □  # error: This placeholder is empty.
A_SedFloor := (L_Sed + 2*T_PlantWall)*(N_SedTanks*W_Sed + (N_SedTanks + 1)*T_PlantWall) = 69.3964 m^2
Vol_SedFloor := A_SedFloor*T_PlantWall = 10.4095 m^3
Vol_EntranceTank := 2*(W_Et*T_EtWall*H_Et) + 2*(L_Et*T_EtWall*H_Et) - (T_EtWall*W_EtChannel*W_EtChannel) = 20.5479 m^3
# **basic dimensions - no grit chamber**
A_EtWalls := 2*(H_Et*(L_Et + T_EtWall)) + 2*H_Et(W_Et + 2*T_EtWall) - W_EtChannel*W_EtChannel  # error: This value must be a function, but has the form: Length.
A_EtFloor := (W_Et + 2*T_EtWall)*(L_Et + 2*T_EtWall) = 7.75197 m^2
# **Assuming L.Et is marked as the top diagram on the materials list wiki**
Vol_EtWalls := Vol_EntranceTank = 20.5479 m^3
W_ExitChannel = 0.960021 m
Vol_EtFloor := (L_Et + 2*T_EtWall)*(W_Et + 2*T_EtWall)*T_EtFloor
H_ExitChannel = 0.274863 m
Vol_StockTank := Q_AlumStockMax*Ti_StockMin = 4.05 m^3
L_Sed + 2*T_PlantWall - 2*W_ExitChannel = 3.52282 m
# **D.StockTank is a user input, newly created**
R_StockTank := D_StockTank/2
H_StockTank := Vol_StockTank/(pi*R_StockTank^2)
# **new variable defined here**
A_StockTank := 2*pi*R_StockTank^2 + 2*pi*R_StockTank*H_StockTank  # **new variable defined here**
A_StockTankFloor := Vol_StockTank/(2*R_StockTank)  # **new variable defined here**
Vol_ExitChannelTank := (2*(S_Elbow + 3*ND_PltWeir + T_ChannelWall) + 2*(4*ND_PltWeir + 3*S_Elbow + T_ChannelWall))*H_Sed*T_ChannelWall = 1.3391 m^3
A_ExitChannelWalls := L_Channel*(H_ExitChannel + T_ChannelWall) = 5.41701 m^2
A_ExitChannelFloor := L_Channel*(W_ExitChannel + 2*T_ChannelWall) = 16.0653 m^2
Vol_ExitChannelWalls := 2*L_Channel*H_ExitChannel*T_ChannelWall = 1.05135 m^3
Vol_ExitChannelFloor := L_Channel*(W_ExitChannel + 2*T_ChannelWall)*T_ChannelWall = 2.40979 m^3
# **Perhaps replace "T.ExitChannel with T.ChannelWall**
Vol_InletChannelTank := (2*(S_Elbow + 3*ND_PltWeir + T_ChannelWall) + 2*(2*ND_PltWeir + 2*S_Elbow + T_ChannelWall))*H_Sed*T_ChannelWall = 1.00372 m^3
A_InletChannelWalls := L_Channel*(H_InletChannel + T_ChannelWall) = 5.41701 m^2
A_InletChannelFloor := L_Channel*(W_InletChannel + 2*T_ChannelWall) = 17.6011 m^2
Vol_InletChannelWalls := 2*L_Channel*H_InletChannel*T_ChannelWall = 1.05135 m^3
Vol_InletChannelFloor := L_Channel*(W_InletChannel + 2*T_ChannelWall)*T_ChannelWall = 2.64016 m^3
# **Perhaps replace "T.InletChannel with T.ChannelWall**
N_SedInletChimneys := N_SedInletPipes*N_SedBays*N_SedTanks = 24
Vol_SedChimneyPipe := π*(.5*D_SedChimneyPipe)^2*(H_Sed - H_InletChannel - T_ChannelWall - H_SedSludge - T_SedSludge)
Vol_SedInletChimneys := N_SedInletChimneys*(W_SedInletBottom*(W_InletChannel + T_ChannelWall)*(H_Sed - H_InletChannel - T_ChannelWall - H_SedSludge - T_SedSludge) - Vol_SedChimneyPipe)
# Ferrous Cement
Vol_DistributionTunnelCovers := T_SedSlopePlate*L_SedSlopeManifold*W_SedSlopePlate*N_SedPorts
A_DistributionTunnelCovers := Vol_DistributionTunnelCovers/T_SedSlopePlate
Vol_FlocBafflesTotal := W_FlocChannel*T_FlocBaffle*(L_FlocBaffleLower*ceil(N_FlocChannelBaffles/2) + L_FlocBaffleUpper*floor(N_FlocChannelBaffles/2)) = 50.1761 m^3
A_FlocBafflesTotal := Vol_FlocBafflesTotal/T_FlocBaffle = 334.508 m^2  # **new variable defined here**
# Pipes and Valves
N_PipeSedPlateFrame := W_Sed/B_SedPipe - 1 + L_Sed/B_SedPipe - 1
L_PipeSedPlateFrameTotal := N_SedTanks*((W_Sed/B_SedPipe - 1)*L_Sed + (L_Sed/B_SedPipe - 1)*W_Sed)
# Length of pipe needed for Sedimentation Tank Plate Frame at ND.SedPlateFrame
L_Weir := 2*H_PltWeir = 0.0809746 m  # Total length of Weir pipe in Inlet and Exit Channel Tanks at ND.PltWeir
N_Launders := N_SedTanks*N_SedBays*N_SedLaunders
L_LaunderPipeTotal := L_SedLaunder*N_Launders = 70.8566 m  # Total length of launder pipe at ND.SedLaunder
N_LaunderCouplings := N_Launders  # Number of couplings for launder pipe going through concrete wall
N_Valves := N_SedBays*N_SedTanks  # Valves and valve couplings to drain sedimentation tanks
N_ValveCouplings := N_Valves
