# [reference: BasicInputs.xmcd]
# [reference: ExpertInputs.xmcd]
# [reference: MathFunctions.xmcd]
# [reference: PipeDatabase.xmcd]
# [reference: FluidsFunctions.xmcd]
# [reference: SedimentationTank.xmcd]
# [reference: Flocculator.xmcd]
# [reference: LFOM.xmcd]
# [reference: LinearCdc.xmcd]
# [reference: ChemStorageTanks.xmcd]
# [reference: EntranceTank.xmcd]
# [reference: StackedRapidSandFilter.xmcd]
# Entrance Tank Components
A_EtWalls := 2*(H_Et*(L_Et + (2*T_EtWall))) + 2*(H_Et*W_Et) = 11.9657 m^2
A_EtFloor := (W_Et + 2*T_EtWall)*(L_Et + 2*T_EtWall) = 7.42889 m^2  # Surface area of Tank floor
Vol_EtWalls := A_EtWalls*T_EtWall = 1.79485 m^3
Vol_EtFloor := A_EtFloor*T_EtWall = 1.11433 m^3
Vol_Et := Vol_EtFloor + Vol_EtWalls = 2.90919 m^3  # Volume of concrete needed to build Entrance Tank
Vol_EtSlopeFull := ((L_EtHopper - S_Fitting - ConRadius(ND_EtDrain))*W_Et*H_EtHopper + H_EtHopperBack*L_EtHopper*(W_Et - 2*(S_Fitting + ConRadius(ND_EtDrain)))*0.5 - 0.5*H_EtHopperBack*(L_EtHopper - 2*(S_Fitting + ConRadius(ND_EtDrain)))*(W_Et - 2*(S_Fitting + ConRadius(ND_EtDrain))))
Vol_EtHalfSlopeLast := 0.25*L_EtHopper*H_EtHopperBack*(W_Et - 2*(S_Fitting + ConRadius(ND_EtDrain))) + 0.5*H_EtLastSlope*W_Et*(L_EtHopper - S_Fitting - ConRadius(ND_EtDrain)) - □  # error: This placeholder is empty.
N_EtDrainStoppers := N_EtHoppers
N_EtDrains := N_Et.Hoppers
L_EtWeir =  # error: This variable is undefined.
D_EtWeir =  # error
# Volume for the hoppers
Vol_HoppersBetween := 3*W_Et*H_EtHopper^2*1/sqrt(3) + H_EtHopper*(4*ND_Rebar + T_ConcreteMin)*W_Et
W_HopperBottom := W_Et - OuterDiameterFittingPVC(ND_EtDrain) - 2*S_Fitting = 0.637363 m
Vol_HoppersAgainstEtWall := 3*(L_EtHopper*W_HopperBottom^2*sqrt(3)/2 - W_HopperBottom^2*sqrt(3)*(L_EtHopper - OuterDiameterFittingPVC(ND_EtDrain) - 2*S_Fitting)/3) = 573.531 L
Vol_Hoppers := Vol_HoppersBetween + Vol_HoppersAgainstEtWall
L_InletTank := S_Elbow + ElbowRadius(ND_PltWeir) + ConRadius(ND_PltWeir) + SocketDepth(ND_PltWeir)
W_InletTank := ((2*ConRadius(ND_PltWeir)) + (2*S_Elbow))
Vol_InletTankWalls := (((L_InletTank + 2*T_ChannelWall)*(W_InletTank + 2*T_ChannelWall)) - (L_InletTank*W_InletTank) - ((L_InletTank - T_ChannelWall)*T_ChannelWall))*H_InletChannel
A_InletTankFloor := (W_InletTank + 2*T_ChannelWall)*(L_InletTank + 2*T_ChannelWall)
Vol_InletTankFloor := A_InletTankFloor*T_ChannelWall
Vol_InletChannelTank := Vol_InletTankFloor + Vol_InletTankWalls
L_ExitTank := S_Elbow + ElbowRadius(ND_PltWeir) + ConRadius(ND_PltWeir) + SocketDepth(ND_PltWeir)
W_ExitTank := 4*ConRadius(ND_PltWeir) + 3*S_Elbow
A_ExitTankWalls := (L_ExitTank*T_ChannelWall) + 2*((W_ExitTank + 2*T_ChannelWall)*T_ChannelWall)
Vol_ExitTankWalls := A_ExitTankWalls*H_ExitChannel
A_ExitTankFloor := (L_ExitTank + 2*T_ChannelWall)*(W_ExitTank + 2*T_ChannelWall)
Vol_ExitTankFloor := A_ExitTankFloor*T_ChannelWall
