Z_RMMacroOrifice := Z_SedWeirExit = 1.828 m
L_RMPipeEst := L_Sed + W_MpWalkway + Z_SedWeirExit = 17.7188 m
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K_RMPipe := 2*K_El90 + K_PipeExit = 2.8
# Size the rapid mixer pipe
ND_RMPipe := D_pipeschedule(Q_Plant, EN_PipeSpec, HL_RMPipeEst, L_RMPipeEst, Nu_Water, E_Pvc, K_RMPipe)  # error: This array index is invalid for this array.
D_RMPipe := innerD(ND_RMPipe, EN_PipeSpec)
K_RMMacroOrifice := 2  # put in expert inputs
V_RMPipe := Q_Plant/A_circle(D_RMPipe)
HL_RMPipe := h_l(Q_Plant, D_RMPipe, L_RMPipeEst, K_RMPipe, Nu_Water, E_Pvc)
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# Calculate the diameter of the macro orifice
D_RMMacroOrifice := D_RMPipe/sqrt(Pi_VenaContractaOrifice*(sqrt(K_RMMacroOrifice) + 1))
# Calculate the head loss through the macro orifice
HL_RMMacroOrifice := h_e(Q_Plant, D_RMPipe, K_RMMacroOrifice)
# At this time, we will not be implementing the macromix orifice. If a design requires a macromix orifice, the first line of HL.PlantTotal should read: HL_ChemDoserMin if HL_ChemDoserMin - HL_Floc - HL_SedWeirExit - HL_SedLaunder - HL_RMMacroOrifice - HL_RMPipe ≥ HL_RMMicroOrificeMin
# Check that the head loss through the plant is large enough so that there is enough head loss from the micro mixer
HL_PlantTotal :=
    HL_ChemDoserMin if HL_ChemDoserMin - HL_Floc - HL_SedWeirExit - HL_SedLaunder - HL_RMPipe ≥ HL_RMMicroOrificeMin
    HL_ChemDoserMin + HL_RMMicroOrificeMin otherwise
HL_RMMicroOrifice := HL_PlantTotal - HL_Floc - HL_SedWeirExit - HL_SedLaunder - HL_RMPipe = 14.3344 cm
# If a macromix orifice is used, the right side of this equation must also have HL.RMMacroOrifice subtracted from it.
# Total area through all of the micr mix orifices
A_RMMicroOrifices := A_circle(D_RMPipe)/(sqrt(HL_RMMicroOrifice*2*g/V_RMPipe^2) + 1)
# Diameter of micro mix orifice (if there is only one used)
D_RMMicroOrifice := D_circle(A_RMMicroOrifices)
# Velocity through the orifice if no jet
V_RMMicroOrifice := Q_Plant/A_RMMicroOrifices
# Velocity through micro orifice jet
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V_RMMicroOrificeJet := V_RMMicroOrifice/Pi_VenaContractaOrifice
# This is the energy dissipation rate through the micro mix orifice if only one orifice is used.  If this value is greater than the minimum ED through the micro mix, then OK.  Else, increase the number
# of orifices
ED_RMMicroOrificeOne := (0.34*V_RMMicroOrificeJet)^3/(D_RMMicroOrifice*sqrt(Pi_VenaContractaOrifice))
D_RMMicroOrificeMax := (0.34*V_RMMicroOrificeJet)^3/(sqrt(Pi_VenaContractaOrifice)*ED_RMMicroOrifice)
# Calculating: Size of Entrance Tank
A_Et := Q_Plant/V_EtUp
L_Et := sqrt(A_Et)
W_Et := A_Et/L_Et
H_Et := HL_PlantTotal + 2*D_RMPipe + H_PlantFreeboard
Z_EtTop := Z_SedWeirExit + HL_PlantTotal + H_PlantFreeboard
