K_Exp := 1  # headloss coefficient of jet
Pi_Dmix := 2.4  # ratio of diffusion length scale to kolmogorov length scale (smallest eddies in turbulent flow)
Tau_diffusion := 10 s  # time scale of diffusion
D_m := 0.673*10^-5*cm^2/s  # Diffusion coefficient
# Calculations: Energy Dissipation at Orifice
# IMPORTANT NOTE: Energy dissipation rate from minor headloss has to be greater than diffusion requirements: ε = 0.5-1.0W/kg
# Minimum value of energy dissipation rate for diffusion:
ED_Diffusion := Pi_Dmix^4*Nu_Water^3/(D_m^2*Tau_diffusion^2)
# If energy dissipation rate of bulk fluid =====================>
ε_FlocEntryOrifice := 0.8*W/kg
V_FlocEntryOrifice := (2*ε_FlocEntryOrifice*sqrt(Q_Plant)/K_Exp)^(2/7)
# IMPORTANT NOTE:
# To calculate the headloss at the entrance to the flocculator we must use the velocity at that precice location.  We know that the velocity (before going through the orifice) needs to be increased by 1/korifice (from orifice equa.) to compensate for the  compression of the fliud through the orifice.  Therefore, note that Vjet=Vbulk/kori in the headloss equa.
# Minor head loss
HL_FlocEntryOrifice := K_Exp*(V_FlocEntryOrifice/Pi_VenaContractaOrifice)^2/(2*g)
# Areas of entrance (to flocculator):
A_Port(Pi_SedCell, K_Exp, Q_Plant, ε_FlocEntryOrifice, Pi_VenaContractaOrifice) =  # error: This variable is undefined.
A_FlocEntry := A_Port(Pi_SedCell, K_Exp, Q_Plant, ε_FlocEntryOrifice, Pi_VenaContractaOrifice)
# If entrance has a circular orifice:
D_FlocEntryOrifice := sqrt(4*A_FlocEntry/π)
# If entrance has a rectangular orifice:
# Assume ==>
L_FlocEntryOrifice := 13 cm  # Length cannot be greater than first baffle spacing*************
W_FlocEntryOrifice := A_FlocEntry/L_FlocEntryOrifice
H
# Calculating: Upper Waterfall Orifice (Entrance Tank Orifice)
HW_EtMax := 20 cm
A_orifice(HW_EtMax, Pi_VenaContractaOrifice, Q_Plant) =  # error  # Assume:
A_EtOrifice := A_orifice(HW_EtMax, Pi_VenaContractaOrifice, Q_Plant)
b := 0 .. 200
W_EtOrifice[b] := (0.1 + b/10)*cm
L_trueET := A_EtOrifice/W_EtOrifice
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# If the flow rate decreased significantly for the height/head to fall from 20cm to WtrueET/2 (this being the minimum height/head allowed) that plant would operate at this percentage of its max capacity:
HW_EtMin := W_EtOrifice/2  # Since the orifice has to be submerged at all times,use half of the rectangular orifice's width.
# Ratio of the minimum flow divided by the maximum flow through the plant.
Pi_EtFlow := Pi_VenaContractaOrifice*A_EtOrifice*sqrt(2*g*HW_EtMin)/Q_Plant
heightratio := W_EtOrifice/HW_EtMax
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# We would like to be able to accurately dose when the flow rate is 20% of the maximum flow.
Pi_EtFlow[15] =  # error
# This corresponds to a height ratio of:
heightratio[15] = 0.08
# The orifice width is computed:
W_EtOrificeUsed := heightratio[15]*HW_EtMax = 1.6 cm
# And the length is found to be:
L_EtOrificeUsed := A_EtOrifice/W_EtOrificeUsed
# Calculating the upper and lower channel dimenions
K_RapidMix := 1.3  # mixing required before energy dissipation in jet occurs
j := 0 .. 40  # Range of widths for upper channel
W_EtChannel[j] := (10 + j)*cm
# critical depth over water fall
y_crit := ((Q_Plant/W_EtChannel)^2/g)^(1/3)
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A_EtChannelWater[j] := y_crit[j]*W_EtChannel[j]
# Cross sectional area of upper channel flow at critical depth pt.
V_EtChannel := Q_Plant/A_EtChannelWater
HW_EtChannel := K_RapidMix*V_EtChannel^2/(2*g)  # Height of second waterfall based on critical depth at edge and minor loss coefficient of 1.3
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# Calculating Height at the back of the Upper Channel
# calculations below based on smallest water fall height, width of channel vs. water fall height still needs to be optimized
HW_EtChannel[30] =  # error
y_crit[30] =  # error
W_EtChannel[30] = 40 cm
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S_f(f, V, R_h) := f*V^2/(8*g*R_h)  # slope of water level in channel
roughness := 0.014 mm
# DIRECT STEP METHOD- assuming subcritical flow
HW_channel(y, w, dely, Q, L, ε, ν) :=
    x_total ← L
    while x_total > 0*cm
        V_Channel1 ← Q/(y*w)
        V_Channel2 ← Q/((y + dely)*w)
        delx ← (-dely + V_Channel1^2/(2*g) - V_Channel2^2/(2*g))/S_f(f_rect(Q, y, w, ν, ε), V_Channel1, R_h(y, w))
        y ← y + dely
        x_total ← x_total + delx
    return y
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dely := 0.0001 cm
HW_Channel2 := HW_channel(y_crit[30], W_EtChannel[30], dely, Q_Plant, L_EtOrificeUsed, roughness, Nu_Water)
# Calculating: Height of water at entrance tank
# Assumptions based on master mathCAD file for Gracias Plant:
HW_Total := HW_EtMax + HL_FlocEntryOrifice + HL_Floc + HW_Sed + HW_Channel2 + HW_EtChannel[30]
# Calculating: Size of Entrance Tank
V_EtUp := 700*m/day
A_Et := Q_Plant/V_EtUp
# Assume Entrance Tank is square:
L_Et := sqrt(A_Et)
# Calculating: Size of Alum Stock Tank
Vol_Stock =  # error
Q_AlumStockMax := Q_Plant*C_FcmDoseMax/C_FcmAlum = L/min
Vol_Stock := Q_AlumStockMax*Ti_StockMin
