# Sed Tank Functions
# Calculate number of Sed Tanks
Q_SedManifoldMax := Q_PipeED(ED_SedInlet, innerdiameter(ND_SedManifoldMax, PS_Default), Pi_VenaContractaOrifice, Pi_Jet)
Q_SedManifoldMin := Q_PipeED(ED_SedInlet, innerdiameter(ND_SedManifoldMin, PS_Default), Pi_VenaContractaOrifice, Pi_Jet)
fN_SedTanks(Q_Plant) := max(min(ceil(Q_Plant/Q_PipeED(ED_SedInlet, innerdiameter(ND_SedManifoldMin, PS_Default), Pi_VenaContractaOrifice, Pi_Jet)), N_SedTanksMin), ceil(Q_Plant/(2*Q_PipeED(ED_SedInlet, innerdiameter(ND_SedManifoldMax, PS_Default), Pi_VenaContractaOrifice, Pi_Jet))))
# Sed Bay and Preliminary calculations
fQ_Sed(Q_Plant) := Q_Plant/fN_SedTanks(Q_Plant)
fL_SedUpflowMax := Q_SedManifoldMax/(V_SedUpBod*W_SedBay) = 5.57621 m
fN_SedBaysTotal(Q_Plant) := ceil(Q_Plant/(V_SedUpBod*W_SedBay*fL_SedUpflowMax))
fN_SedBaysMin(Q_Plant) := ceil(ceil(Q_Plant/(V_SedUpBod*W_SedBay*fL_SedUpflowMax))/fN_SedTanks(Q_Plant))
fN_SedBaysEst(Q_Plant) := min(ceil(Q_Plant/(ceil(ceil(Q_Plant/(V_SedUpBod*W_SedBay*fL_SedUpflowMax))/fN_SedTanks(Q_Plant))*Q_SedManifoldMax)), 2)
fN_SedBays(Q_Plant) := max(fN_SedBaysMin(Q_Plant), fN_SedBaysEst(Q_Plant))
fW_Sed(Q_Plant) := fN_SedBays(Q_Plant)*W_SedBay
fQ_SedBay(Q_Plant) := Q_Plant/fN_SedTanks(Q_Plant)/fN_SedBays(Q_Plant)
fND_SedManifold(Q_Plant) := NominalDiameter(D_PipeED(ED_SedInlet, fQ_SedBay(Q_Plant), Pi_VenaContractaOrifice, Pi_Jet), PS_Default)
fL_SedUpflowEst(Q_Plant) := fQ_SedBay(Q_Plant)/(W_SedBay*V_SedUpBod)
fND_SedLaunder(Q_Plant) := ND_Manifold(fQ_SedBay(Q_Plant), HL_SedLaunderBod, fL_SedUpflowEst(Q_Plant), Pi_QLaunderOrifices, PS_Default, Nu_Water, E_Pvc, K_PipeExit, 2*floor(fL_SedUpflowEst(Q_Plant)/B_SedLaunderOrificesEst))
# Inlet Channel calculations
fL_SedChannel(Q_Plant) := fN_SedTanks(Q_Plant)*fW_Sed(Q_Plant) + (fN_SedTanks(Q_Plant) - 1)*T_SedWallDivider + T_PlantWall - T_SedWallDivider
fHL_SedWeirExit(Q_Plant) := Headloss_weir(Q_Plant, fL_SedChannel(Q_Plant))
fA_SedInletChannelED(Q_Plant) := A_Channel(Q_Plant, ED_SedInlet, Pi_VenaContractaOrifice, Pi_Jet)
fW_SedInletChannelPlumbing(Q_Plant) := 2*ConRadius(fND_SedManifold(Q_Plant)) + 2*S_Fitting
fHW_SedInletChannelPlumbing(Q_Plant) := HL_SedLaunderBod + 2*ConRadius(fND_SedLaunder(Q_Plant)) + S_Fitting + fHL_SedWeirExit(Q_Plant)
fW_SedInletChannelPreWeir(Q_Plant) :=
    W ← fW_SedInletChannelPlumbing(Q_Plant)
    HW ← fHW_SedInletChannelPlumbing(Q_Plant)
    while W*HW < fA_SedInletChannelED(Q_Plant)
        HW ← HW + 1 mm if HW < W
        W ← W + 1 mm otherwise
    return W
fHW_SedInletChannel(Q_Plant) :=
    W ← fW_SedInletChannelPlumbing(Q_Plant)
    HW ← fHW_SedInletChannelPlumbing(Q_Plant)
    while W*HW < fA_SedInletChannelED(Q_Plant)
        HW ← HW + 1 mm if HW < W
        W ← W + 1 mm otherwise
    return HW
fH_SedInletChannel(Q_Plant) := fHW_SedInletChannel(Q_Plant) + H_PlantFreeboard
fEN_InletChannelGeom(Q_Plant) :=
    hl_weir ← Headloss_weir(Q_Plant, fW_SedInletChannelPreWeir(Q_Plant))
    Geom_Channel ← Perpendicular_Weir if (hl_weir ≤ HL_SedWeirMax)
    Geom_Channel ← Parallel_Weir otherwise
    return Geom_Channel
fW_SedWeirInlet(Q_Plant) :=
    fW_SedInletChannelPreWeir(Q_Plant) if fEN_InletChannelGeom(Q_Plant) == Perpendicular_Weir
    fL_SedChannel(Q_Plant) otherwise
fHL_SedWeirInlet(Q_Plant) := Headloss_weir(Q_Plant, fW_SedWeirInlet(Q_Plant))
fH_SedWeirInlet(Q_Plant) := fHW_SedInletChannel(Q_Plant) - fHL_SedWeirInlet(Q_Plant)
fW_SedInletChannelPostWeir(Q_Plant) := max(W_ChannelMin, W_HorizChannel(Q_Plant, fH_SedWeirInlet(Q_Plant), HL_ChannelMax, fL_SedChannel(Q_Plant), Nu_Water, E_Concrete, 1))
fW_SedInletChannel(Q_Plant) :=
    fW_SedInletChannelPreWeir(Q_Plant) if fEN_InletChannelGeom(Q_Plant) == Perpendicular_Weir
    fW_SedInletChannelPreWeir(Q_Plant) + T_SedWeir + fW_SedInletChannelPostWeir(Q_Plant) if fEN_InletChannelGeom(Q_Plant) == Parallel_Weir
# Outlet Pipe calculations
fL_FiEntrancePipeEst(Q_Plant) := W_DCWalkway + fW_SedInletChannel(Q_Plant) + 1 m
fND_FiEntrancePipeMax(Q_Plant) := FloorNearest(Pipesizes[index(FloorNearest(W_SedBay/2 - ConRadius(fND_SedManifold(Q_Plant)) - 2*S_Fitting, Pipesizes[:, 1]), Pipesizes[:, 1]), 0], AvailND)
fND_FiEntrancePipe(Q_Plant) := min(D_pipeschedule(min(Q_Plant, Q_pipetotal(innerdiameter(AvailND[last(AvailND)], PS_Default), HL_FiEntrancePipeMax, fL_FiEntrancePipeEst(Q_Plant), Nu_Water, E_Pvc, K_FiEntrancePipe)), PS_Default, HL_FiEntrancePipeMax, fL_FiEntrancePipeEst(Q_Plant), Nu_Water, E_Pvc, K_FiEntrancePipe), fND_FiEntrancePipeMax(Q_Plant))
fN_FiEntrancePipes(Q_Plant) := ceil(Q_Plant/Q_pipetotal(innerdiameter(fND_FiEntrancePipe(Q_Plant), PS_Default), HL_FiEntrancePipeMax, fL_FiEntrancePipeEst(Q_Plant), Nu_Water, E_Pvc, K_FiEntrancePipe))
# Exit Channel calculations
fHW_SedExitChannel(Q_Plant) := fHW_SedInletChannel(Q_Plant) - HL_SedLaunderBod
fW_SedExitChannelPreWeir(Q_Plant) := max(W_HorizChannel(Q_Plant, fHW_SedExitChannel(Q_Plant), HL_ChannelMax, fL_SedChannel(Q_Plant), Nu_Water, E_Concrete, 1), W_ChannelMin, CapHeight(fND_SedLaunder(Q_Plant)) + 1.05*L_SedLaunderCapExcess)
fW_SedExitChannelPostWeir(Q_Plant) := max(2*ConRadius(fND_FiEntrancePipe(Q_Plant))*(fN_FiEntrancePipes(Q_Plant) > 1), W_ChannelMin, W_HorizChannel(Q_Plant, fH_SedWeirInlet(Q_Plant), HL_ChannelMax, fL_SedChannel(Q_Plant) - W_SedBay/2, Nu_Water, E_Concrete, 1))
fH_SedWeirExit(Q_Plant) := fHW_SedExitChannel(Q_Plant) - fHL_SedWeirExit(Q_Plant)
fW_SedExitChannel(Q_Plant) := fW_SedExitChannelPreWeir(Q_Plant) + T_SedWeir + fW_SedExitChannelPostWeir(Q_Plant)
# Upflow Length calculations
fH_LamellaToLaunder(Q_Plant) := T_ConcreteMin + CapThickness(fND_SedLaunder(Q_Plant))
fL_SedUpflow(Q_Plant) :=
    i ← 0
    L ← 0 m
    while L < fL_SedUpflowEst(Q_Plant)
        i ← i + 1
        L ← (fH_SedWeirExit(Q_Plant) + T_ChannelWall - outerdiameter(fND_SedLaunder(Q_Plant)) - fH_LamellaToLaunder(Q_Plant) - T_SedPlate*cos(AN_SedPlate))/tan(AN_SedPlate) + T_SedPlate/sin(AN_SedPlate) + (PlateIndex[i] - 1)*B_SedPlate/sin(AN_SedPlate) - 2*T_ConcreteMin
    return L
# Calculate tank and hopper length
fL_SedHopper(Q_Plant) := fW_SedExitChannel(Q_Plant) + T_SedWeir + fW_SedInletChannel(Q_Plant) + T_ChannelWall + 2*T_ConcreteMin
fL_Sed(Q_Plant) := fL_SedHopper(Q_Plant) + fL_SedUpflow(Q_Plant)
