# The Basic Inputs file contains simple inputs such as the number of sedimentation tanks. Those inputs don’t require any detailed knowledge in fluid dynamics or in the design of a sedimentation bay and may be specified by anybody via the design tool.
# The Expert Inputs file contains more sophisticated and detailed inputs. As you can see, those inputs contain a rather complicated vocabulary, hence the name of the file: Expert Inputs. Those inputs are no longer specified via the design tool.
# The Design Assumptions file contains assumptions made in order to specify certain data that are needed to be known prior to coding. Those data relate to the thickness of certain walls in the plant, to certain ratios, head losses etc.
# The Fluids Functions will help us determine variables such as flow rates, energy dissipation rates, areas and diameters for different parts of the sedimentation tank.
# The Pipe Database file contains real data about the pipe, drill and fitting sizes.
# The functions found in the Math Functions file help us round down or up the magnitudes calculated through the Fluids Functions so they match the data found in the Pipe Database file
# The Minor Loss Coefficients file gives the value of these variables in different parts, elbows, tees, pipes, etc
A_pipe := A_pipes(EN_PipeSpec)  # This function gives us an array of inner areas based on a given pipe specification.
Q_pipe := Q_pipes(ED_SedInlet, A_pipe, Pi_VenaContractaOrifice)  # This function gives us an array of flow capacities in pipes in order to prevent floc breakup.
# Both these arrays share similar indexes to those found in an array of inner diameters.
# Sedimentation Influent Manifold Program
# We start off by determining the number of bays in a sed tank. We start off by determining a maximum length for the sed tank based on a maximum nominal diameter for the manifold. We compare it to the number of bays inputted in the design tool. We finally get the actual number of sed bays, the actual diameter of the manifold as well as a minimum length for the sed tank.
Manifold_maxindex := findindexID(ND_SedManifoldMax, EN_PipeSpec) = 8
A_SedManifoldPipeMax := A_pipe[Manifold_maxindex]
# This is the maximum possible length of a sedimentation tank for the maximum pipe size
L_SedMax := Q_pipe[Manifold_maxindex]/(V_SedUpBod*W_SedBay) = 18.2279 m
Q_Sed := Q_Plant/N_SedTanks = 5 L/s  # Flow rate through one sed tank
# This is the minimum number of bays required for the entire plant
N_SedBaysTotal := ceil(Q_Plant/(V_SedUpBod*W_SedBay*L_SedMax)) = 1
N_SedBaysMin := ceil(N_SedBaysTotal/N_SedTanks) = 1
# The number of bays per tank is the maximum of the calculated value and the user input
N_SedBays := max(N_SedBaysMin, N_SedBaysEst) = 2
L_SedEst := Q_Sed/(W_SedBay*N_SedBays*V_SedUpBod) = 3.125 m
W_Sed := N_SedBays*W_SedBay = 2 m
Q_SedBay := Q_Sed/N_SedBays = 2.5 L/s
Q_SedManifold := Q_SedBay = 2.5 L/s  # There is one manifold per bay
Manifold_index := findindexQ(Q_SedManifold, Q_pipe)
Q_SedManifoldcapacity := Q_pipe[Manifold_index] = 3.0507 L/s
A_SedManifoldPipe := A_pipe[Manifold_index]
ND_SedManifold := NominalDiameter(2*sqrt(A_SedManifoldPipe/π), EN_PipeSpec)
ID_SedManifoldPipe := innerdiameter(ND_SedManifold, EN_PipeSpec) = 0.108204 m
OD_SedManifoldPipe := outerdiameter(ND_SedManifold) = 0.1143 m
# Inlet Channel Design
L_Channel := N_SedTanks*W_Sed + (N_SedTanks + 1)*T_PlantWall  # Length of the Inlet Channel. The inlet channel runs along the sed tanks.
# The area of the inlet channel must be large enough not to break up flocs
A_InletChannel := A_Channel(Q_Plant, ED_SedInlet, Pi_VenaContractaOrifice)
# We want to make both channels the same depth for ease of construction. The exit channel must be deep enough to receive the launders. So we do a good estimate on the size of the launders and make the channel deep enough to receive the launder pipe (without embedding the launder pipe in the concrete channel floor!)
# This is a very slightly conservative estimate on the size of the launder. Close enough that there is no need to recalcualte this diameter.
ND_SedLaunder := ND_Manifold(Q_SedBay/N_SedLaunders, HL_SedLaunderBod, L_SedEst, Pi_QLaunderOrifices, EN_PipeSpec, Nu_Water, E_Pvc, K_PipeExit, 2*floor(L_SedEst/B_SedLaunderOrificesEst)) = 4 in
OD_LaunderCoupling := 2*ConRadius(vlookup(outerdiameter(ND_SedLaunder), Pipesizescoupling, 1)[0])
HW_InletChannel := max(H_Channel(Q_Plant, sqrt(A_InletChannel), Pi_VenaContractaOrifice, ED_SedInlet), HL_SedLaunderBod + OD_LaunderCoupling + T_ConcreteMin) = 0.22716 m
# We go from the assumption that the channel is square W=sqrt(A_InletChannel). The inlet channel is high enough to prevent floc breakup and deep enough to allow the launder couplings to fit.
# This is the required width of the inlet channel in order to prevent floc breakup
W_InletChannelED := A_InletChannel/HW_InletChannel = 0.105152 m
# This is the minimum width of the inlet channel in order to fit the coupling of the manifold entrance pipe.  The diameter of a cap is being used as an estimate for the outer diameter of the coupling socket for now
W_InletChannelCoupling := 2*ConRadius(vlookup(OD_SedManifoldPipe, Pipesizescoupling, 1)[0]) + 2*S_SedInletChannelMin = 19.716 cm
W_InletChannelEst := max(W_InletChannelED, W_InletChannelCoupling) = 0.19716 m
# This value ensures that the inlet channel is wide enough to prevent floc break-up and to fit the manifold coupling. It is an estimated value because the weir may make the channel wider.
EN_InletChannelGeom :=
    hl_weir ← Headloss_weir(Q_Plant, W_InletChannelEst)
    Geom_Channel ← Perpindicular_Weir if (hl_weir ≤ HL_SedWeirMax)
    Geom_Channel ← Parallel_Weir otherwise
    return Geom_Channel
# This function helps us determine the geometry of the weir based on the headloss through it. Hl.SedWeirMax is an expert input. 0-->Perpendicular, 1--> Parallel
W_SedWeirInlet :=
    W_InletChannelEst if EN_InletChannelGeom == Perpindicular_Weir
    L_Channel otherwise
# The width of the sed weir inlet is considered in its longitudunal direction. In the case of a perpendicular configuration, its width is the same as the width of the channel. In the parallel case, it is the same as its length.
HL_SedWeirInlet := Headloss_weir(Q_Plant, W_SedWeirInlet) = 0.0113434 m
H_SedWeirInlet := HW_InletChannel - HL_SedWeirInlet = 0.215817 m
W_InletChannel :=
    W_SedWeirInlet if EN_InletChannelGeom == Perpindicular_Weir
    w_minchannelHL(H_SedWeirInlet, HW_InletChannel, Q_Plant, L_Channel, Nu_Water, E_Concrete, 1, HL_SedWeirInlet) + T_SedWeir + W_InletChannelEst if EN_InletChannelGeom == Parallel_Weir
# This is the actual width of the inlet channel.
H_InletChannel := HW_InletChannel + H_PlantFreeboard = 0.32716 m
V_InletChannel := Q_Plant/(W_InletChannel*HW_InletChannel)
# Exit Channel Design
L_ExitChannel := L_Channel = 4.45 m
# To ensure uniform distribution of flow between tank bays, head loss in the channel was designed to be twenty times smaller than head loss in the launder. After converting from head loss to flow, the ratio of flow rates in the launders is calculated to be sqrt(20/21)
Π_QSedTanks := sqrt(20/21)
H_ExitChannel := H_InletChannel
HW_ExitChannel := HW_InletChannel - HL_SedLaunderBod
FindSide(Q, L, υ, ε, open) :=
    b ← W_InletChannel
    w ← b
    error ← 1
    while error > 0.001
        h_temp ← h_frect(Q, w, b, L, υ, ε, open)
        b ← b*(h_temp/HL_SedLaunderBod*Π_QSedTanks^2/(1 - Π_QSedTanks^2))^(1/4)
        w ← b
        error ← |h_temp/HL_SedLaunderBod - (1 - Π_QSedTanks^2)/Π_QSedTanks^2|
    return w
# The exit channel is designed by assuming the weir geometry is a perpindicular weir, and then the maximum of the the width determined by the headloss in the exit channel and the minimum width to be albe to fit a cap on the launders is chosen
W_ExitChannelEst := max(FindSide(Q_Plant, L_Channel, Nu_Water, E_Concrete, 1), W_ExitChannelMin) = 0.254 m
Geom_ExitChannel :=
    hl_weir ← Headloss_weir(Q_Plant, W_ExitChannelEst)
    Geom_Channel ← Perpindicular_Weir if (hl_weir ≤ HL_SedWeirMax)
    Geom_Channel ← Parallel_Weir otherwise
    return Geom_Channel
W_SedWeirExit :=
    W_ExitChannelEst if Geom_ExitChannel == Perpindicular_Weir
    L_Channel otherwise
HL_SedWeirExit := Headloss_weir(Q_Plant, W_SedWeirExit) = 1.13434 cm
H_SedWeirExit := HW_ExitChannel - HL_SedWeirExit = 17.5817 cm
W_ExitChannel :=
    W_SedWeirExit if Geom_ExitChannel == Perpindicular_Weir
    (W_ExitChannelMin + T_SedWeir + w_minchannelHL(H_SedWeirExit, HW_ExitChannel, Q_Plant, L_Channel, Nu_Water, E_Concrete, 1, HL_SedWeirExit)) otherwise
    = 0.408867 m
# Lamella Design
# S is the distance from the faces of each plate
S_SedPlate := B_SedPlateMin - T_SedPlate = 2.5 cm
# Estimate a length of the lamella based on the estimate of the up velocity and of the height between the top of the the lamella and the bottom of the inlet channel. This height is actually H.Between.
L_SedPlateEst :=
    L1 ← (B_SedPlateMin*(V_SedUpBod/V_SedCBod - 1) + T_SedPlate)/(sin(AN_SedPlate)*cos(AN_SedPlate))
    L2 ← 0 m
    L_SedLaunder ← L_SedEst - T_ChannelWall - W_InletChannel - W_ExitChannel
    N_SedLaunderOrifices ← floor(L_SedLaunder/B_SedLaunderOrificesEst)
    H_SedAboveEst ← 15 cm
    H_between ← H_InletChannel + T_ChannelWall - outerdiameter(ND_SedLaunder) - H_SedAboveEst - S_LamellaLaunder
    while |L1 - L2| > 0.01 m
        L_Inactive ← H_between/tan(AN_SedPlate) + W_InletChannel + W_ExitChannel + 2*T_ChannelWall
        V_Up ← Q_Sed/(W_Sed*(L_SedEst - L_Inactive))
        L2 ← L1
        L1 ← (B_SedPlateMin*(V_Up/V_SedCBod - 1) + T_SedPlate)/(sin(AN_SedPlate)*cos(AN_SedPlate))
    return L1
# Calculate the actual length of the lamella
L_SedPlate := L_SedPlateSheet/floor(L_SedPlateSheet/L_SedPlateEst) = 0.73152 m
# The plates are actually bought in the form of sheets that have a defined length. We want to divide those sheets in an equal way so we don't waste any material. That's why we introduce this equation.
# Distance from the wall to the vertical pipe of the main plate settler support frame
B_SedPlateFrameVertical := 10 cm  # These parameters go into the expert inputs. They need to be clearly defined.
# Diameter of Flange
D_Flange := 6 in
L_SedInactiveEst := L_SedPlate*cos(AN_SedPlate) + W_InletChannel + W_ExitChannel + 2*T_ChannelWall
H_SedPlate := L_SedPlate*sin(AN_SedPlate) = 0.633515 m
# Launder Hydraulic Calculations
# All of these values are estimates because the length of the sed tank can be varied after introduction of the plate settler modules.
L_SedLaunderEst := L_SedEst - T_ChannelWall - W_InletChannel - W_ExitChannel = 2.22944 m
# There will be two orifices per row along the active length of the launder
N_SedLaunderOrificesEst := 2*floor((L_SedEst - L_SedInactiveEst)/B_SedLaunderOrificesEst) = 34
Q_SedLaunderOrificesEst := (Q_SedBay/N_SedLaunders)/N_SedLaunderOrificesEst = 73.5294 cm^3/s
# This the HL due to major & minor losses loses through the manifold.
HL_SedLaunderEst := HL_Manifold(Q_SedBay/N_SedLaunders, innerdiameter(ND_SedLaunder, EN_PipeSpec), L_SedEst - L_SedInactiveEst, 0, Nu_Water, E_Pvc, N_SedLaunderOrificesEst) + h_f(Q_SedBay/N_SedLaunders, innerdiameter(ND_SedLaunder, EN_PipeSpec), L_SedInactiveEst, Nu_Water, E_Pvc) = 0.0018517 m
HL_SedLaunderOrifice := HL_SedLaunderBod - HL_SedLaunderEst = 0.0381483 m  # This is the headloss through the orifices.
D_SedLaunderOrifice := RoundNearest(D_circle(A_orifice(HL_SedLaunderOrifice, Pi_VenaContractaOrifice, Q_SedLaunderOrificesEst)), D_Drill)
Q_SedLaunderOrifices := Q_orifice(D_SedLaunderOrifice, HL_SedLaunderOrifice, Pi_VenaContractaOrifice) = 7.23319e-5 m^3/s
# This is the actual flow out of the orifices, that allows the headloss to be obrained.
# This is the total headloss through the launder based on the actual diameter of the orifices
HL_SedLaunder := h_orifice(D_SedLaunderOrifice, Pi_VenaContractaOrifice, Q_SedLaunderOrifices) = 0.0381483 m
# H.SedAbove is the height needed above the lamella
H_SedAbove := outerdiameter(ND_SedLaunder) + HL_SedLaunder = 0.152448 m
# Adjustment of the plate settlers
L_SedActiveEst := L_SedEst - L_SedInactiveEst + (H_SedPlate + H_SedAbove + H_PlantFreeboard - H_ExitChannel - T_PlantWall)/tan(AN_SedPlate) = 1.9497 m
B_SedPlateHorizontal := B_SedPlateMin/sin(AN_SedPlate) = 0.0323316 m  # The center to center horizontal distance between the lamella sheets
N_SedPlatesEst := floor(L_SedActiveEst/B_SedPlateHorizontal) = 60
# Number of spaces where water is traveling is one less than the number of plates used to create those spaces
# This part of the code serves to draw the module pipe for the plate settlers. In order to understand the meaning of each value please refer to the autocad drawing Lamina.Explanation
S_SedModulePipesMin := max(1/2*L_SedPlate, L_SedPlate - L_SedPlateCantilevered) = 0.43152 m
# This ensures that the distance between the top of the lamella and the second pipe is smaller than L.SedPlateCantilevered..
N_SedModulePlates := floor(((L_SedPlate - S_SedModulePipesMin - 2*S_SedPlateModuleMin)*tan(AN_SedPlate) + S_SedPlate)/(T_SedPlate + S_SedPlate)) = 16
# This is the number of plates per module.
L_SedModulePipe := (N_SedModulePlates*(T_SedPlate + S_SedPlate) - S_SedPlate) = 0.423 m  # This is the length of a sed module pipe.
S_SedModulePipes := L_SedPlate - 2*outerdiameter(ND_SedModulePipe) - 2*S_SedPlateModuleMin - (N_SedModulePlates*(T_SedPlate + S_SedPlate) - S_SedPlate)/tan(AN_SedPlate) = 0.404629 m
# This is the actual spacing between the pipes.
S_SedPlateModule := (L_SedPlate - S_SedModulePipes - L_SedModulePipe/tan(AN_SedPlate))/2 = 0.041336 m
# This is the new spacing between the bottom of the first plate settler in a module and the first pipe.
N_SedModules := ceil(N_SedPlatesEst/N_SedModulePlates) = 4
L_SedModulePipe/tan(AN_SedPlate) =  # error: This variable is undefined.
N_SedPlates := N_SedModules*N_SedModulePlates = 64
L_Sed := L_SedEst + (N_SedPlates - N_SedPlatesEst)*B_SedPlateHorizontal = 3.25433 m
L_SedActive := (N_SedPlates - 1)*B_SedPlateHorizontal = 2.03689 m
L_SedInactive := L_Sed - L_SedActive = 1.21743 m
L_SedModulePipeCap := CapHeight(NominalPipeSize(ND_SedModulePipeSpace)) - (CapDiameter(NominalPipeSize(ND_SedModulePipeSpace))/2 - outerradius(NominalPipeSize(ND_SedModulePipeSpace))) = 0.0300037 m
L_SedModulePipeIncrement := B_SedPlateMin - L_SedModulePipeCap = -0.00200375 m
# The length of the active sed tank where water actually flow
L_SedActive1 := L_SedActive - N_SedPlates*T_SedPlate/sin(AN_SedPlate) = 1.81519 m
V_SedUp := Q_Sed/(L_Sed*W_Sed) = 66.3732 m/day
V_SedUpActive := Q_Sed/(L_SedActive1*W_Sed) = 118.996 m/day
V_SedC := V_SedUpActive/(1 + L_SedPlate/S_SedPlate*cos(AN_SedPlate)*sin(AN_SedPlate)) = 8.7047 m/day
# Thickness of Flange | What is this? Appears to be an error.
T_Flange := -1 cm
ND_SedFrameStub := 1/2*in
# Height of stub supporting plate settler modules
H_SedFrameStub := (B_SedPlateHorizontal - outerdiameter(ND_SedFrameStub))*tan(AN_SedPlate)
B_SedFrameStub := B_SedPlateHorizontal*N_SedModulePlates
# Design paramaters for orifices in launder
# This is the number of rows of orifices.  There are two orifices per row
N_SedLaunderOrificesRow := ceil((Q_SedBay/N_SedLaunders)/(2*Q_SedLaunderOrifices)) = 18
# Total number of orifices on the launder
N_SedLaunderOrifices := N_SedLaunderOrificesRow*2 = 36
B_SedLaunderOrifices := 2*L_SedActive/N_SedLaunderOrifices = 11.3161 cm
L_SedLaunder := L_Sed - 2*T_ChannelWall - CapHeight(ND_SedLaunder) - W_InletChannel - W_ExitChannel = 2.12939 m
# Design paramaters for orifices in inlet manifold
# This portion of the code helps us calculate the number of ports in the inlet manifold. The basis is that there is no ports under the elbow socket depth and the first port is spaced B.SedManifoldPorts/2 from the socket depth. Hence the available length for the ports is L.Pipe-SocketDepth-B/2
# It might be better to add ports in the elbow! We want flow in that end of the sed tank too.
L_SedManifoldPipe := L_Sed - W_InletChannelEst/2 - CapHeight(ND_SedManifold) = 3.07637 m
# The number of ports per manifold calculated from the actual sed length
N_SedManifoldPorts := floor(((L_SedManifoldPipe - ElbowRadius(ND_SedManifold) - SocketDepth(ND_SedManifold)) - B_SedManifoldPortEst)/B_SedManifoldPortEst) = 27
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Q_SedManifoldPort := Q_SedBay/N_SedManifoldPorts = 0.0925926 L/s
D_SedManifoldPortEst := (Q_SedManifoldPort/(ED_SedInlet^(1/3)*Pi_VenaContractaOrifice^(7/6))*4*0.34/π)^(3/7) = 3.41423 cm
D_SedManifoldPort := CeilNearest(D_SedManifoldPortEst, D_Drill) = 3.6 cm  # The diameter of a single port
A_SedManifoldPort := A_circle(D_SedManifoldPort)  # The area of a single port
# Calculate the energy dissipation rate created by the port. We will use this to evaluate this design.
ED_SedManifoldPort := ED(Q_SedManifoldPort, A_SedManifoldPort, Pi_VenaContractaOrifice) = 4.71786 mW/kg
B_SedManifoldPort := B_SedManifoldPortEst = 10 cm
# First constraint ensures that the cylindrical area that the water is flowing through radially has as much area as the port area. The second contraint ensures that the thickness of the hub on the elbow will fit and not have to be embedded in the sludge drain cover.
S_SedManifoldBetween := max(D_SedManifoldPort/4, ConRadius(ND_SedManifold) - outerradius(ND_SedManifold)) = 0.01143 m
# Sludge Drain Program
# Here we are assuming that we are willing to use up to 50% of the available energy to get the flow through the valve and discharge it to atmosphere.
HL_Valve := 0.5*HW_SedEst
# This is the initial drain rate
# The factor of two is because the flow rate decreases linearly as the tank drain (for a constant cross section tank). Thus the average drain rate is 1/2 the initial drain rate.
Q_SedSludgeDrain := 2*W_SedBay*L_Sed*HW_SedEst/Ti_SludgeDrain = 0.00723184 m^3/s
# There will be a drain orifice in between each manifold port
B_SedSludgeOrifices := B_SedManifoldPort
N_SedSludgeOrifices := floor(L_Sed/B_SedSludgeOrifices) = 32  # per bay
Q_SedSludgeOrifices := Q_SedSludgeDrain/N_SedSludgeOrifices
ND_SedSludgeValve := D_pipeschedule(Q_SedSludgeDrain, EN_PipeSpec, HL_Valve, 0.01 m, Nu_Water, E_Pvc, K_PipeExit + K_GateValve) = 2 in
# The pipe length in this equation is irrelevant. Minor losses dominate
# This is the actual head loss through the valve given its diameter
HL_SedDrainValve := h_e(Q_SedSludgeDrain, innerdiameter(ND_SedSludgeValve, EN_PipeSpec), K_GateValve + K_PipeExit) = 0.666878 m
HL_SludgeDrain := HW_SedEst - HL_SedDrainValve = 1.33312 m
# This is the required diameter of the sludge drain if it were circular
D_SedSludge := D_Manifold(Q_SedSludgeDrain, HL_SludgeDrain, L_Sed, Pi_QSludgeOrifices, Nu_Water, E_Concrete, 0, N_SedSludgeOrifices) = 2.71432 in
HL_SedSludgeEst := HL_Manifold(Q_SedSludgeDrain, D_SedSludge, L_Sed, 0, Nu_Water, E_Concrete, N_SedSludgeOrifices) = 17.9087 cm
HL_SedSludgeOrificeEst := HL_SludgeDrain - HL_SedSludgeEst = 115.403 cm
D_SedSludgeOrifice := RoundNearest(D_circle(A_orifice(HL_SedSludgeOrificeEst, Pi_VenaContractaOrifice, Q_SedSludgeOrifices)), D_Drill) = 10 mm
# The cross sectional area of the drain if it were circular
A_SedSludge := π/4*D_SedSludge^2
# Assume sludge drain is twice as wide as it is high (to save depth in the sed tank)
W_SedSludge := sqrt(2*A_SedSludge) = 8.64082 cm
H_SedSludge := A_SedSludge/W_SedSludge = 4.32041 cm
# The width of the drain cover needs to rest on the ledge created by the drain
W_SedDrainCover := W_SedSludge + 2*T_ConcreteMin
T_SedSludge := T_ConcreteMin
# The elevation of the top of the sludge drain and drain cover
Z_SedSludge := T_SedSludge + H_SedSludge = 0.0932041 m
# Sedimentation Components
# This is the width of the sloped part of the sed tank wall.  It will be used to calculate the elevation of the bay walls
W_SedSlope := (W_SedBay - W_SedDrainCover)/2 - T_ConcreteMin/2
W_SedInletBottom := (W_SedBay - W_SedDrainCover)/2 = 0.406796 m
H_SedSlopeTriangle := tan(AN_SedSlope)*W_SedSlope = 0.66129 m
# The elevation of the center of the manifold includes the minimum space between the outside of the manifold pipe and the drain cover
H_SedBetween := max(H_SedSlopeTriangle, ConRadius(ND_SedManifold) + 2*SocketDepth(ND_SedManifold) + ElbowRadius(ND_SedManifold)) - H_SedSlopeTriangle
Z_SedManifoldPipe := Z_SedSludge + outerradius(ND_SedManifold) + S_SedManifoldBetween = 0.161784 m
# The elevation of the top of the sloped walls
Z_SedSlopes := Z_SedSludge + H_SedSlopeTriangle = 0.754494 m
# H.SedBetween is a user specified distance between the top of the sloped walls and the bottom of the pipefram (i.e. additional distance wanted for a floc blanket. The height of water in the sed tank is the sum of all of the heights of the components plus the additional specified space
HW_Sed := Z_SedSlopes + H_SedBetween + outerdiameter(ND_SedPlateFrame) + H_SedPlate + H_SedAbove + T_ConcreteMin + S_LamellaLaunder = 1.67872 m
H_Sed := HW_Sed + H_PlantFreeboard = 1.77872 m
# This was for the height of the "main platform". Is this still used?
Z_Mp := HW_Sed - HW_InletChannel = 1.45156 m
# The elevation of the launder
Z_SedLaunder := HW_Sed - HL_SedLaunder - outerradius(ND_SedLaunder) = 1.58342 m
H_SedBayDivider := Z_SedSlopes + H_SedBetween
Z_SedWeirExit := H_Sed - H_ExitChannel + H_SedWeirExit = 1.62737 m
# Launder Cap
# The size of the opening in the cap to allow the inflow of water into the sedimentation tank is determined by the Orifice Equation Q=A*K*(2*g*h)^.5 so that the flow rate through the cap is at most the flow rate out of the other sedimentation tanks.
HW_LaunderCap := H_Sed - H_ExitChannel + HW_ExitChannel = 1.63872 m
A_LaunderCapOrifice := Q_Sed/(Pi_VenaContractaOrifice*sqrt(2*g*HW_LaunderCap)) = 13.9992 cm^2
D_CapOrifice := RoundNearest(D_circle(A_orifice(h_orifice(sqrt(A_LaunderCapOrifice/(π/4)), Pi_VenaContractaOrifice, Q_SedBay/N_SedLaunders), Pi_VenaContractaOrifice, Q_SedBay/N_SedLaunders)), D_Drill) = 0.042 m
L_LaunderCouplingPipe := T_PlantWall + CapHeight(ND_SedLaunder)
# Using the pipe database file, and given the schedule of the pipe, the nominal diameter of the inlet and exit tank pipes are determined.  The headloss through the pipe is asumed to be the height of the sed tank.  The headloss is halved to be conservative. The inlet tank pipe is assumed to be the same as the exit tank pipe.
ND_PltWeir := D_pipeschedule(Q_Plant, EN_PipeSpec, H_Sed/2, H_Sed + L_Sed, Nu_Water, E_Pvc, 2*K_90 + 2*K_PipeExit) = 3 in
Del_PltWeirH := (3*Q_Plant/(2*Cd_PltWeir*sqrt(2*g)*π*ND_PltWeir))^(2/3) = 3.20199 in
H_PltWeir := HW_ExitChannel + H_PlantFreeboard/2 = 0.23716 m
# Sedimentation Drain Design
# This ensures that the coupling will not be larger than the drain channel
ND_SedDrainAdapter :=
    NominalDiameter(sqrt(1/Ti_SludgeDrain*(16*W_SedBay^1.5*tan(AN_SedPlate)^0.5*L_Sed/(π*3*sqrt(2*g)) + (sqrt(HW_Sed) - sqrt(W_SedBay/2*tan(AN_SedPlate)))/((π/(8*L_Sed*W_SedBay))*sqrt(2*g/(K_GateValve + K_Exp))))), EN_PipeSpec) if NominalDiameter(sqrt(1/Ti_SludgeDrain*(16*W_SedBay^1.5*tan(AN_SedPlate)^0.5*L_Sed/(π*3*sqrt(2*g)) + (sqrt(HW_Sed) - sqrt(W_SedBay/2*tan(AN_SedPlate)))/((π/(8*L_Sed*W_SedBay))*sqrt(2*g/(K_GateValve + K_Exp))))), EN_PipeSpec) ≤ W_SedSludge
    NominalDiameter(2*outerradius(W_SedSludge), EN_PipeSpec) otherwise
D_SedDrainValve := 2*outerradius(ND_SedDrainAdapter) = 1.9 in
# Uses the nominal valve size to calculate the actual valve size for drawing purposes.  D.SedValve is the OD of the coupling and ID of the valve.
H_SedSlope := D_SedDrainValve/2 = 0.02413 m
D_SedScale := D_SedDrainValve/(1.16 m) = 0.0416034
# This scale is due to the size of the orignal valve block that is being inserted and is based on the OUTER radius
