S_FiTrunkMin := 3 cm  # Minimum vertical spacing between trunk line pipes going through the filter wall for concrete construction
S_FiManAssembly := 2 cm
L_FiManFerncoCoupling := 4 cm
# Stacked Rapid Sand Filter
## Constraints and Comments
# Max head loss through inlet piping during filtration
# Max head loss through inlet piping during backwash
# Max head loss through outlet piping during filtration
# Max head loss through outlet piping during backwash (siphon)
# Max ratio of head loss in manifold to head loss through filter layer during filtration
# Max ratio of head loss in manifold to head loss through filter layer during filtration
# The head loss across each layer of the filter must be large compared to losses in the plumbing that distributes water into the sand bed, in order for the water to be distributed uniformly to each layer.  At the beginning of a filtration cycle when the sand bed is clean, the head loss is the smallest.  This minimum head loss during filtration is estimated by the Carman-Kozeny equation.
# Filtration mode constraints
# The inlet manifolds need to have a small piezometric head variation relative to the head loss through a clean sand bed. Given that both the trunk lines and the branches are short manifolds (fL/d < 1), the piezometric head variability is dominated by pressure recovery which is given by V^2/(2*g)*.  where the velocity is the initial velocity in the manifold. Thus the velocity in the trunk and branch lines is limited by this constraint. If we want to relax this constraint we could add head loss through the slots. But we need to be careful to not cause a flow imbalance between the inlets that carry flow for two layers and the inlets that carry flow for only one layer. Perhaps top inlet and bottom inlet should have only one line of slots per pipe instead of two lines. We are currently assuming that the backwash branches will have 1/2 the slot area of the branches in the other layers.
#
# Slot head loss issues
# If we use the slots to generate head loss in an effort to improve flow distribution, we need to account for sand blocking (1-ε) of the slots during filtration. The slots are not blocked during backwash (except perhaps during backwash initiation).
#
# Backwash mode constraints
# The  constraint on the design of the backwash manifold branches is that the flow rate from each slot must be close to the average (perhaps within 20%). We cannot rely on head loss through the filter media to help create uniform flow from the manifold during backwash because the filter bed will be fluidized. Thus we must design the backwash manifold to have uniform flow distribution without any external assistance. We can improve uniformity of flow distribution by decreasing head loss and pressure recovery in the manifold branches and in the trunk line and/or by increasing the head loss through the slots. The backwash system will also be used during filtration and the flow rate in the backwash manifold system will vary by a factor of 6 between those two states. Thus head loss through the slots will vary by a factor of 36 between the two states. We could use a relatively high slot head loss to get uniform flow distribution. The slot head loss must be small enough during filtration mode to not cause a flow inbalance between filter layers. That suggests that the slot head loss must be less than 10% of the clean bed head loss during filtration and thus less than 36 times that amount during backwash.
#
# Flow distribution in a short manifold is quite uniform for the case when the total port area is equal to or less than the manifold area. We have two manifold systems operating in series with trunk line distributing flow to branches and branches distributing flow to slots. Head loss through the slots effectively helps distribute flow between branches as well as between slots. Thus the constraints on both trunk and branch sizes are that they have pressure recovery terms that are small compared with the head loss through the slots.
# Algorithm for trunk, branch, slot design
# Head loss through the slots in the backwash manifold are directly related to the head loss throught the slots during filtration. The flow area during filtration will be reduced due to sand blocking. This results in a factor of ε_FiSand
# Calculate slot area for backwash assuming this head loss.
# Note that the slot area for backwash analysis should not be adjusted for sand porosity.
# Calculate size of branch lines using the rule that their area must exceed the port area.
# Given the area of the branch lines, recalculate the slot area by setting it equal to the branch area.
# Recalculate the actual head loss through the slots given this new slot area.
#
# Calculate the size of the trunk lines using the rule that their area must exceed the port area. Thus branches must have more area than the slots in a branch. Trunk must have more area than the branches.
# Layer Thickness as Function of Trunk Diameter
H_FiLayerF(ND_Trunk) := max(H_FiLayerMin, Ceil(outerdiameter(ND_Trunk) + S_FiTrunkMin, 1 cm), Ceil(OuterDiameterFittingPVC(ND_Trunk), 1 cm), Ceil(FerncoOuterDiameter(ND_Trunk), 1 cm))
# round up to the nearest cm to make construction easier
H_FiBottomLayerF(ND_Trunk, ND_BwTrunk) := max(H_FiLayerMin, Ceil(outerradius(ND_Trunk) + outerradius(ND_BwTrunk) + S_FiTrunkMin, 1 cm), Ceil(ConRadius(ND_Trunk) + ConRadius(ND_BwTrunk), 1 cm), Ceil(FerncoOuterDiameter(ND_Trunk)/2 + FerncoOuterDiameter(ND_BwTrunk)/2, 1 cm))
# Ratio of Pressure Recovery to Clean Bed Head Loss
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# Ratio of long path flow to short path flow. We need to develop a better hydraulic model of this system. The piezometric head inside the inlet and outlet manifold systems follow trends that tend to keep the net piezometric head difference between the two pipe networks similar. Thus the expected flow variation is less than what we are modeling here.
Pi_FiManifoldQ := 0.85
Pi_FiManifoldHeadLoss := 1 - Pi_FiManifoldQ^2 = 0.2775
# Ratio of pressure recovery in the slotted pipes to the head loss through the clean bed. This constraint is critical and determines all of the pipe sizes related to the filtration cycle. This is likely still conservative.
# Exit and entrance pipes will have additional head loss. We need to verify that this head loss is acceptable. The constraint is that we don't want excessive head loss through these pipes because that head loss will force us to use a deeper filter box or will result in lower water level elevation in the effluent.
# Trunk Diameter and Layer Thickness Based on Flow Distribution Constraint
Q_FilterMax :=
    for i ∈ 0 .. last(AvailND)
        H_FiLayer ← H_FiLayerF(AvailND[i])
        HL_FiCleanLayer ← h_lKozeny(H_FiLayer, D_FiSand60, V_FiLayer, ε_FiSand, Nu_Water)
        V_FiMaxPR ← sqrt(2*g*(HL_FiCleanLayer*Pi_FiManifoldHeadLoss))
        Q_FilterMax[i] ← π*innerdiameter(AvailND[i], PS_Default)^2/4*V_FiMaxPR*N_FiLayer/2
    return Q_FilterMax
# This function returns the maximum flow rate through a filter for each of the available trunk pipe sizes based on the flow distribution constraint.
# Constraint the number of filters to a reasonable value and increase the depth of the filter bed for large plants. This function needs to eventually be based on cost minimization and what is required for easy operation of the plants.
N_FiMax := min(ceil(Q_Plant/LookupCeil(6 in, AvailND, Q_FilterMax)), 4) = 2
ND_FiTrunk := LookupCeil(Q_Plant/N_FiMax, Q_FilterMax, AvailND) = 6 in
H_FiLayer := H_FiLayerF(ND_FiTrunk) = 20 cm
# Clean Bed Head Loss and Maximum Manifold Velocity
HL_FiCleanLayer := h_lKozeny(H_FiLayer, D_FiSand60, V_FiLayer, ε_FiSand, Nu_Water) = 5.56209 cm
PR_FiManifoldMax := HL_FiCleanLayer*Pi_FiManifoldHeadLoss
V_FiMaxPR := sqrt(2*g*PR_FiManifoldMax) = 0.550207 m/s
# Number of Filters and Flow Rate Calculations
Q_FiMax := π*innerdiameter(ND_FiTrunk, PS_Default)^2/4*V_FiMaxPR*N_FiLayer/2 = 30.9485 L/s
N_Fi := min(ceil(ceil(Q_Plant/Q_FiMax)/2) + 2, N_FiMax) = 2
Q_Fi := Q_Plant/N_Fi = 16 L/s  # The flow will be divided evenly between the N_Fi = filters.
A_FiActive := Q_Fi/(N_FiLayer*V_FiLayer) = 1.45455 m^2  # This is the required area of each of the N_Fi = filters.
Q_FiLayer := Q_Fi/N_FiLayer = 2.66667 L/s  # This is the flow rate through each filter layer
# Number of Manifold Branches and Active Length
Q_FiManBranchMax := V_FiMaxPR*π*innerdiameter(ND_FiManBranch, PS_FiBranch)^2/4 = 0.306785 L/s
Q_FiManBranchAve := Q_FiManBranchMax/(1 + (1 - Pi_FiManifoldQ)/2) = 0.285381 L/s
# branches are coming out of both sides of the manifold
N_FiManBranch := Ceil(Q_FiLayer/Q_FiManBranchAve, 2) = 10
Q_FiManBranch := Q_FiLayer/N_FiManBranch = 0.266667 L/s
L_FiManBranchActive := Q_FiManBranch/(V_FiLayer*B_FiManifoldBranch) = 1.45455 m  # this is the length of the branches on ONE side of the filter
W_FiActive := 2*L_FiManBranchActive = 2.90909 m
# This is only the active filtration width (does not include the projected area of the trunk lines, but we assume the space between the branch holders contributes to active area)
N_FiBwManBranch := Ceil(Q_Fi/(V_FiMaxPR*π*innerdiameter(ND_FiManBranch, PS_Default)^2/4), 2) = 42
B_FiBwManBranch := N_FiManBranch/2*B_FiManifoldBranch/(N_FiBwManBranch/2) = 2.38095 cm
Q_FiBwManBranch := Q_Fi/N_FiManBranch = 1.6 L/s
HL_FiBwSlotEst := PR_FiManifoldMax/Pi_FiManifoldHeadLoss = 5.56209 cm
# This is the maximum head loss we can have in the backwash slots. The equation scales the filtration head loss target to the backwash target taking into account the different flow rates and the assumption that the slots are blocked by sand during filtration (and not during backwash).
A_FiBwLayerSlotsEst := A_orifice(HL_FiBwSlotEst, Pi_VenaContractaOrifice, Q_Fi) = 243.156 cm^2
ND_FiBwManBranch := NominalDiameter(CeilNearest(D_circle(A_FiBwLayerSlotsEst/N_FiManBranch), AvailPipeSizes(PS_FiBranch)[:, 0]), PS_FiBranch) = 3 in
A_FiBwLayerSlotsEst/N_FiManBranch =  # error
ND_FiBwManBranch := NominalDiameter(CeilNearest(D_circle(Q_FiBwManBranch/V_FiMaxPR), AvailPipeSizes(PS_FiBranch)[:, 0]), PS_FiBranch) = 3 in
Q_FiBwManBranch/V_FiMaxPR =  # error
# Now that we have the backwash branch size we can determine the maximum slot size (to reduce head loss).
A_FiBwManBranches := π/4*innerD(ND_FiBwManBranch, PS_FiBranch)^2*N_FiManBranch
A_FiBwLayerSlots := A_FiBwManBranches = 476.945 cm^2  # Using same size slots as total branch area to get reasonable flow distribution.
HL_FiBwSlot := h_orifice(D_circle(A_FiBwLayerSlots), Pi_VenaContractaOrifice, Q_Fi) = 1.44568 cm
ND_FiBwTrunk := NominalDiameter(CeilNearest(D_circle(A_FiBwManBranches), AvailPipeSizes(PS_Default)[:, 0]), PS_Default) = 10 in
W_Fi := W_FiActive + OuterDiameterFittingPVC(ND_FiBwTrunk) = 3.20913 m
ND_DistPipe := D_pipeschedule(Q_Plant, PS_Default, 1 m, 100 m, Nu_Water, E_Pvc, 2) = 8 in
W_FiEntrance := max(3*S_Fitting + ConRadius(ND_FiBwTrunk) + 3*ConRadius(ND_FiTrunk) + 2*(SocketDepth(ND_FiTrunk) + ElbowRadius(ND_FiTrunk)), W_HumanMin, W_rectweir(Q_Fi, 5 cm)) = 1.14744 m
W_FiOverflow := W_Fi + T_FiWall - W_FiEntrance - 2*T_PlantWall = 2.01168 m
L_Fi := N_FiManBranch/2*B_FiManifoldBranch + L_FiManFerncoCoupling + CapThickness(ND_FiBwTrunk) = 0.553494 m
L_FiBwTrunk := L_Fi - L_FiManFerncoCoupling/2 - CapThickness(ND_FiBwTrunk)
L_FiTrunk := L_Fi - L_FiManFerncoCoupling/2 - CapThickness(ND_FiTrunk)
h_e(Q, D, K)
HL_FiBwInletManifold := 1/3*h_f(Q_Fi, innerD(ND_FiBwTrunk, PS_Default), L_Fi, Nu_Water, E_Pvc) + h_e(Q_Fi/N_FiManBranch, innerD(ND_FiBwManBranch, PS_FiBranch), K_PipeEnt) + (1/3*h_f(Q_Fi/N_FiManBranch, innerD(ND_FiBwManBranch, PS_FiBranch), W_FiActive, Nu_Water, E_Pvc) + HL_FiBwSlot) = 1.94047 cm
# Inner manifolds have double the slot area of the upper and lower manifolds
A_FiLayerSlots := 2*A_FiBwLayerSlots = 953.889 cm^2
HL_FiSlot := (2*Q_FiLayer/(Pi_VenaContractaOrifice*A_FiLayerSlots*ε_FiSand))^2*1/(2*g) = 0.250986 cm
# A conservative estimate of the head loss through the slots given sand blockage
# This head loss should end up being smaller than HL_FiManifoldTarget.
H_FiBottomLayer := H_FiBottomLayerF(ND_FiTrunk, ND_FiBwTrunk) = 0.26 m
H_FiSand := (N_FiLayer - 1)*H_FiLayer + H_FiBottomLayer = 1.26 m  # The total depth of sand
# Top View | Side View
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# Calculate the head loss across the bed during backwashing
HL_FiBwSS := H_FiSand*(Rho_FiSand - Rho_H2O)*(1 - ε_FiSand)/Rho_H2O = 1.2474 m  # Sand bed head loss during steady state backwash.
HL_FiTerminal := 2*H_FiLayer = 0.4 m
# The backwash head loss is almost exactly equal  to the sand bed depth. Note that this ignores losses in the plumbing.
HL_FiDirty := HL_FiTerminal - HL_FiCleanLayer = 34.4379 cm
# Does not include the clean bed head loss. We are limiting the head loss gradient to a value of 1. At this head loss an entire upflow layer of sand will become bouyant.
# Terminal head loss through the filter; set to be 30 cm more than the clean bed head loss
HL_FiBwSF := 40 cm
# This is the extra head we are going to provide to ensure that we can initiate backwash. This may be excessive and it will likely be possible to reduce this in designs after Tamara.
HL_FiBwInitiation := HL_FiBwSF + HL_FiBwSS = 1.6474 m
# This is the spacing (center to center) of the manifold branches on the trunk line. Presumably this number scales with the layer thickness. Deeper filter layers could still work well if the spacing increased. Our lab filter is 10 cm in diameter and has one manifold branch per layer and thus the branch spacing was equivalent to 10 cm.
# Pressure recovery dominates the design for filtration. The constraint on the manifolds is that the pressure recovery term must be small relative to the head loss through the filter bed.
HL_FiTrunk := 1/3*h_l(2*Q_FiLayer, innerD(ND_FiTrunk, PS_Default), L_Fi, K_PipeExit, Nu_Water, E_Pvc) = 0.149324 cm
# This is the head loss in the manifold part of the trunk line. This does not include head loss in the rest of the inlet pipe.
ND_FiManBranch =  # error  # This was designed previously.
ShortTeeLength(ND_FiManBranch) =  # error
L_FiManBranchExt := 2 cm  # How far the branch extends into the trunk line
# Active width plus the T.ConcreteMin for the lip on the far side minus the Tee length from the wall plus a distance the branch will extend into the trunk line
L_FiManBranch := L_FiManBranchActive + 2*L_FiManBranchExt + ConRadius(ND_FiBwTrunk) - ConRadius(ND_FiTrunk) = 1.55249 m
L_FiBwManBranch := L_FiManBranchActive + 2*L_FiManBranchExt = 1.49455 m
# Same as above but the backwash branches will be shorter by the difference between the radius' of the trunks and backwash trunk
HL_FiInletManifold := 1/3*h_f(2*Q_FiLayer, innerD(ND_FiTrunk, PS_Default), L_Fi, Nu_Water, E_Pvc) + h_e(2*Q_FiLayer/N_FiManBranch, innerD(ND_FiManBranch, PS_FiBranch), K_PipeEnt) + 1/3*h_f(2*Q_FiLayer/N_FiManBranch, innerD(ND_FiManBranch, PS_FiBranch), W_FiActive, Nu_Water, E_Pvc) + HL_FiSlot = 8.26681 cm
# Slotted Pipe Specs
## Backwash manifold branches
# The slots should be configured to provide this total amount of slot area for the
# bottom manifold handling the backwash flow. We will define this as the inner diameter area of the slots
A_FiBwBranchSlots := A_FiBwLayerSlots/N_FiManBranch = 47.6945 cm^2  # This is the amount of slot area that must be available for each length of pipe.
L_FiBwManSlotTotal := A_FiBwBranchSlots/W_Slots = 23.4717 m  # The slots on each pipe must have this total length to provide the required area.
# We select  B_FiBwManSlot := 3/16*in = 4.7625 mm  for the closest slot spacing, and N_FiBwSlotRows := 2  for best structural integrity of these pipes
N_FiBwManSlots := floor(N_FiBwSlotRows*W_FiActive/B_FiBwManSlot) = 1221
# Over the active area of the filter, there will be N_FiBwManSlots =slots whose area will effectively
# contribute to the total required slot area
L_FiBwManSlot := L_FiBwManSlotTotal/N_FiBwManSlots = 0.756824 in
C_FiBwManInner := π*innerdiameter(ND_FiBwManBranch, PS_FiBranch) = 9.63841 in  # Check
# SPECIFICATIONS:  we need  N_FiManBranch = pipes of diameter  ND_FiBwManBranch =  with  W_Slots =  wide,  L_FiBwManSlot =  long slots spaced at  B_FiBwManSlot = 0.1875 in
USD := ¤
P_FiBwManBranches := N_FiManBranch*1*m*(12*USD/(5 ft)) = 78.7402 USD
## Filtration manifold branches
ND_FiManBranch =  # error
N_FiManBranch =  # error
A_FiLayerSlots =  # error
A_FiBranchSlots := A_FiLayerSlots/N_FiManBranch = 95.3889 cm^2
L_FiManSlotTotal := A_FiBranchSlots/W_Slots = 46.9434 m
# We select  B_FiManSlot := 0.125 in = 3.175 mm  for the closest slot spacing, and N_FiSlotRows := 2  for best structural integrity of these pipes
N_FiManSlots := floor(N_FiSlotRows*W_FiActive/B_FiManSlot) = 1832
# Over the active area of the filter, there will be N_FiManSlots =slots whose area will effectively
# contribute to the total required slot area
L_FiManSlot := L_FiManSlotTotal/N_FiManSlots = 1.00882 in
C_FiManInner := π*innerdiameter(ND_FiManBranch, PS_FiBranch) = 3.29553 in  # Check
# SPECIFICATIONS:  we need  N_FiManBranch*(N_FiLayer - 1) = pipes of diameter  ND_FiManBranch =  with  W_Slots =  wide,  L_FiManSlot =  long slots spaced at  B_FiManSlot = 0.125 in
P_FiManBranches := N_FiManBranch*(N_FiLayer - 1)*1*m*(9*USD/(5 ft)) = 295.276 USD
HL_FiInletPlumbing := h_l(2*Q_FiLayer, innerD(ND_FiTrunk, PS_Default), 2 m, K_El90 + K_PipeEnt, Nu_Water, E_Pvc) + HL_FiInletManifold = 8.9724 cm
HL_FiBwInletPlumbing := h_l(Q_Fi, innerD(ND_FiBwTrunk, PS_Default), 2 m, K_El90 + K_PipeEnt, Nu_Water, E_Pvc) + HL_FiBwInletManifold = 2.77836 cm
HL_FiOutletPlumbing := HL_FiInletPlumbing = 8.9724 cm
# Active filter area plus the diameter of the coupling in the wall plus  5 cm on the opposite side of the filter for the ledge that holds the man branches in place
V_FiBw*W_FiActive/(W_Fi - 5 cm) =  # error  # Ratio of active width to actual width and the bulk backwash velocity
W_FiActive/W_Fi =  # error
# Calculate the Z of the backwash channel weir
# Calculate the head loss through the siphon during backwash
# AKA time to drain the filter box of the water above the fluidized bed
Ti_FiBwInitiationBod := 3 min
# Need a flow rate in order to determine HL through the siphon tube
#
# Siphon has to handle the entire flow into the filter plus drain the terminal head in Ti.FiBwInitiation.  This is aapproximately a "hole in a bucket problem" so the average flow rate is half the max flow (hence the factor of 2).  The HL sum corresponds to the height of water that needs to be drained; this ignores HL in the siphon because we don't know it yet, but it should be small...
Q_FiSiphonDesign := Q_Fi + 2*A_FiActive*(HL_FiBwInitiation + HL_FiBwInletPlumbing)/Ti_FiBwInitiationBod = 43.0737 L/s
# Minor losses for flow through the siphon; they will be much greater than major losses, making major losses negligible.
#
# 1 is from losses through the branched path of a Tee
K_FiSiphon := 5*K_El90 + K_PipeExit + K_PipeEnt + 1 = 7
h_eFiSiphonGuess := 20 cm  # Maximum acceptable head loss through the siphon at SS; used to calculate a Diameter
D_FiSiphonGuess := nthroot(K_FiSiphon*8/(g*π^2)*Q_FiSiphonDesign^2/(HL_FiBwInitiation + HL_FiBwInletPlumbing), 4) = 6.26395 in
# Minor Loss Equation rearranged to solve for D, not necessarily an available pipe size
D_FiSiphonSSGuess := nthroot(K_FiSiphon*8/(g*π^2)*Q_Fi^2/h_eFiSiphonGuess, 4) = 6.49472 in
ND_FiSiphon := NominalPipeSize(max(D_FiSiphonGuess, D_FiSiphonSSGuess)) = 8 in  # This selects the more limiting case; appears it is SS
HL_FiSiphonSS := h_e(Q_Fi, innerD(ND_FiSiphon, PS_Default), K_FiSiphon) = 9.03967 cm  # Head loss through the siphon
Rho_FiFluidized := (Rho_H2O*H_FiSand*ε_FiSand + Rho_H2O*H_FiSand*ε_FiSand*(Pi_FiFluidized - 1) + Rho_FiSand*H_FiSand*(1 - ε_FiSand))/(H_FiSand*Pi_FiFluidized) = 1623.08 kg/m^3
B_FiSiphonManOrificesEst := 10 cm
N_FiSiphonManOrifices := 2*floor((L_Fi - 2*ConRadius(ND_FiSiphon))/(2*B_FiSiphonManOrificesEst)) = 2
# This keeps the area of the orifices the same as the siphon area.
D_FiSiphonManOrifices := CeilNearest(innerdiameter(ND_FiSiphon, PS_Default)/sqrt(N_FiSiphonManOrifices), D_Drill) = 0.142265 m
B_FiSiphonManOrifices := (L_Fi - 2*ConRadius(ND_FiSiphon) - N_FiSiphonManOrifices*D_FiSiphonManOrifices)/N_FiSiphonManOrifices + D_FiSiphonManOrifices
# Calculate the head loss over the weirs
# We are making the exit and backwash weirs as long as the filter is wide because it is a convenient dimension for construction.
# max 5cm headloss over weir
L_FiEntranceWeir := W_FiEntrance = 1.14744 m
# This is used for entrance and exit weirs (not necessarily backwash)
L_FiBwWeir := L_FiEntranceWeir*(1 + (N_Fi > 1)) + T_FiWall
HL_FiBwWeirEst := Headloss_weir(Q_Fi*(1 + (N_Fi > 1)), L_FiBwWeir)  # est because we don't know the flow through the siphon yet
HL_FiEntranceWeir := Headloss_weir(Q_Fi, L_FiEntranceWeir) = 3.83039 cm  # This is true of the entrance and exit weirs
L_FiOverflowWeir := 2*ConRadius(ND_FiBwTrunk) + 2*ConRadius(ND_FiTrunk) + 3*S_Fitting + (2*ConRadius(ND_DistPipe) + S_Fitting)*(N_Fi > 2)
HL_FiOverflowWeir := Headloss_weir(Q_Fi, L_FiOverflowWeir) = 0.0568746 m
L_FiDistWeir := max(4*ConRadius(ND_FiTrunk) + 3*S_Fitting, S_Fitting + max(CouplingLength(ND_DistPipe) - T_PlantWall, 0) + SocketDepth(ND_DistPipe) + ElbowRadius(ND_DistPipe) + ConRadius(ND_DistPipe))
HL_FiDistWeir := Headloss_weir(Q_Fi, L_FiDistWeir)
## Design a pipe to convey flow from the sed tank to the entrance box
HL_FiEntranceWeir =  # error  # Head loss over the weir into the entrance box
# multiplied just in case
L_FiInletChannelEst := W_Fi*N_Fi + (W_FiOverflow + 2*T_PlantWall)*ceil(N_Fi/2) + (N_Fi == 4)*T_PlantWall + (N_Fi == 4)*max(0, 1.5*T_FiWall + W_Fi - (2*T_PlantWall + W_Fi + 0.5*W_FiOverflow))
W_DCEst := ValveLength(ND_SedSludgePipe) + ElbowRadius(ND_SedSludgePipe) + MaleAdapterLength(ND_SedSludgePipe) + ConRadius(ND_SedSludgePipe) + ValveLength(ND_SedHopperDrain) + ElbowRadius(ND_SedHopperDrain) + ConRadius(ND_SedHopperDrain) + MaleAdapterLength(ND_SedHopperDrain)
L_FiEntrancePipeEst := W_DCEst + max(0, (W_FlocChannel + T_PlantWall)*N_FlocChannels - L_FiInletChannelEst) + T_Floor + S_Fitting
K_FiEntrancePipe := K_El90 + K_PipeEnt + K_PipeExit = 2.4
# Set a target of  HL_FiEntrancePipeTarget := H_SedWeirExit/2  to keep the level of water in the pipe below the sed weir.  If the pipe ends up being completely submerged, it will
# affect the level of water in the sed tanks.
ND_FiEntrancePipeMax := FloorNearest(Pipesizes[index(FloorNearest(W_SedBay/2 - ConRadius(ND_SedManifold), Pipesizes[:, 1]), Pipesizes[:, 1]), 0], AvailND)
# to ensure it fits in a bay
ND_FiEntrancePipeEst := D_pipeschedule(Q_Plant, PS_Default, HL_FiEntrancePipeTarget, L_FiEntrancePipeEst, Nu_Water, E_Pvc, K_FiEntrancePipe)
N_FiEntrancePipes := ceil(Q_Plant/Q_pipetotal(innerdiameter(min(ND_FiEntrancePipeMax, ND_FiEntrancePipeEst), PS_Default), HL_FiEntrancePipeTarget, L_FiEntrancePipeEst, Nu_Water, E_Pvc, K_FiEntrancePipe))
Q_FiEntrancePipe := Q_Plant/N_FiEntrancePipes
ND_FiEntrancePipe := D_pipeschedule(Q_FiEntrancePipe, PS_Default, HL_FiEntrancePipeTarget, L_FiEntrancePipeEst, Nu_Water, E_Pvc, K_FiEntrancePipe)
ND_FiEntrancePipe =  # error
HL_FiEntrancePipe := h_l(Q_Plant, innerdiameter(ND_FiEntrancePipe, PS_Default), L_FiEntrancePipeEst, K_FiEntrancePipe, Nu_Water, E_Pvc) = 12.8282 cm
# Inlet Channel to the Filter
ZW_FiInletChannel := Z_SedWeirExit - HL_ChannelMax - HL_FiEntrancePipe = 1.6507 m
# This is the height of the entrance weir at the inlet of the entrance box and represents the maximum water height in the entrance box
Z_FiEntranceWeir := ZW_FiInletChannel - HL_FiEntranceWeir
ZW_FiEntranceMax := Z_FiEntranceWeir - H_Freefall
Z_FiBwWeir := ZW_FiEntranceMax - (HL_FiBwInletPlumbing + HL_FiBwInitiation + HL_FiSiphonSS + HL_FiEntranceWeir) = -0.291483 m
# The top of the pipe stub on the siphon where it discharges into the drain channel.
ZW_FiEntranceMax - Z_FiBwWeir =  # error  # This is the head loss available to drive water through the filter during backwash mode.
# Now calulate the max flow rate through the siphon and check the weir design to make sure the backwash box doesn't overflow at the beginning of backwash.
Q_FiSiphonMax := Q_pipetotal(innerD(ND_FiSiphon, PS_Default), Z_FiEntranceWeir - (Z_FiBwWeir - HL_FiBwWeirEst), 4 m, Nu_Water, E_Pvc, K_FiSiphon) = 72.484 L/s
# The length of the siphon is estimated here because we don't yet know all the required elevations. Major losses aren't that significant and so the length estimate doesn't cause significant errors.
HL_FiBwWeir := Headloss_weir(Q_FiSiphonMax*(1 + N_Fi > 1)*N_Fi, L_FiBwWeir) = 9.78857 cm
Ti_FiBwInitiation := 2*A_FiActive*(HL_FiBwInitiation + HL_FiBwInletPlumbing)/(Q_FiSiphonMax - Q_Fi) = 86.2768 s
# This time estimate is approximate. The flow is varying with time. The factor of 2 is an approximate integration constant. (average flow is half the max). But this doesn't account correctly for the influence of the constant filtration flow.
# Calculate the elevation of bottom of the filter box and its height
H_FiFluidizedBed := Pi_FiFluidized*H_FiSand
# This SF is so the end of the pipe is 10 cm under water
Z_FiSiphonInlet := Z_FiBwWeir - H_FiSiphonNoSuckAir = -0.391483 m
Z_FiBottom := Z_FiSiphonInlet - H_FiFluidizedBed - H_FiFluidizedBedToSiphon - ConRadius(ND_FiBwManBranch) = -2.28028 m
# Minimum length of the siphon that needs to be submerged in the filter box is set to the SF
H_Fi := Z_FiEntranceWeir + H_PlantFreeboard - Z_FiBottom = 3.99268 m
Z_FiTop := Z_FiBottom + H_Fi = 1.7124 m
H_FiCheck := H_FiFluidizedBed + H_FiFluidizedBedToSiphon + HL_FiBwInitiation + H_PlantFreeboard + H_FiSiphonNoSuckAir + HL_FiBwInletPlumbing + HL_FiSiphonSS + HL_FiEntranceWeir + ConRadius(ND_FiBwManBranch) = 3.89268 m
# Just done to verify that the H.Fi calculation is correct.  See the wiki for a picture.
# Calculate the dimesions of the entrance box
Z_FiExitWeir := ZW_FiEntranceMax - (HL_FiTerminal + HL_FiInletPlumbing + HL_FiOutletPlumbing) - HL_FiDistWeir = 0.873715 m
# This sets the bottom of the entrance and exit tanks low enough to work for both the entrance tank requirements and the exit tank requirements. SF for not sucking air into the backwash line and for providing a minimum depth of water in the outlet to back up behind the weir.
H_FiExitMinDepth := 10 cm
Z_FiEntranceBottomFitPipes := Z_SedChannelBottom - max(CouplingLength(ND_FiEntrancePipe), T_PlantWall) - ElbowRadius(ND_FiEntrancePipe) - ConRadius(ND_FiEntrancePipe) - S_Fitting - SocketDepth(ND_FiEntrancePipe)
Z_FiEntranceBottom := min(ZW_FiEntranceMax - HL_FiBwSF - HL_FiDirty - H_FiBwNoSuckAir, Z_FiExitWeir - H_FiExitMinDepth, Z_FiEntranceBottomFitPipes) = 0.568022 m
H_FiEntrance := Z_FiEntranceWeir - Z_FiEntranceBottom + H_PlantFreeboard + HL_FiEntranceWeir = 1.18268 m
Z_FiEntranceBottom + H_FiEntrance =  # error
HW_FiEntrance := ZW_FiEntranceMax - Z_FiEntranceBottom = 0.944379 m
# The entrance channel wall opposite and perpendicular the weir is the same height as the filter box
# W.FiEntrance is calculated below (under the overflow box) because we need those dimensions first to ensure any "extra" space is allotted in the entrance box rather than the overflow box
# space between right side of entrance box and baffle:
S_FiEntranceBaffle := ((Q_Fi/T_ChannelWall)^2/g)^(1/3)
S_FiBaffleToBlock := ((Q_Fi/T_ChannelWall)^2/g)^(1/3)
Z_FiAirRemovalBlockBottom := 0.15*S_FiEntranceBaffle + Z_FiEntranceBottom
Z_FiAirRemovalBlockTop :=
    (Z_FiBwWeir + N_FiLayer*H_FiLayer - HL_FiBwWeir) if Z_FiBwWeir + N_FiLayer*H_FiLayer - HL_FiBwWeir ≤ Z_FiEntranceWeir - HL_FiEntranceWeir
    (Z_FiEntranceWeir - HL_FiEntranceWeir) otherwise
W_FiAirRemovalBlock := T_SedWeir  # make this a generic weir thickness at some point?
L_FiEntrance := L_FiOverflowWeir + S_FiEntranceBaffle + S_FiBaffleToBlock + 2*T_SedWeir
# Calculate the dimensions of the overflow box
ND_FiEntranceOverflow := NominalPipeSize(D_PipeTotal(Q_Fi, 1 m, 1 m, Nu_Water, E_Pvc, K_PipeExit + K_PipeEnt)) = 4 in
L_FiOverflow := L_FiEntrance
H_FiOverflow := H_FiEntrance
Z_FiOverflowBottom := Z_FiEntranceBottom = 0.568022 m
Z_FiOverflowWeir := ZW_FiEntranceMax - HL_FiOverflowWeir = 1.45553 m
Z_FiEntranceWeir =  # error
Z_FiEntranceBottom + HW_FiEntrance =  # error
HW_FiEntrance =  # error
Z_FiEntranceBottom =  # error
Z_FiExitWeir + HL_FiTerminal + HL_FiInletPlumbing + HL_FiOutletPlumbing - Z_FiEntranceBottom =  # error
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# This will be the pipe layout in the entrance and exit boxes to allow for 2 90 degree elbows in  Pipes 2 and 3 coming from the entrance box (on the right)
# How much does the filter bed over fluidize when the entrance box level lowers after backwash initiation?
H_FiFluidizedBedVariation := (HL_FiBwInitiation - HL_FiBwSS)*(W_FiEntrance^2 - 3*OuterDiameterFittingPVC(ND_FiTrunk)^2/4*π)/A_FiActive = 0.3401 m
HL_FiBwInitiation - HL_FiBwSS =  # error
HL_FiBwInletPlumbing =  # error
Q_Ratio := sqrt((HL_FiBwInitiation - HL_FiBwSS)/HL_FiBwInletPlumbing) = 3.79434
# We will leave the bottom of these tanks at a low elevation (that we have calculated) and add pipe stubs as needed. We need to experiment with free fall in the backwash pipe and with the inevitable entrainment of air to see if that is a problem. There will be a tradeoff between air entrainment and fluidized bed expansion. We may want to include an air vent in the backwash pipe (T with vertical leg returning to above original water height to vent air).
# Calculate the dimensions of the exit box
# Calculate ND for the waste pipe (check this)
ND_FiExitWaste := NominalPipeSize(D_PipeTotal(Q_Fi, 2 m, 1 m, Nu_Water, E_Pvc, K_PipeExit + K_PipeEnt + 2*K_El90)) = 4 in
# This means the water level in the entrance box will actually be 10 cm higher than we assumed in previous calculations to ensure BW initiation (aka we have a 10cm SF for BW initiation)
# The goal is to have water start overflowing from the entrance tank when the filter reaches terminal head loss
Z_SedWeirExit - Z_FiExitWeir =  # error  # This is the energy used to filter water
Z_FiEntranceWeir - Z_FiExitWeir =  # error  # Difference in heights for the Exit and Entrance weirs
# The first two terms determine the height of the water at BW SS.  The additonal terms calculates the additional height to prevent the pressure in the lowest outlet pipe from causing backwash water to flow into the exit box.
Z_FiExitPipeStubMin := Z_FiBwWeir + HL_FiSiphonSS + (HL_FiBwSS*(H_FiFluidizedBed - H_FiLayer)/H_FiFluidizedBed) = 0.894006 m
Z_FiExitBottom := Z_FiEntranceBottom = 0.568022 m
# The bottom of the tank is currently above the minimum stub height in the exit box and thus pipe stubs are not needed in the exit box to prevent flow of water during backwash.
ZW_FiExit := Z_FiExitWeir + HL_FiDistWeir = 0.932953 m
H_FiExit := H_FiEntrance = 1.18268 m
HW_FiExit := ZW_FiExit - Z_FiExitBottom
L_FiExit := L_FiDistWeir = 0.596619 m
W_FiExit := W_FiEntrance = 1.14744 m
W_Fi + OuterDiameterFittingPVC(ND_FiBwTrunk) - (W_FiExit + .5*OuterDiameterFittingPVC(ND_DistPipe)) =  # error
# This is a check to make sure the  entrance/exit boxes in different filters did not overlap
Z_FiInletChannelBottom := Z_FiExitBottom
HW_FiInletChannel := ZW_FiInletChannel - Z_FiInletChannelBottom
H_FiInletChannel := HW_FiInletChannel + H_PlantFreeboard
W_FiInletChannel := max(W_HorizChannelMin(Q_Plant, HW_FiInletChannel, L_FiEntrancePipeEst, Nu_Water, E_Pvc, 0), 2*ConRadius(ND_FiEntrancePipe) + 2*S_Fitting)
# Calculate the dimensions of the backwash box
# Minimum height of water in the filter box during filtration
ZW_FiStart := Z_FiExitWeir + HL_FiOutletPlumbing + HL_FiCleanLayer + HL_FiEntranceWeir = 1.05736 m
# This is the center line of the pipe through the wall.  This is a maximum based on zero flow and the goal of wanting to be able to initiate backwash at the beginning of filtration. This constraint could be relaxed if needed.
Z_FiSiphonCouplingMax := Z_FiExitWeir - outerdiameter(ND_FiSiphon)/2 = 0.764178 m
H_FiSiphonMax := ZW_FiEntranceMax - Z_FiBwWeir = 1.80388 m
# I ignore head loss in inlet pipe because the top inlet has 1/4 the head loss of the inlets that send water to two layers.
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L_FiSiphonTop := L_Fi/2 + ShortTeeLength(ND_FiBwManBranch) + T_PlantWall = 0.512472 m
P_Atm := 1 atm
Z_FiSiphonCouplingMin := ZW_FiEntranceMax - HL_FiInletPlumbing - (H_FiSiphonMax - HL_FiSiphonSS)*P_Atm/(Rho_H2O*g*(L_FiSiphonTop + H_FiSiphonMax) + 2*P_Atm) + outerdiameter(ND_FiSiphon)/2 = 0.761826 m
# The water trap part of the siphon tube must be Z_FiSiphonCouplingMin = below the Z_FiBwWeir = in order to prevent air from leaking out of the siphon.
Z_FiSiphonWatersealMax := Z_FiBwWeir - Z_FiSiphonCouplingMin = -1.05331 m
# It appears that we could safely raise the water trap part of the siphon above the level of the bottom of the filter if that is desirable. The top of the elbow that turns the siphon tube horizontal should be at the Z_FiSiphonWatersealMax elevation.
Z_FiSiphonCoupling := Z_FiSiphonCouplingMax = 0.764178 m
# This is based on the constraint that we want the siphon to function at half flow rate (and it would actually work at zero flow as well). The siphon is completely submerged if water is flowing across the exit weir.
Z_FiSiphonCouplingMax - Z_FiSiphonCouplingMin =  # error
# Not much room to spare here! We need to always check this and somehow report an error if this is negative!!!!
H_FiBwWeir := max(Z_FiBwWeir, H_SedWeirExit/2) = 0.164573 m
# Z.FiBwWeir - 0 will bring the bottom of the backwash box to the top of the drain channel. If that number is negative, it will be at least as deep as half of the sed weir
# We decided we could simultaneous make the box shallow and the pipe the shortest it could be by raising the bottom of the filter box.  In the event we want to change that constraint, this is the amount of room we have to play with.  For every cm we lower this, we lowert he other end 1 cm plus another 1.5cm to ensure air doesn't leak out.  We can use this to calculate a min
H_FiBw := H_FiBwWeir + H_PlantFreeboard + HL_FiBwWeir = 0.362459 m
Q_FiSiphonMax =  # error  # Just for reference
W_FiBw := max(W_ChannelMin, 2*(S_Fitting + 2*ConRadius(ND_FiSiphon)), W_HorizChannel(Q_FiSiphonMax*N_Fi*(1 + N_Fi > 1), H_FiBw, HL_FiBwWeir, L_FiBwWeir, Nu_Water, E_Concrete, 1))
Z_FiBwBottom := Z_FiBwWeir - H_FiBwWeir = -0.456056 m
# This is the addition of the two siphon pipes and the drain pipe for the backwash box
Z_FiBwTop := Z_FiBwBottom + H_FiBw = -0.0935973 m
# Calculate the Z of the top of the pipe stubs in the entrance and exit boxes
# 5 cm is for exposed pipe, 1 of the diameters is for the elbow radius
ZW_FiStart =  # error
# We are going to set the top one to some level (20cm) below the min water level (at the beginning of filtration) and then have some distance (5 cm) in between them.
Z_FiEntrancePipes :=
    for i ∈ 0 .. 3
        Z_FiEntrancePipes[0] ← ZW_FiStart - 20 cm if i == 0
        Z_FiEntrancePipes[i] ← Z_FiEntrancePipes[i - 1] - 5 cm otherwise
    return Z_FiEntrancePipes
    = [0.857364; 0.807364; 0.757364; 0.707364] m
# This may not be correct for the BW pipe which may need to be shorter, but Monore "really doesn't think so"
Z_FiExitPipes := [
    Z_FiExitWeir - H_FiExitMinDepth;
    Z_FiExitWeir - H_FiExitMinDepth;
    Z_FiExitWeir - H_FiExitMinDepth;
    Z_FiExitPipeStubMin
] = [0.773715; 0.773715; 0.773715; 0.894006] m
# Calculate the Siphon Valve Size
# The available head is equal to the difference between the bottom of the siphon pipe and the steady state water level in the filter.  This is a head available in terms of water.
HL_FiSiphonValveWater := (Z_FiSiphonCoupling - ND_FiSiphon/2) - (Z_FiBwWeir + HL_FiSiphonSS) = 0.863664 m
Rho_Air := 1.204*kg/m^3
Vol_FiSiphonAir := (CouplingLength(ND_FiSiphon) + 4*outerdiameter(ND_FiSiphon) + 2*(Z_FiSiphonCoupling - Z_FiBwWeir))*π/4*innerdiameter(ND_FiSiphon, PS_Default)^2 = 101.644 L
# Goal is to fill siphon tube with air in 1 second. To account for the diminishing head as the siphon tube fills with air we will use 0.5 seconds. This rapid fill is desirable so that the operator can open and then immediately close the valve without having to wait. This is important because the operator won't be able to see the air filling up the siphon tube.
Ti_FiSiphonBreak := 10 s
# Monroe increased this to 1 s (from 0.5 s) because the video of starting backwash showed the operator moving the valve slowly. This indicatess that it wasn't necessary to have such a large valve at Tamara.
# changed to 10s 1/7/2012
Q_FiSiphonAir := Vol_FiSiphonAir/Ti_FiSiphonBreak = 10.1644 L/s
HL_FiSiphonValveAir := HL_FiSiphonValveWater*Rho_H2O/Rho_Air = 717.329 m  # This is the head available in terms of air.
K_FiSiphonValve := 3
# Entrance and Exit loses and ball valve losses
L_FiSiphonBreak := Z_FiBottom + H_Fi - Z_FiSiphonCoupling = 0.948223 m
# Estimated length of the pipe that will be connected to the air valve. Air valve will be at the very top of the filter.
ND_FiSiphonAirValve := NominalPipeSize(D_PipeTotal(Q_FiSiphonAir, HL_FiSiphonValveAir, L_FiSiphonBreak, Nu_Air, E_Pvc, K_FiSiphonValve)) = 0.75 in
# Piping and Fittings
# The last elbow for the backwash trunk line is replaced with a T.  The oppostie direction from the filter is a valve that goes to the waste channel in the event we want to dewater the filter without de-sanding it.
#
# The de-sanding pipe will be sized based on the volume of the fluidized bed being drained in under 5 minutes.  Predict a 3 in pipe
# There will be a tradeoff between air entrainment and fluidized bed expansion. We may want to include an air vent in the backwash pipe (T with vertical leg returning to above original water height to vent air).  (this should not be needed in the design as of late June 2011 because we are keeping the backwash inlet submerged at all times.)
# Sand removal pipe.
H_FiSandOutlet := 1 m  # to be high enough to dump into a 55 gal drum
# This can't be set any higher because the available head will be insufficient to pump sand unless we figure out a way to maintain a higher water level in the filter during the sand dump. See the small head loss available at the finish of pumping the sand below.
Z_FiSandOutlet := Z_FiBottom + H_FiSandOutlet = -1.28028 m
# This is higher than the sed tank drain channel. Thus the backwash water can easily discharge into the drain channel
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Z_FiBwWeir =  # error
Z_FiBottom =  # error
HL_FiSandOutlet := Z_FiBwWeir - Z_FiSandOutlet = 0.9888 m  # This isn't quite right because of the different densities.
# Calculating head loss and density for this problem is a bit complicated. The sand bed has a density of
Rho_FiFluidized =  # error
# This ends up changing Nu.Water, but that doesn't change the results because we are in the very turbulent domain of the Moody diagram. The available head has to take into account the different densities of the fluidized bed and the water above the bed. As the fluidized bed is drained the available head will decrease. Would it be possible to drain the sand out of the bed at the very beginning of the backwash cycle while the water depth above the bed is gradually decreasing? This extra bed depth would provide more head to push the sand through the sand outlet.
# At the beginning of sand pumping the filter box has fluidized sand (and thus a high fluid density) and thus the pressure at the entrance to the sand dump is high. At the end of the sand dump the filter is filled with water and thus the pressure at the entrance to the sand dump is much lower and yet the sand dump pipe is still filled with the high density fluidized sand.
HL_FiSandOutletStart := ((Z_FiBwWeir - Z_FiBottom - H_FiSand*Pi_FiFluidized)*Rho_H2O + H_FiSand*Pi_FiFluidized*Rho_FiFluidized + (-H_FiSandOutlet*Rho_FiFluidized))/Rho_FiFluidized = 0.854133 m
HL_FiSandOutletFinish := ((Z_FiBwWeir - Z_FiBottom)*Rho_H2O + (-H_FiSandOutlet*Rho_FiFluidized))/Rho_FiFluidized = 0.225327 m
V_FiSand := W_Fi*L_Fi*H_FiSand*Pi_FiFluidized = 2909.47 L  # Total volume of the fluidized bed
# Use the largest pipe that will fit between the branch lines (but not between the backwash branch lines)
ND_FiSandOutlet := LookupFloor(B_FiManifoldBranch - outerdiameter(ND_FiManBranch), AvailOD, AvailND) = 0.0508 m
Q_FiSandOutletStart := Q_pipetotal(innerdiameter(ND_FiSandOutlet, PS_Default), HL_FiSandOutletStart, H_FiSandOutlet, Nu_Water*Rho_H2O/Rho_FiFluidized, E_Pvc, K_PipeExit + K_PipeEnt + 2*K_El90) = 5.07342 L/s
Q_FiSandOutletFinish := Q_pipetotal(innerdiameter(ND_FiSandOutlet, PS_Default), HL_FiSandOutletFinish, H_FiSandOutlet, Nu_Water*Rho_H2O/Rho_FiFluidized, E_Pvc, K_PipeExit + K_PipeEnt + 2*K_El90) = 2.60316 L/s
Q_FiSandOutlet := (Q_FiSandOutletStart + Q_FiSandOutletFinish)/2  # This isn't quite right, but it is close.
Ti_FiSand := V_FiSand/Q_FiSandOutlet = 12.6335 min  # This is the time required to empty the filter of the sand.
Ti_FiSandDrum := 220 L/Q_FiSandOutlet = 57.3172 s
Q_FiSandOutletFinish/(innerdiameter(ND_FiSandOutlet, PS_Default)^2/4*π) =  # error  # The velocity in the pipe is far greater than the backwash velocity
# Estimate of the flow rate that would allow sand to settle within the vertical pipe. This flow rate is really low and so the valve will need to be almost closed before the sand stops flowing.
Q_Settle := 5*mm/s*(innerdiameter(ND_FiSandOutlet, PS_Default)^2/4*π) = 0.0119632 L/s
