# Flocculator Drawing Low Flow (Single Channel)
# Layers
FlocConLayer := layer_new("FlocTankCon", grey)
FlocConFrz := FreezeLayer("FlocTankCon")
FlocDrainPipeLayer := layer_new("FlocDrainPipePlu", blue)
FlocDrainPipeFrz := FreezeLayer("FlocDrainPipePlu")
FlocDrainAdapterLayer := layer_new("FlocDrainAdapterPlu", blue3)
FlocDrainAdapterFrz := FreezeLayer("FlocDrainAdapterPlu")
FlocDrainValveLayer := layer_new("FlocDrainValvePlu", blue3)
FlocDrainValveFrz := FreezeLayer("FlocDrainValvePlu")
FlocDrainFittingLayer := layer_new("FlocDrainFittingPlu", green)
FlocDrainFittingFrz := FreezeLayer("FlocDrainFittingPlu")
FlocBaffleLayer := layer_new("FlocModBaffles", ltpurple)
FlocBaffleFrz := FreezeLayer("FlocModBaffles")
FlocModPipeLayer := layer_new("FlocModPipePlu", blue)
FlocModPipeFrz := FreezeLayer("FlocModPipePlu")
FlocModSpacerLayer := layer_new("FlocModSpacerPlu", blue3)
FlocModSpacerFrz := FreezeLayer("FlocModSpacerPlu")
FlocModFittingLayer := layer_new("FlocModFittingPlu", green)
FlocModFittingFrz := FreezeLayer("FlocModFittingPlu")
# Flocculator Masonry
Floc_Dim := [L_Floc; W_Floc; H_Floc]
Floc_Origin := Plant_Origin + [-L_Et - T_PlantWall; W_Sed + T_PlantWall; Z_FlocBottom]
FlocTank := Tank(Floc_Origin, Floc_Dim, T_PlantWall)
FlocTankSlope := WedgeF(Floc_Origin, Floc_Origin + [-L_Floc; W_Floc; L_Floc*tan(AN_FlocSlope)], [0; 0; 0]*deg)
FlocEtWall := BoxF(Floc_Origin + [0 m; -T_PlantWall; -T_PlantWall], Floc_Origin + [T_PlantWall; W_Floc + T_PlantWall; H_Floc], [0; 0; 0]*deg)
SubtractFromFlocCon := SubtractF(["FlocTankCon"], "DeleteMe")
FlocConScript := stack(FlocConLayer, FlocTank, FlocTankSlope, Union_All, FlocConFrz, FlocEtWall, GroupDelete, SubtractFromFlocCon)
# Channel Drain
FlocDrainPipe_Origin := Floc_Origin + [-L_Floc; W_Floc/2; 0 m]
FlocDrainAdapter1_Origin := FlocDrainPipe_Origin + [-T_PlantWall - SocketDepth(ND_FlocDrain); 0 m; 0 m]
FlocDrainValve_Origin := FlocDrainAdapter1_Origin + [SocketDepth(ND_FlocDrain) - MaleAdapterLength(ND_FlocDrain) + ValveSocket(ND_FlocDrain); 0 m; 0 m]
FlocDrainAdapter2_Origin := FlocDrainAdapter1_Origin + [
    -2*MaleAdapterLength(ND_FlocDrain) + 2*SocketDepth(ND_FlocDrain) - ValveLength(ND_FlocDrain) + 2*ValveSocket(ND_FlocDrain);
    0 m;
    0 m
]
FlocDrainElbow_Origin := FlocDrainAdapter2_Origin + [-2*SocketDepth(ND_FlocDrain); 0 m; 0 m]
FlocDrainPipe := PipeSUBF(FlocDrainPipe_Origin, T_PlantWall + SocketDepth(ND_FlocDrain), [0; 0]*deg, ND_FlocDrain, PS_Default, ["FlocTankCon"])
FlocDrainNipple := PipeF(FlocDrainAdapter2_Origin, 2*SocketDepth(ND_FlocDrain), [0; 0]*deg, ND_FlocDrain, PS_Default)
FlocDrainAdapter1 := MaleAdapterF(FlocDrainAdapter1_Origin, [0; 0; 0]*deg, ND_FlocDrain, PS_Default)
FlocDrainAdapter2 := MaleAdapterF(FlocDrainAdapter2_Origin, [180; 0; 0]*deg, ND_FlocDrain, PS_Default)
FlocDrainValve := InsertThreadedValve("Floc", ND_FlocDrain, FlocDrainValve_Origin, 0 deg)
FlocDrainElbow := ElbowF(FlocDrainElbow_Origin, [90; 0; 45]*deg, ND_FlocDrain, PS_Default)
FlocDrainPlumbingScript := stack(FlocDrainPipeLayer, FlocDrainPipe, FlocDrainNipple, FlocDrainPipeFrz, FlocDrainAdapterLayer, FlocDrainAdapter1, FlocDrainAdapter2, FlocDrainAdapterFrz, FlocDrainValveLayer, FlocDrainValve, FlocDrainValveFrz, FlocDrainFittingLayer, FlocDrainElbow, FlocDrainFittingFrz)
L_FlocDrainCut := outerradius(ND_FlocDrain)/tan(30 deg)
H_FlocDrainCut := □  # error: This placeholder is empty.
AC_FlocTank := stack(FlocConScript, FlocDrainPlumbingScript)
