# [reference: DesignAssumptions.xmcd]
uturnhole(baffle_spacing, FlocTank_width, FlocTank_length, n_baffle) :=
    uturnhole_area ← baffle_spacing[2]*m*FlocTank_width
    uturnhole_width ← baffle_spacing[1]*m - uturnhole_unusedspace if FlocTank_length/n_channels > baffle_spacing[0]*m*n_baffle[0]
    uturnhole_width ← baffle_spacing[0]*m - uturnhole_unusedspace otherwise
    uturnhole_height ← uturnhole_area/uturnhole_width
    return [uturnhole_width; uturnhole_height]
uturnhole([.1; .3; .5], .5*m, 15*m, [30; 20; 5]) = [0.27; 0.925926] m
shortcircuit(baffle_spacing, FlocTank_enddepth) :=
    gap ← spacingratio*baffle_spacing*m
    baffle_length ← FlocTank_enddepth - gap
    baffle_overlap ← FlocTank_enddepth - 2*gap
    spacingratio_new ← (FlocTank_enddepth - overlap_min)/(2*baffle_spacing*m)
    i ← 0
    while i < length(baffle_spacing)
        baffle_length[i] ← FlocTank_enddepth - spacingratio_new[i]*baffle_spacing[i]*m if baffle_overlap[i] ≤ 0
        i ← i + 1
    return baffle_length
shortcircuit([.1; .3; .5], 2.1*m) = [1.95; 1.65; 1.35] m
bafflepositions(flocDim, n_baffles, b_lengths, b_spacings) :=
    n ← 0
    k ← 0
    j ← 0
    firstchannel ← 1
    spaceleft ← flocDim[0]/n_channels - (b_spacings[0]*n_baffles[0])
    numbaffles_1channel ← floor(spaceleft/b_spacings[1]) + n_baffles[0]
    while n < (sum(n_baffles) - 1)
        if j > n_baffles[k] - 1
            k ← k + 1
            j ← 0
        bafflelength[n, 0] ← b_lengths[k]
        if firstchannel == 1
            baffle_xposition1[n] ← b_spacings[k] if n == 0
            baffle_xposition1[n] ← baffle_xposition1[n - 1] + b_spacings[k] otherwise
            if n + 1 > (numbaffles_1channel - 1)
                firstchannel ← 0
                m ← 0
        if firstchannel == 0
            baffle_xposition2[m] ← flocDim[0]/n_channels - b_spacings[k] if m == 0
            baffle_xposition2[m] ← flocDim[0]/n_channels - ((m + 1)*b_spacings[k]) otherwise
        m ← m + 1
        n ← n + 1
        j ← j + 1
    firstchannel ← 1
    m ← 0
    i ← 0
    while i < numbaffles_1channel
        j ← 0
        if mod(i + 1, 2) ≠ 0
            while j < 3
                baffleposition1[i, j] ← baffle_xposition1[i] if j == 0
                baffleposition1[i, j] ← 0 if j == 1
                baffleposition1[i, j] ← bafflelength[i] if j == 2
                j ← j + 1
            i ← i + 1
        otherwise
            while j < 3
                baffleposition1[i, j] ← baffle_xposition1[i] if j == 0
                baffleposition1[i, j] ← flocDim[2] if j == 1
                baffleposition1[i, j] ← flocDim[2] - bafflelength[i] if j == 2
                j ← j + 1
            i ← i + 1
    while i ≥ numbaffles_1channel and i < sum(n_baffles) - 1
        j ← 0
        if mod(m + 1, 2) == 0
            while j < 3
                baffleposition2[m, j] ← baffle_xposition2[m] if j == 0
                baffleposition2[m, j] ← flocDim[2] if j == 1
                baffleposition2[m, j] ← flocDim[2] - bafflelength[m] if j == 2
                j ← j + 1
            i ← i + 1
            m ← m + 1
        otherwise
            while j < 3
                baffleposition2[m, j] ← baffle_xposition2[m] if j == 0
                baffleposition2[m, j] ← 0 if j == 1
                baffleposition2[m, j] ← bafflelength[m] if j == 2
                j ← j + 1
            i ← i + 1
            m ← m + 1
    return [baffleposition1, baffleposition2]
bafflepositions([15; .5; 2.5], [30; 20; 5], [1.6; 1.3; 1.1], [.1; .3; .5]) = [[
    0.1, 0, 1.6;
    0.2, 2.5, 0.9;
    0.3, 0, 1.6;
    0.4, 2.5, 0.9;
    0.5, 0, 1.6;
    0.6, 2.5, 0.9;
    0.7, 0, 1.6;
    0.8, 2.5, 0.9;
    0.9, 0, 1.6;
    1, 2.5, 0.9
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], [
    7.2, 0, 1.6;
    6.9, 2.5, 0.9;
    6.6, 0, 1.6;
    6.3, 2.5, 0.9;
    6, 0, 1.6;
    5.7, 2.5, 0.9;
    4, 0, 1.6;
    3.5, 2.5, 0.9;
    3, 0, 1.6
]]
newbaffles(baffle_spacing, n_baffle, FlocTank_length) :=
    tanklength_duetobaffles ← baffle_spacing*n_baffle
    spaceleftover ← FlocTank_length - tanklength_duetobaffles
    while tanklength_duetobaffles ≠ FlocTank_length
        while spaceleftover > 0
            if spaceleftover < baffle_spacing[2]
                n_baffle[2] ← n_baffle[2] - 1
                tanklength_duetobaffles ← baffle_spacing*n_baffle
            if spaceleftover ≥ 2*baffle_spacing[2]
                n_baffle[2] ← n_baffle[2] + 1
                tanklength_duetobaffles ← baffle_spacing*n_baffle
            tanklength_duetobaffles ← FlocTank_length if spaceleftover ≥ baffle_spacing[2] and spaceleftover < 2*baffle_spacing[2]
            spaceleftover ← FlocTank_length - tanklength_duetobaffles
        while spaceleftover < 0
            if |spaceleftover| ≥ baffle_spacing[0]
                n_baffle[2] ← n_baffle[2] - 2
                tanklength_duetobaffles ← baffle_spacing*n_baffle
            if |spaceleftover| < baffle_spacing[0]
                n_baffle[0] ← n_baffle[0] - 1
                tanklength_duetobaffles ← FlocTank_length
            spaceleftover ← FlocTank_length - tanklength_duetobaffles
    return n_baffle
newbaffles([.1; .3; .5], [30; 20; 5], 15) = [30; 20; 11]
flocculator(Q_plant, SedDim) :=
    FlocTank_length ← SedDim[0]*n_channels*m
    FlocTank_width ← SedDim[1]/n_channels*m
    FlocTank_enddepth ← SedDim[2]*m - freeboard_sed
    baffle_spacing ← (1/G)^(1/2)*(k_b*Q_plant^3/(2*Π_cell*ν*FlocTank_width^3))^(1/4)
    G_min ← G*flowratio_hightolowflow^(3/2)
    θ_min ← Π_cell*FlocTank_width*baffle_spacing^2/Q_plant
    Gθ_minpersection ← Gθ_min*G_min/sum(G_min)
    n_baffleorig ← ceil(vectorize(Gθ_minpersection/(G_min*θ_min)))
    n_baffle ← newbaffles(baffle_spacing/m, n_baffleorig, FlocTank_length/m)
    newGθ_totalpersection ← G_min*θ_min*n_baffle
    newGθ_total ← sum(newGθ_totalpersection)
    lowGθ ← "Failure: Your Gθ for the flocculator is too low. It should not fall below 4500. Consider increasing the length."
    return lowGθ if newGθ_total < Gθ_absmin
    uturnhole_dim ← uturnhole(baffle_spacing/m, FlocTank_width, FlocTank_length, n_baffle)
    baffle_length ← shortcircuit(baffle_spacing/m, FlocTank_enddepth)
    v ← Q_plant/(FlocTank_width*baffle_spacing)
    h_l ← vectorize(n_baffle*(k_b*v^2/(2*g)))
    total_hl ← sum(h_l)
    d_start ← FlocTank_enddepth + total_hl
    FlocTank_height ← d_start + freeboard_floc
    gap ← spacingratio*baffle_spacing
    floc_dim ← [FlocTank_length; FlocTank_width; FlocTank_height]
    baffle_positions ← bafflepositions(floc_dim/m, n_baffle, baffle_length/m, baffle_spacing/m)
    floc_inleth ← 1.5*m
    return [floc_dim/m, baffle_spacing/m, floc_inleth/m, n_baffle, total_hl/m, uturnhole_dim/m, baffle_length/m, baffle_positions]
flocculator(100*gpm, [10; .5; 2.5]) = [[20; 0.25; 2.7051], [0.14462; 0.302266; 0.427469], 1.5, [39; 9; 26], 0.205101, [0.272266; 0.39251], [2.18307; 1.9466; 1.7588], [[
    0.14462, 0, 2.18307;
    0.28924, 2.7051, 0.522031;
    0.433859, 0, 2.18307;
    0.578479, 2.7051, 0.522031;
    0.723099, 0, 2.18307;
    0.867719, 2.7051, 0.522031;
    1.01234, 0, 2.18307;
    1.15696, 2.7051, 0.522031;
    1.30158, 0, 2.18307;
    1.4462, 2.7051, 0.522031
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], [
    9.57253, 0, 2.18307;
    9.14506, 2.7051, 0.522031;
    8.71759, 0, 2.18307;
    8.29012, 2.7051, 0.522031;
    7.86265, 0, 2.18307;
    7.43518, 2.7051, 0.522031;
    7.00771, 0, 2.18307;
    6.58025, 2.7051, 0.522031;
    6.15278, 0, 2.18307;
    5.72531, 2.7051, 0.522031;
    5.29784, 0, 2.18307;
    4.87037, 2.7051, 0.522031;
    4.4429, 0, 2.18307;
    4.01543, 2.7051, 0.522031;
    3.58796, 0, 2.18307;
    3.16049, 2.7051, 0.522031;
    2.73302, 0, 2.18307;
    2.30555, 2.7051, 0.522031;
    1.87808, 0, 2.18307;
    1.45061, 2.7051, 0.522031
]]]
