# Hydraulic Design
# References
# Fluids Functions
# [reference: FluidsFunctions.xmcd]
# Pipe Database
# [reference: PipeDatabase.xmcd]
# Design Assumptions
# [reference: DesignAssumptions.xmcd]
# User Inputs
# Components and Valves
# Number of Components
N_elbow45 := 0
N_teebr := 1
N_ReturnBends := 0
N_elbow90 := 2
N_teerun := 0
# Valves Information
GateValve := 1
CheckValveConv := 0
CheckValveBall := 0
GlobeValve := 0
AngleValve := 0
# Pipes and Orifices
K_sum(N_elbow45, N_elbow90, N_teerun, N_teebr, GateValve, GlobeValve, AngleValve, CheckValveConv, CheckValveBall) :=
    K_2 ← N_elbow45*K_el45 + N_elbow90*K_el90
    K_3 ← K_Tflowrun*N_teerun + K_Tflowbr*N_teebr
    K_4 ← GateValve*K_gatevalve + GlobeValve*K_globevalve + AngleValve*K_anglevalve + CheckValveConv*K_chkvalveconv + CheckValveBall*K_chkvalveball
    K_5 ← diamratio_exp0.75*K_exp0.75 + diamratio_exp0.5*K_exp0.5 + diamratio_exp0.25*K_exp0.25 + diamratio_cont0.75*K_cont0.75 + diamratio_cont0.5*K_cont0.5 + diamratio_cont0.25*K_cont0.25
    K_sum ← K_2 + K_3 + K_4 + K_5
    return K_sum
PipeSize(Q_plant, PipeSpecification, L_pipe) :=
    K_sum ← K_sum(N_elbow45, N_elbow90, N_teerun, N_teebr, GateValve, GlobeValve, AngleValve, CheckValveConv, CheckValveBall)
    Pipe_size ← D_pipe(Q_plant, AvailPipeSizes1(PipeSpecification), h_lmax, L_pipe, ν, ε_pvc, K_sum)
    return Pipe_size
# Launderer Design
# Diameter iteration program:
D_manifold(Q, h, L, Q_ratio, D_available, ν, ε, K, n) :=
    D_new ← D_available[0]
    D_old ← 0 m
    error ← 1
    while error > 0.01
        D_old ← D_new
        D_new ← (8*Q^2/(g*π^2*h)*(1 + (f(Q, D_old, ν, ε)*L/D_old + K)*(1/3 + 1/(2*n) + 1/(6*n^2)))/(1 - Q_ratio^2))^(1/4)
        error ← |D_old - D_new|/mean(D_old, D_new)
    D_new ← Dnextlargest(D_new, D_available)
    return D_new
D_orifices(h_losslaunder, Q_plant, D_launder) :=
    h_sedtank ← 2 m
    D_circle(A_orifice(h_sedtank - h_losslaunder - (Q_plant/2)^2/(2*g*A_circle(D_launder)^2), K_orifice, Q_plant/2/44))
# A.orifice and A.circle are functions.
Launder(Q_plant, PipeSpecification, L_sedtank, lamella_spacing) :=
    Q_tank ← Q_plant/n_sedtanks
    Q_ratio ← .85
    n_orifices ← floor(L_sedtank/(2*lamella_spacing))
    h_sedtank ← 2 m
    h_platetops ← 1.8 m
    manifold_depth ← h_sedtank - h_platetops - (h_sedtank - h_platetops)/2
    D_avail ← AvailPipeSizes1(PipeSpecification)
    D_launder ← D_manifold(Q_tank, manifold_depth, 2*L_sedtank, Q_ratio, D_avail, ν, ε_pvc, 0, n_orifices)
    h_losslaunder ← h_lmanifold(Q_tank, D_launder, 2*L_sedtank, 0, ν, ε_pvc, n_orifices)
    D_orifice ← D_orifices(h_losslaunder, Q_plant, D_launder)
    SedPipe_length ← L_sedtank
    orifice_dist ← lamella_spacing/2
    return [SedPipe_length/m, D_orifice/m, orifice_dist/m, manifold_depth/m, D_launder/m, n_orifices]  # How is PipeSpecification determined?
# Q.ratio assumption?
# Sludge Pipe Design
Sludge(Q_plant, PipeSpecification, L_sedtank, lamella_spacing) :=
    Q_tank ← Q_plant/n_sedtanks
    Q_ratio ← .85
    n_orifices ← L_sedtank/(2*lamella_spacing)
    h_losslaunder ← 2 cm
    h_sedtank ← 2 m
    h_platetops ← 1.8 m
    manifold_depth ← h_sedtank - h_platetops - (h_sedtank - h_platetops)/2
    D_avail ← AvailPipeSizes1(PipeSpecification)
    D_launder ← D_manifold(Q_tank, manifold_depth, 2*L_sedtank, Q_ratio, D_avail, ν, ε_pvc, 0, n_orifices)
    D_orifice ← D_orifices(h_losslaunder, Q_plant, D_launder)
    orifice_dist ← L_sludgeports
    waste_inr ← D_launder
    return [waste_inr, D_orifice, orifice_dist]
# Channel Design
Channel(Q_plant, SedTank_width, tank_thick) :=
    waterdepth_levelingtank ← 50 cm
    headloss_launders ← 10 cm
    freeboard ← 10 cm
    height_channel ← waterdepth_levelingtank + headloss_launders + freeboard
    b ← (1/G_cell)^(1/2)*(Q_plant/height_channel)^(3/4)*(K_90/(2*ν*Π_cell))^(1/4)
    width_channel ← Π_cell*b
    length_channel ← n_sedtanks*SedTank_width + 2*tank_thick
    channel_dim ← [length_channel; width_channel; height_channel]
    return channel_dim  # The depth of the water in the leveling tank is set
# estimate of total head loss through each laudner
# The addtional freeboard above the expected water level
# G_cell is the average velocity gradient in the cell where the energy dissipation is assumed to be occuring. This is the desired velocity gradient for the end of the flocculation tank.
# K_90 is theThe loss coefficient for the channel transition.
# Π_cell is the length of the zone where the energy is dissipated. Assume that energy is dissipated in a zone is twice as long as the
# smallest dimension flow.
# Opening of channel height determines the height
# for theentire channel
D_metdrill := [
    3 mm;
    4 mm;
    5 mm;
    6 mm;
    7 mm;
    8 mm;
    9 mm;
    10 mm;
    11 mm;
    12 mm;
    13 mm;
    14 mm;
    15 mm;
    16 mm;
    17 mm;
    18 mm;
    19 mm;
    20 mm
]
