# [reference: DesignAssumptions.xmcd]
# [reference: PipeDatabase.xmcd]
# [reference: FluidsFunctions.xmcd]
# [reference: Pipe Design and minor loss coefficients.xmcd]
width_channel := 0.5 m
s
SedTank_width := 1 m
# Launderer Design
Launder(Q_plant, PipeSpecification, L_sedtank, lamella_spacing, HW_sedtank, spaceabove, n_sedtanks, width_channel, SedTank_width, platform_thick, walkway) :=
    Q_tank ← Q_plant/n_sedtanks
    orifice_dist ← 2*lamella_spacing
    n_orifices ← 2*floor(L_sedtank/orifice_dist)
    manifold_depth ← spaceabove/2
    D_avail ← AvailPipeSizes1(PipeSpecification)
    Diam_launder ← D_manifold(Q_tank, manifold_depth, 2*L_sedtank, Q_ratioLaunderOrf, D_avail, ν, ε_pvc, 0, n_orifices)
    h_losslaunder ← h_lmanifold(Q_tank, Diam_launder, 2*L_sedtank, 0, ν, ε_pvc, n_orifices)
    D_orifice ← D_circle(A_orifice(h_losslaunder/n_orifices, K_orifice, Q_tank)/n_orifices)
    SedPipe_length ← L_sedtank
    Q_orifice ← Q_tank/n_orifices
    h_orifice ← h_orifice(D_orifice, K_orifice, Q_orifice)
    HL_laundorif ← h_orifice*n_orifices*n_sedtanks
    HL_launder ← h_losslaunder*n_sedtanks
    K_sum ← K_sum(0, 4, 0, 0, 0, 0, 0, 0, 0)
    HL_laundertotal ← HL_launder + HL_laundorif + h_e(Q_tank, Diam_launder, K_sum)
    L_launder ← 2*SedTank_width + 0.5*SedTank_width + width_channel + 3*platform_thick + walkway
    D_launder1 ← PipeSize(Q_tank, PipeSpecification, L_launder, K_sum, HL_laundertotal)
    D_launder ← D_launder1 if D_launder1 ≥ Diam_launder
    D_launder ← Diam_launder otherwise
    mayor_hl ← h_f(Q_tank, D_launder, L_launder, ν, ε_pvc)
    return [SedPipe_length/m, D_orifice/in, orifice_dist/m, manifold_depth/m, D_launder/in, n_orifices, HL_laundertotal/cm, h_orifice/in, D_launder1/in, mayor_hl/cm, Diam_launder/in]
# The orifices will be located on the sides of the launder and will be spaced at twice the lamella spacing
# The launder will be located between the top of the lamella and the surface of the water in the sedimentation tank, the orifices will be at the center of the launders
# Using the iterative program from above, and the available pipe sizes from the pipe database, the launder diameter is determined
# The head loss through the launder is calculated by using the orifice equation,and the manifold head loss equation found the Fluids Functions file. By multiplying by the number of sedtanks, the total head loss is determined, and the water level in the plant leveling tank can be determined.
Launder(470*L/min, 8, 2.515*m, 0.05 m, 1.96 m, 0.267*m, 3, 0.5 m, 1 m, 0.15 m, 1 m) = [2.515, 1.76354, 0.1, 0.1335, 3.21, 50, 8.82261, 0.00555385, 3.21, 1.81714, 3.21]
# Since there are orifices on both sides I multiplied n.orifices by two from what it was
# This file is a little too difficult for me to follow. I think it needs to be documented more - and explain at the top what this file is used for. A graphic would be good too!
D_circle(A_orifice(h_losslaunder/n_orifices, K_orifice, Q_tank)/n_orifices)
# also when we were calculating the diameter of the orifice we used the equation from
# the fluids function file, but that calculation made the design headloss through the orifices too large.
#
# For the total area of the orifices in the tank i used Q.tank, K.orifices and a design headloss for all of the orifices equal to the headloss through the launder
#
# The area found from this is the area of all orifices in the tank, so i divided it by the number of orifices to find the area of a single orifice to find it's diameter.
#
# This brought the total headloss down from almost 300m to 4.5 cm
